// SBML level 2 version 1
// This model was downloaded from BioModels Database
// http://www.ebi.ac.uk/biomodels/

model BIOMD0000000145()
  // Wang2007 - ATP induced intracellular Calcium Oscillation
  // Wang2007 - ATP induced intracellular Calicum Oscillation
  // The model simulate the ATP-induced intracellular Ca2+ oscillations and the quantitative effect of ATP concentration on the oscillation characteristics such as the duration, peak concentration of intracellular Ca2+ and average interval.
  // This model is described in the article:
  // A quantitative kinetic model for ATP-induced intracellular Ca2+ oscillations.
  // Wang J, Huang X, Huang W.
  // J. Theor. Biol. 2007 Apr; 245(3): 510-519
  // Abstract:
  // A quantitative kinetic model is proposed to simulate the ATP-induced intracellular Ca(2+) oscillations. The quantitative effect of ATP concentration upon the oscillations was successfully simulated. Our simulation results support previous experimental explanations that the Ca(2+) oscillations are mainly due to interaction of Ca(2+) release from the endoplasmic reticulum (ER) and the ATP-dependent Ca(2+) pump back into the ER, and the oscillations are prolonged by extracellular Ca(2+) entry that maintains the constant Ca(2+) supplies to its intracellular stores. The model is also able to simulate the sudden disappearance phenomenon of the Ca(2+) oscillations observed in some cell types by taking into account of the biphasic characteristic of the Ca(2+) release from the endoplasmic reticulum (ER). Moreover, the model simulation results for the Ca(2+) oscillations characteristics such as duration, peak [Ca(2+)](cyt), and average interval, etc., lead to prediction of some possible factors responsible for the variations of Ca(2+) oscillations in different types of cells.
  // This model is hosted on BioModels Database and identified by: BIOMD0000000145.
  // To cite BioModels Database, please use: BioModels Database: An enhanced, curated and annotated resource for published quantitative kinetic models.
  // To the extent possible under law, all copyright and related or neighbouring rights to this encoded model have been dedicated to the public domain worldwide. Please refer to CC0 Public Domain Dedication for more information.
  // biomodels.db:MODEL8342350003
  // biomodels.db:BIOMD0000000145
  // isDescribedBy pubmed:17188305
  // isDerivedFrom pubmed:1647879
  // hasProperty mamo:MAMO_0000046
  // hasPart kegg.pathway:hsa04020 GO:0051482

  // Compartments:
  compartment Cytosol = 1;  // GO:0005829
  compartment ER = 1;  // GO:0005783

  // Species:
  species Galpha_GTP in Cytosol = 1;  // hasPart CHEBI:15996 uniprot:P29992
  species APLC in Cytosol = 9;  // isVersionOf uniprot:Q9NQ66
  species IP3 in Cytosol = 1;  // CHEBI:16595
  species Ca_ER in ER = 1000; Ca_ER is "Calcium";  // CHEBI:29108
  species Ca_Cyt in Cytosol = 200; Ca_Cyt is "Calcium";  // CHEBI:29108
  species PLC in Cytosol;  // isVersionOf uniprot:Q9NQ66
  species DG in Cytosol; DG is "Diacylglycerol";  // CHEBI:18035

  // Parameters:
  Kp = 4;
  Kd = 10;
  Kr = 200;
  n = 4;
  Kg = 25;
  m = 2;
  Ks = 25;
  Kc1 = 1000;
  Kc2 = 2000;
  w = 3;
  Ker = 75;
  Cplc_total = 10;
  k0 = 0.1;
  k1 = 3.4;
  k2 = 4;
  k3 = 4.5;
  k4 = 1.2;
  k5 = 0.12;
  k6 = 14;
  k7 = 2;
  k8 = 10500;
  k9 = 600;
  k10 = 3000;
  k11 = 260;

  // Assignment rules:
  DG := IP3;
  Raplc := APLC/(Kp + APLC);
  Rpkc := DG/(Kd + DG)*Ca_Cyt/(Kr + Ca_Cyt);
  Rgalpha_gtp := Galpha_GTP^n/(Kg^n + Galpha_GTP^n);
  Rdg := DG^m/(Kd^m + DG^m);
  Rip3 := IP3^3/(Ks^3 + IP3^3);
  Rcyt1 := Ca_Cyt/(Kc1 + Ca_Cyt);
  Rcyt2 := Ca_Cyt/(Kc2 + Ca_Cyt);
  Rer := Ca_ER^w/(Ker^w + Ca_ER^w);
  PLC := Cplc_total - APLC;

  // Reactions:
  R1: => Galpha_GTP; Cytosol*k0;  // isVersionOf GO:0006417
  R2: => Galpha_GTP; Cytosol*k1*Galpha_GTP;  // isVersionOf GO:0045745
  R3: Galpha_GTP => ; Cytosol*k2*Raplc*Galpha_GTP;  // isVersionOf GO:0003924
  R4: Galpha_GTP => ; Cytosol*k3*Rpkc*Galpha_GTP;  // isVersionOf GO:0045744
  R5: => APLC; Cytosol*k4*Rgalpha_gtp*Rdg*PLC;  // modifiers: PLC; isVersionOf GO:0016004
  R6: APLC => ; Cytosol*k5*APLC;  // isVersionOf GO:0004859
  R7: => IP3; Cytosol*k6*APLC;  // modifiers: APLC; isVersionOf GO:0007200 GO:0004435; ec-code:3.1.4.11
  R8: IP3 => ; Cytosol*k7*IP3;  // isVersionOf GO:0032961
  R9: 0.001 Ca_ER -> 0.01 Ca_Cyt; ER*(k8*Rip3*Rer - k9*Rcyt1);  // isVersionOf GO:0006816
  R10: 0.05 Ca_Cyt => ; Cytosol*k10*Rcyt2;  // isVersionOf GO:0006816
  R11: => 0.05 Ca_Cyt; Cytosol*k11;  // isVersionOf GO:0006816

  // Unit definitions:
  unit substance = 1e-9 mole; substance is "nano mole";
end
