// SBML level 2 version 1
// This model was downloaded from BioModels Database
// http://www.ebi.ac.uk/biomodels/

model Weimann2004_CircadianOscillator()
  // The model reproduces the time profile of the species as depicted in Fig 3A of the paper. Model successfully tested on MathSBML and Jarnac.
  // biomodels.db:MODEL8378813456
  // biomodels.db:BIOMD0000000170
  // isDescribedBy pubmed:15347590
  // isPartOf kegg.pathway:hsa04710
  // GO:0007623
  // hasTaxon taxonomy:40674

  // Compartments:
  compartment Nucleus = 1;
  compartment Cytoplasm = 1;

  // Species:
  species y1 in Cytoplasm = 0.2; y1 is "Per2 or Cry mRNA";  // encodes uniprot:O15055 uniprot:Q16526; isVersionOf CHEBI:33699 kegg.compound:C00046
  species y2 in Cytoplasm = 0; y2 is "PER2_CRY_complex_cytoplasm";  // hasPart uniprot:O15055 uniprot:Q16526
  species y3 in Nucleus = 1.1; y3 is "PER2_CRY_complex_nucleus";  // hasPart uniprot:O15055 uniprot:Q16526
  species y4 in Cytoplasm = 0.8; y4 is "Bmal1 mRNA";  // isVersionOf CHEBI:33699 kegg.compound:C00046; encodes uniprot:Q8IUT4
  species y5 in Cytoplasm = 1; y5 is "BMAL1_cytoplasm";  // isVersionOf uniprot:Q8IUT4
  species y6 in Nucleus = 1; y6 is "BMAL1_nucleus";  // isVersionOf uniprot:Q8IUT4
  species y7 in Nucleus = 1.05; y7 is "Active BMAL1";  // isVersionOf uniprot:Q8IUT4

  // Parameters:
  trans_per2_cry has nM_per_hour;
  v1b = 9 nM_per_hour;
  c = 0.01 nM;
  k1b = 1 nM;
  k1i = 0.56 nM;
  hill_coeff = 8 dimensionless;
  trans_Bmal1 has nM_per_hour;
  v4b = 3.6 nM_per_hour;
  r = 3 dimensionless;
  k4b = 2.16 nM;
  y5_y6_y7 has nM;
  k1d = 0.12 time_inverse;
  k2b = 0.3 nM_inv_hr_inv;
  q = 2 dimensionless;
  k2d = 0.05 time_inverse;
  k2t = 0.24 time_inverse;
  k3t = 0.02 time_inverse;
  k3d = 0.12 time_inverse;
  k4d = 0.75 time_inverse;
  k5b = 0.24 time_inverse;
  k5d = 0.06 time_inverse;
  k5t = 0.45 time_inverse;
  k6t = 0.06 time_inverse;
  k6d = 0.12 time_inverse;
  k6a = 0.09 time_inverse;
  k7a = 0.003 time_inverse;
  k7d = 0.09 time_inverse;

  // Assignment rules:
  trans_per2_cry := v1b*(y7 + c)/(k1b*(1 + (y3/k1i)^hill_coeff) + y7 + c);
  trans_Bmal1 := v4b*y3^r/(k4b^r + y3^r);
  y5_y6_y7 := y5 + y6 + y7;

  // Reactions:
  per2_cry_transcription: => y1; Cytoplasm*trans_per2_cry;  // isVersionOf GO:0006351
  per2_cry_mRNA_degradation: y1 => ; Cytoplasm*k1d*y1;  // isVersionOf GO:0006402
  per2_cry_complex_formation: => y2; Cytoplasm*k2b*y1^q;  // modifiers: y1; isVersionOf GO:0046982
  cytoplasmic_per2_cry_complex_degradation: y2 => ; Cytoplasm*k2d*y2;  // isVersionOf GO:0044257
  per2_cry_nuclear_import: y2 => y3; Cytoplasm*k2t*y2;  // isVersionOf GO:0051170
  per2_cry_nuclear_export: y3 => y2; Nucleus*k3t*y3;  // isVersionOf GO:0051168
  nuclear_per2_cry_complex_degradation: y3 => ; Nucleus*k3d*y3;  // isVersionOf GO:0044257
  Bmal1_transcription: => y4; Cytoplasm*trans_Bmal1;  // isVersionOf GO:0006351
  Bmal1_mRNA_degradation: y4 => ; Cytoplasm*k4d*y4;  // isVersionOf GO:0006402
  BMAL1_translation: => y5; Cytoplasm*k5b*y4;  // modifiers: y4; isVersionOf GO:0006412
  cytoplasmic_BMAL1_degradation: y5 => ; Cytoplasm*k5d*y5;  // isVersionOf GO:0044257
  BMAL1_nuclear_import: y5 => y6; Cytoplasm*k5t*y5;  // isVersionOf GO:0051170
  BMAL1_nuclear_export: y6 => y5; Nucleus*k6t*y6;  // isVersionOf GO:0051168
  nuclear_BMAL1_degradation: y6 => ; Nucleus*k6d*y6;  // isVersionOf GO:0044257
  BMAL1_activation: y6 => y7; Nucleus*k6a*y6;  // isVersionOf GO:0051091
  BMAL1_deactivation: y7 => y6; Nucleus*k7a*y7;  // isVersionOf GO:0043433
  Active_BMAL1_degradation: y7 => ; Nucleus*k7d*y7;  // isVersionOf GO:0044257

  // Unit definitions:
  unit substance = 1e-9 mole; substance is "nano mole";
  unit time = 3600 second; time is "hour";
  unit nM = 1e-9 mole / litre;
  unit nM_per_hour = 1e-9 mole / (litre * 3600 second);
  unit time_inverse = 1 / (3600 second); time_inverse is "hr_inv";
  unit nM_inv_hr_inv = litre / (1e-9 mole * 3600 second);
end
