// SBML level 2 version 4
// This model was downloaded from BioModels Database
// http://www.ebi.ac.uk/biomodels/

model BIOMD0000000458()
  // Smallbone2013 - Serine biosynthesis
  // Kinetic modelling of metabolic pathways in application to Serine biosynthesis.
  // This model is described in the article:
  // Kinetic Modeling of Metabolic Pathways: Application to Serine Biosynthesis
  // Kieran Smallbone, Natalie J. Stanford
  // Methods in Molecular Biology. 2013; 985:113-121
  // Abstract:
  // In this chapter, we describe the steps needed to create a kinetic model of a metabolic pathway using kinetic data from both experimental measurements and literature review. Our methodology is presented by using the example of serine biosynthesis in E. coli.
  // As there are no plots to be reproduced as curation figure, table 6 and 7 that corresponds to steady state concentration of metabolite and steady state fluxes of reactions has been reproduced.
  // This model is hosted on BioModels Database and identified by: BIOMD0000000458 .
  // To cite BioModels Database, please use: BioModels Database: An enhanced, curated and annotated resource for published quantitative kinetic models .
  // To the extent possible under law, all copyright and related or neighbouring rights to this encoded model have been dedicated to the public domain worldwide. Please refer to CC0 Public Domain Dedication for more information.
  // biomodels.db:MODEL1203210000
  // biomodels.db:BIOMD0000000458
  // isDescribedBy pubmed:23417802
  // hasTaxon taxonomy:562
  // isVersionOf GO:0006564

  // Compartments:
  compartment cell = 1;  // GO:0005622

  // Species:
  species $p3g in cell = 2.36; p3g is "3-phosphoglycerate";  // CHEBI:58272
  species php in cell = 0.6; php is "phosphohydroxypyruvate";  // CHEBI:18110
  species pser in cell = 0.09; pser is "phosphoserine";  // CHEBI:57524
  species $ser in cell = 4.9; ser is "serine";  // CHEBI:17115
  species $serA in cell = 1.15;  // uniprot:P0A9T0
  species $serC in cell = 0.1;  // uniprot:P23721
  species $serB in cell = 0.25;  // uniprot:P0AGB0

  // Reactions:
  PDH: $p3g -> php; cell*serA*kcatA*(p3g/KAp3g)/(1 + p3g/KAp3g + php/KAphp)/(1 + ser/KiAser); PDH is "phosphoglycerate dehydrogenase";  // modifiers: serA, ser; ec-code:1.1.1.95
    kcatA = 0.55 per_s; KAp3g = 1.2 mM; KAphp = 0.0032 mM; KiAser = 0.0038 mM;
  PSA: php -> pser; cell*serC*kcatC*(php/KCphp)/(1 + php/KCphp + pser/KCpser); PSA is "phosphoserine aminotransferase";  // modifiers: serC; ec-code:2.6.1.52
    kcatC = 1.75 per_s; KCphp = 0.0015 mM; KCpser = 0.0017 mM;
  PSP: pser -> $ser; cell*serB*kcatB*(pser/KBpser)/(1 + pser/KBpser + ser/KBser); PSP is "phosphoserine phosphatase";  // modifiers: serB; ec-code:3.1.3.3
    kcatB = 1.43 per_s; KBpser = 0.0015 mM; KBser = 0.15 mM;

  // Unit definitions:
  unit substance = 1e-3 mole; substance is "mmol";
  unit mM = 1e-3 mole / litre;
  unit per_s = 1 / second;
end
