// SBML level 3 version 2

model Haberichter2007_cellcycle()
  // This model is according to the paper A systems biology dynamical model of mammalian G1 cell cycle progression. Supplementary Figure 2A has been reproduced by the MathSBML and CellDesigner. All the data of this model are from the set 2 of Supplementary talbe2.
  // To the extent possible under law, all copyright and related or neighbouring rights to this encoded model have been dedicated to the public domain worldwide. Please refer to CC0 Public Domain Dedication for more information.
  // In summary, you are entitled to use this encoded model in absolutely any manner you deem suitable, verbatim, or with modification, alone or embedded it in a larger context, redistribute it, commercially or not, in a restricted way or not.
  // To cite BioModels Database, please use: Li C, Donizelli M, Rodriguez N, Dharuri H, Endler L, Chelliah V, Li L, He E, Henry A, Stefan MI, Snoep JL, Hucka M, Le Novère N, Laibe C (2010) BioModels Database: An enhanced, curated and annotated resource for published quantitative kinetic models. BMC Syst Biol., 4:92.
  // biomodels.db:MODEL3734058719
  // biomodels.db:BIOMD0000000109
  // isDescribedBy pubmed:17299420
  // hasTaxon taxonomy:40674
  // isVersionOf GO:0051318
  // hasVersion kegg.pathway:hsa04110
  // model units - substance: substance, time: time, volume: volume, area: area, length: metre, extent: substance

  // Compartments:
  compartment X = 1 volume; X is "cell";  // isVersionOf GO:0005623

  // Species:
  species APCC in X = 24582.9/X;  // isVersionOf GO:0005680; hasVersion uniprot:Q9UJX6
  species APCCYCdk1Y00YCdk1Y01YInt in X = 104.388/X;  // hasPart uniprot:Q9UJX6 uniprot:P06493 interpro:IPR015453
  species APCCYCdk1Y10YCdk1Y11YInt in X = 0;  // hasPart uniprot:P06493 uniprot:Q9UJX6 interpro:IPR015453
  species APCCYCdk2Y000YCdk2Y002YInt in X = 52.8191/X;  // hasPart uniprot:P24941 uniprot:Q9UJX6 interpro:IPR015453
  species APCCYCdk2Y010YCdk2Y012YInt in X = 0;  // hasPart uniprot:Q9UJX6 uniprot:P24941 interpro:IPR015453
  species APCCYCdk2Y100YCdk2Y102YInt in X = 90.5091/X;  // hasPart uniprot:Q9UJX6 uniprot:P24941 interpro:IPR015453 interpro:IPR015456
  species APCCYCdk2Y110YCdk2Y112YInt in X = 0;  // hasPart uniprot:Q9UJX6 uniprot:P24941 interpro:IPR015453 interpro:IPR015456
  species APCCYCyclinAYInt in X = 8.79462/X;  // hasPart uniprot:Q9UJX6 interpro:IPR015453
  species APCCYEmi1 in X = 5160.61/X;  // hasPart uniprot:Q9UJX6 uniprot:Q9UKT4
  species Cdk1Y00 in X = 98550.6/X;  // hasVersion uniprot:P06493
  species Cdk1Y01 in X = 1345.01/X;  // hasPart uniprot:P06493 interpro:IPR015453
  species Cdk1Y10 in X = 0;  // hasVersion uniprot:P06493
  species Cdk1Y11 in X = 0;  // hasPart uniprot:P06493 interpro:IPR015453
  species Cdk1Y11YpRbY10YpRbY20YInt in X = 0;  // hasPart uniprot:P06493 uniprot:P06400 interpro:IPR015453
  species Cdk1Y11YpRbY11YpRbY21YInt in X = 0;  // hasPart uniprot:P06493 uniprot:P06400 interpro:IPR015453 interpro:IPR015633
  species Cdk2Y000 in X = 33942/X;  // hasVersion uniprot:P24941
  species Cdk2Y001 in X = 2176.46/X;  // hasPart uniprot:P24941 uniprot:P24864
  species Cdk2Y002 in X = 680.557/X;  // hasPart uniprot:P24941
  species Cdk2Y010 in X = 0;  // hasPart uniprot:P24941
  species Cdk2Y011 in X = 0;  // hasPart uniprot:P24941 uniprot:P24864
  species Cdk2Y011YpRbY10YpRbY20YInt in X = 0;  // hasPart uniprot:P24864 uniprot:P24941 uniprot:P06400
  species Cdk2Y011YpRbY11YpRbY21YInt in X = 0;  // hasPart uniprot:P24864 uniprot:P24941 uniprot:P06400 interpro:IPR015633
  species Cdk2Y012 in X = 0;  // hasPart uniprot:P24941 interpro:IPR015453
  species Cdk2Y012YpRbY10YpRbY20YInt in X = 0;  // hasPart uniprot:P24941 uniprot:P06400 interpro:IPR015453
  species Cdk2Y012YpRbY11YpRbY21YInt in X = 0;  // hasPart uniprot:P24941 uniprot:P06400 interpro:IPR015453 interpro:IPR015633
  species Cdk2Y100 in X = 58162/X;  // hasPart uniprot:P24941 interpro:IPR015456
  species Cdk2Y101 in X = 3729.51/X;  // hasPart uniprot:P24941 uniprot:P24864 interpro:IPR015456
  species Cdk2Y102 in X = 1166.18/X;  // hasPart uniprot:P24941 interpro:IPR015456 interpro:IPR015453
  species Cdk2Y110 in X = 0;  // hasPart uniprot:P24941 interpro:IPR015456
  species Cdk2Y111 in X = 0;  // hasPart uniprot:P24941 uniprot:P24864 interpro:IPR015456
  species Cdk2Y112 in X = 0;  // hasPart uniprot:P24941 interpro:IPR015456 interpro:IPR015453
  species Cdk4Y00 in X = 46551.9/X;  // hasVersion uniprot:P30285
  species Cdk4Y01 in X = 6547.64/X;  // hasPart uniprot:P30285 uniprot:Q5SCB5
  species Cdk4Y01YpRbY00YpRbY10YInt in X = 0;  // hasPart uniprot:P30285 uniprot:Q5SCB5 uniprot:P06400
  species Cdk4Y01YpRbY01YpRbY11YInt in X = 0;  // hasPart uniprot:P30285 uniprot:Q5SCB5 uniprot:P06400 interpro:IPR015633
  species Cdk4Y10 in X = 41117.2/X;  // hasPart uniprot:P30285 interpro:IPR015456
  species Cdk4Y11 in X = 5783.23/X;  // hasPart uniprot:P30285 uniprot:Q5SCB5 interpro:IPR015456
  species CyclinA in X = 113.316/X;  // isVersionOf interpro:IPR015453
  species CyclinD in X = 14753.7/X;  // isHomologTo uniprot:Q5SCB5
  species CyclinE in X = 191.985/X;  // hasVersion uniprot:P24864
  species E2F in X = 546.211/X;  // isVersionOf interpro:IPR015633
  species Emi1 in X = 248.046/X;  // hasVersion uniprot:Q9UKT4
  species p27 in X = 14150.9/X;  // isVersionOf interpro:IPR015456
  species pRbY00 in X = 30000/X;  // hasVersion uniprot:P06400
  species pRbY01 in X = 0;  // isVersionOf GO:0035189
  species pRbY10 in X = 28583.4/X;  // hasVersion uniprot:P06400
  species pRbY11 in X = 1416.59/X;  // hasPart uniprot:P06400; isVersionOf GO:0035189
  species pRbY20 in X = 0;  // hasVersion uniprot:P06400
  species pRbY21 in X = 0;  // hasPart uniprot:P06400; isVersionOf GO:0035189
  species totalYCyclinYD in X;
  species totalYCyclinYE in X;
  species totalYCyclinYA in X;
  species totalYp27 in X;
  species hypophosphorylatedYpRb in X;
  species hyperphosphorylatedYpRb in X;
  species totalYEmi1 in X;
  species activeYCdk2 in X;

  // Parameters:
  kYact = 0;
  ksYCyclinD = 1354.231;
  ksYp27 = 195.4716;
  kdYp27 = 0.001575;
  kd1Yp27 = 0.071149;
  ks0YCyclinE = 254.0742;
  ks1YCyclinE = 980.611;
  ksMYCyclinE = 9992.647;
  ks0YCyclinA = 499.9437;
  ks1YCyclinA = 7999.996;
  ksMYCyclinA = 4064.384;
  ks0YE2F = 6.927086;
  ks1YE2F = 65.44282;
  ksMYE2F = 9818.78;
  kdYE2F = 0.006465;
  kd0YE2F = 0.002229;
  ks0YEmi1 = 2.004744;
  ks1YEmi1 = 1788.517;
  ksMYEmi1 = 9608.162;
  kdYEmi1 = 0.018158;
  kbYCyclinDYYCdk4 = 1.43e-6;
  kbYp27YYCdk4 = 6.34e-6;
  kbYp27YYCdk2 = 1.23e-5;
  k1Yact = 0.01075;
  timeYModifier = 240.0637;
  kbYCyclinEYYCdk2 = 5.01e-5;
  kbYCyclinAYYCdk2 = 9.52e-5;
  kbYCyclinAYYCdk1 = 6.48e-5;
  kbYD4YYpRb = 3.15e-5;
  kupYD4YYpRb = 1.694662;
  kbYE2YYpRb = 5.74e-5;
  kupYE2YYpRb = 4.78271;
  kbYA2YYpRb = 6.25e-5;
  kupYA2YYpRb = 0.200091;
  kbYA1YYpRb = 6.73e-5;
  kupYA1YYpRb = 0.202132;
  ktYpRbYYDephos = 0.023194;
  kbYE2FYYpRb = 9.66e-6;
  kbYEmi1YYAPCC = 0.0001;
  kbYAPCCYYCyclinA = 1.61e-5;
  kudYAPCCYYCyclinA = 4.999555;
  kdYCyclinD = 0.05;
  kdYCyclinE = 0.05;
  kdYCyclinA = 0.05;
  kuYCyclinDYYCdk4 = 0.1;
  kuYp27YYCdk4 = 0.1;
  kuYCyclinEYYCdk2 = 0.1;
  kuYp27YYCdk2 = 0.1;
  kuYCyclinAYYCdk2 = 0.1;
  kuYCyclinAYYCdk1 = 0.1;
  kuYD4YYpRb = 0.1;
  kuYE2YYpRb = 0.1;
  kuYA2YYpRb = 0.1;
  kuYA1YYpRb = 0.1;
  kuYE2FYYpRb = 0.1;
  kuYEmi1YYAPCC = 0.1;
  kuYAPCCYYCyclinA = 0.1;

  // Assignment rules:
  totalYCyclinYD := CyclinD + Cdk4Y01 + Cdk4Y11;
  totalYCyclinYE := CyclinE + Cdk2Y001 + Cdk2Y011 + Cdk2Y101 + Cdk2Y111;
  totalYCyclinYA := CyclinA + Cdk1Y01 + Cdk1Y11 + Cdk2Y002 + Cdk2Y012 + Cdk2Y102 + Cdk2Y112;
  totalYp27 := p27 + Cdk4Y10 + Cdk4Y11 + Cdk2Y100 + Cdk2Y101 + Cdk2Y102 + Cdk2Y110 + Cdk2Y111 + Cdk2Y112;
  hypophosphorylatedYpRb := pRbY10 + pRbY11;
  hyperphosphorylatedYpRb := pRbY20 + pRbY21;
  activeYCdk2 := Cdk2Y011 + Cdk2Y012;
  totalYEmi1 := Emi1 + APCCYEmi1;
  ksYCyclinE := ks0YCyclinE + ks1YCyclinE*E2F/(ksMYCyclinE + E2F);
  ksYCyclinA := ks0YCyclinA + ks1YCyclinA*E2F/(ksMYCyclinA + E2F);
  ksYEmi1 := ks0YEmi1 + ks1YEmi1*E2F/(ksMYEmi1 + E2F);
  ksYE2F := ks0YE2F + ks1YE2F*E2F/(ksMYE2F + E2F);

  // Reactions:
  rxnY001: => CyclinD; ksYCyclinD*X;  // isVersionOf GO:0009058
  rxnY002: CyclinD => ; kdYCyclinD*CyclinD*X;  // isVersionOf GO:0044257
  rxnY003: Cdk4Y01 => Cdk4Y00; kdYCyclinD*Cdk4Y01*X;  // isVersionOf GO:0043241
  rxnY004: Cdk4Y11 => Cdk4Y10; kdYCyclinD*Cdk4Y11*X;  // isVersionOf GO:0043241
  rxnY005: => p27; ksYp27*X;  // isVersionOf GO:0009058
  rxnY006: p27 => ; kdYp27*p27*X;  // isVersionOf GO:0044257
  rxnY007: Cdk4Y10 => Cdk4Y00; kdYp27*Cdk4Y10*X;  // isVersionOf GO:0043241
  rxnY008: Cdk4Y11 => Cdk4Y01; kdYp27*Cdk4Y11*X;  // isVersionOf GO:0043241
  rxnY009: Cdk2Y100 => Cdk2Y000; kdYp27*Cdk2Y100*X;  // isVersionOf GO:0043241
  rxnY010: Cdk2Y101 => Cdk2Y001; kdYp27*Cdk2Y101*X;  // isVersionOf GO:0043241
  rxnY011: Cdk2Y102 => Cdk2Y002; kdYp27*Cdk2Y102*X;  // isVersionOf GO:0043241
  rxnY012: Cdk2Y110 => Cdk2Y010; kdYp27*Cdk2Y110*X;  // isVersionOf GO:0043241
  rxnY013: Cdk2Y111 => Cdk2Y011; kd1Yp27*Cdk2Y111*X;  // isVersionOf GO:0043241
  rxnY014: Cdk2Y112 => Cdk2Y012; kdYp27*Cdk2Y112*X;  // isVersionOf GO:0043241
  rxnY015: => CyclinE; ksYCyclinE*X;  // isVersionOf GO:0006412
  rxnY016: CyclinE => ; kdYCyclinE*CyclinE*X;  // isVersionOf GO:0044257
  rxnY017: Cdk2Y001 => Cdk2Y000; kdYCyclinE*Cdk2Y001*X;  // isVersionOf GO:0043241
  rxnY018: Cdk2Y101 => Cdk2Y100; kdYCyclinE*Cdk2Y101*X;  // isVersionOf GO:0043241
  rxnY019: Cdk2Y011 => Cdk2Y010; kdYCyclinE*Cdk2Y011*X;  // isVersionOf GO:0043241
  rxnY020: Cdk2Y111 => Cdk2Y110; kdYCyclinE*Cdk2Y111*X;  // isVersionOf GO:0043241
  rxnY021: => CyclinA; ksYCyclinA*X;  // isVersionOf GO:0006412
  rxnY022: CyclinA => ; kdYCyclinA*CyclinA*X;  // isVersionOf GO:0044257
  rxnY023: Cdk1Y01 => Cdk1Y00; kdYCyclinA*Cdk1Y01*X;  // isVersionOf GO:0043241
  rxnY024: Cdk1Y11 => Cdk1Y10; kdYCyclinA*Cdk1Y11*X;  // isVersionOf GO:0043241
  rxnY025: Cdk2Y002 => Cdk2Y000; kdYCyclinA*Cdk2Y002*X;  // isVersionOf GO:0043241
  rxnY026: Cdk2Y102 => Cdk2Y100; kdYCyclinA*Cdk2Y102*X;  // isVersionOf GO:0043241
  rxnY027: Cdk2Y012 => Cdk2Y010; kdYCyclinA*Cdk2Y012*X;  // isVersionOf GO:0043241
  rxnY028: Cdk2Y112 => Cdk2Y110; kdYCyclinA*Cdk2Y112*X;  // isVersionOf GO:0043241
  rxnY029: => E2F; ksYE2F*X;  // isVersionOf GO:0006412
  rxnY030: E2F => ; kd0YE2F*E2F*X;  // isVersionOf GO:0044257
  rxnY031: pRbY01 => pRbY00; kdYE2F*pRbY01*X;  // isVersionOf GO:0043241
  rxnY032: pRbY11 => pRbY10; kdYE2F*pRbY11*X;  // isVersionOf GO:0043241
  rxnY033: pRbY21 => pRbY20; kdYE2F*pRbY21*X;  // isVersionOf GO:0043241
  rxnY034: => Emi1; ksYEmi1*X;  // isVersionOf GO:0006412
  rxnY035: Emi1 => ; kdYEmi1*Emi1*X;  // isVersionOf GO:0044257
  rxnY036: APCCYEmi1 => APCC; kdYEmi1*APCCYEmi1*X;  // isVersionOf GO:0043241
  rxnY037: Cdk4Y00 + CyclinD => Cdk4Y01; kbYCyclinDYYCdk4*Cdk4Y00*CyclinD*X;  // isVersionOf GO:0045737 GO:0006461
  rxnY038: Cdk4Y01 => Cdk4Y00 + CyclinD; kuYCyclinDYYCdk4*Cdk4Y01*X;  // isVersionOf GO:0043241
  rxnY039: Cdk4Y10 + CyclinD => Cdk4Y11; kbYCyclinDYYCdk4*Cdk4Y10*CyclinD*X;  // isVersionOf GO:0045737 GO:0006461
  rxnY040: Cdk4Y11 => Cdk4Y10 + CyclinD; kuYCyclinDYYCdk4*Cdk4Y11*X;  // isVersionOf GO:0043241
  rxnY041: Cdk4Y00 + p27 => Cdk4Y10; kbYp27YYCdk4*Cdk4Y00*p27*X;  // isVersionOf GO:0004861 GO:0006461
  rxnY042: Cdk4Y10 => Cdk4Y00 + p27; kuYp27YYCdk4*Cdk4Y10*X;  // isVersionOf GO:0043241
  rxnY043: Cdk4Y01 + p27 => Cdk4Y11; kbYp27YYCdk4*Cdk4Y01*p27*X;  // isVersionOf GO:0004861 GO:0006461
  rxnY044: Cdk4Y11 => Cdk4Y01 + p27; kuYp27YYCdk4*Cdk4Y11*X;  // isVersionOf GO:0043241
  rxnY045: Cdk2Y000 + p27 => Cdk2Y100; kbYp27YYCdk2*Cdk2Y000*p27*X;  // isVersionOf GO:0004861 GO:0006461
  rxnY046: Cdk2Y100 => Cdk2Y000 + p27; kuYp27YYCdk2*Cdk2Y100*X;  // isVersionOf GO:0043241
  rxnY047: Cdk2Y001 + p27 => Cdk2Y101; kbYp27YYCdk2*Cdk2Y001*p27*X;  // isVersionOf GO:0004861 GO:0006461
  rxnY048: Cdk2Y101 => Cdk2Y001 + p27; kuYp27YYCdk2*Cdk2Y101*X;  // isVersionOf GO:0043241
  rxnY049: Cdk2Y002 + p27 => Cdk2Y102; kbYp27YYCdk2*Cdk2Y002*p27*X;  // isVersionOf GO:0006461 GO:0004861
  rxnY050: Cdk2Y102 => Cdk2Y002 + p27; kuYp27YYCdk2*Cdk2Y102*X;  // isVersionOf GO:0043241
  rxnY051: Cdk2Y010 + p27 => Cdk2Y110; kbYp27YYCdk2*Cdk2Y010*p27*X;  // isVersionOf GO:0004861 GO:0006461
  rxnY052: Cdk2Y110 => Cdk2Y010 + p27; kuYp27YYCdk2*Cdk2Y110*X;  // isVersionOf GO:0043241
  rxnY053: Cdk2Y011 + p27 => Cdk2Y111; kbYp27YYCdk2*Cdk2Y011*p27*X;  // isVersionOf GO:0006461 GO:0004861
  rxnY054: Cdk2Y111 => Cdk2Y011 + p27; kuYp27YYCdk2*Cdk2Y111*X;  // isVersionOf GO:0043241
  rxnY055: Cdk2Y012 + p27 => Cdk2Y112; kbYp27YYCdk2*Cdk2Y012*p27*X;  // isVersionOf GO:0006461 GO:0004861
  rxnY056: Cdk2Y112 => Cdk2Y012 + p27; kuYp27YYCdk2*Cdk2Y112*X;  // isVersionOf GO:0043241
  rxnY057: Cdk2Y000 => Cdk2Y010; kYact*Cdk2Y000*X;  // isVersionOf GO:0032147
  rxnY058: Cdk2Y100 => Cdk2Y110; kYact*Cdk2Y100*X;  // isVersionOf GO:0032147
  rxnY059: Cdk2Y001 => Cdk2Y011; kYact*Cdk2Y001*X;  // isVersionOf GO:0032147
  rxnY060: Cdk2Y101 => Cdk2Y111; kYact*Cdk2Y101*X;  // isVersionOf GO:0032147
  rxnY061: Cdk2Y002 => Cdk2Y012; kYact*Cdk2Y002*X;  // isVersionOf GO:0032147
  rxnY062: Cdk2Y102 => Cdk2Y112; kYact*Cdk2Y102*X;  // isVersionOf GO:0032147
  rxnY063: Cdk2Y000 + CyclinE => Cdk2Y001; kbYCyclinEYYCdk2*Cdk2Y000*CyclinE*X;  // isVersionOf GO:0006461 GO:0045737
  rxnY064: Cdk2Y001 => Cdk2Y000 + CyclinE; kuYCyclinEYYCdk2*Cdk2Y001*X;  // isVersionOf GO:0043241
  rxnY065: Cdk2Y100 + CyclinE => Cdk2Y101; kbYCyclinEYYCdk2*Cdk2Y100*CyclinE*X;  // isVersionOf GO:0045737 GO:0006461
  rxnY066: Cdk2Y101 => Cdk2Y100 + CyclinE; kuYCyclinEYYCdk2*Cdk2Y101*X;  // isVersionOf GO:0043241
  rxnY067: Cdk2Y010 + CyclinE => Cdk2Y011; kbYCyclinEYYCdk2*Cdk2Y010*CyclinE*X;  // isVersionOf GO:0006461 GO:0045737
  rxnY068: Cdk2Y011 => Cdk2Y010 + CyclinE; kuYCyclinEYYCdk2*Cdk2Y011*X;  // isVersionOf GO:0043241
  rxnY069: Cdk2Y110 + CyclinE => Cdk2Y111; kbYCyclinEYYCdk2*Cdk2Y110*CyclinE*X;  // isVersionOf GO:0045737 GO:0006461
  rxnY070: Cdk2Y111 => Cdk2Y110 + CyclinE; kuYCyclinEYYCdk2*Cdk2Y111*X;  // isVersionOf GO:0043241
  rxnY071: Cdk2Y000 + CyclinA => Cdk2Y002; kbYCyclinAYYCdk2*Cdk2Y000*CyclinA*X;  // isVersionOf GO:0045737 GO:0006461
  rxnY072: Cdk2Y002 => Cdk2Y000 + CyclinA; kuYCyclinAYYCdk2*Cdk2Y002*X;  // isVersionOf GO:0043241
  rxnY073: Cdk2Y100 + CyclinA => Cdk2Y102; kbYCyclinAYYCdk2*Cdk2Y100*CyclinA*X;  // isVersionOf GO:0045737 GO:0006461
  rxnY074: Cdk2Y102 => Cdk2Y100 + CyclinA; X*kuYCyclinAYYCdk2*Cdk2Y102;  // isVersionOf GO:0043241
  rxnY075: Cdk2Y010 + CyclinA => Cdk2Y012; X*kbYCyclinAYYCdk2*Cdk2Y010*CyclinA;  // isVersionOf GO:0045737 GO:0006461
  rxnY076: Cdk2Y012 => Cdk2Y010 + CyclinA; X*kuYCyclinAYYCdk2*Cdk2Y012;  // isVersionOf GO:0043241
  rxnY077: Cdk2Y110 + CyclinA => Cdk2Y112; X*kbYCyclinAYYCdk2*Cdk2Y110*CyclinA;  // isVersionOf GO:0006461 GO:0045737
  rxnY078: Cdk2Y112 => Cdk2Y110 + CyclinA; X*kuYCyclinAYYCdk2*Cdk2Y112;  // isVersionOf GO:0043241
  rxnY079: Cdk1Y00 => Cdk1Y10; X*kYact*Cdk1Y00;  // isVersionOf GO:0043241 GO:0032147
  rxnY080: Cdk1Y01 => Cdk1Y11; X*kYact*Cdk1Y01;  // isVersionOf GO:0043241 GO:0032147
  rxnY081: Cdk1Y00 + CyclinA => Cdk1Y01; X*kbYCyclinAYYCdk1*Cdk1Y00*CyclinA;  // isVersionOf GO:0006461 GO:0045737
  rxnY082: Cdk1Y01 => Cdk1Y00 + CyclinA; X*kuYCyclinAYYCdk1*Cdk1Y01;  // isVersionOf GO:0043241
  rxnY083: Cdk1Y10 + CyclinA => Cdk1Y11; X*kbYCyclinAYYCdk1*Cdk1Y10*CyclinA;  // isVersionOf GO:0006461 GO:0045737
  rxnY084: Cdk1Y11 => Cdk1Y10 + CyclinA; X*kuYCyclinAYYCdk1*Cdk1Y11;  // isVersionOf GO:0043241
  rxnY085: pRbY00 + Cdk4Y01 => Cdk4Y01YpRbY00YpRbY10YInt; X*kbYD4YYpRb*pRbY00*Cdk4Y01;  // isVersionOf GO:0006461
  rxnY086: Cdk4Y01YpRbY00YpRbY10YInt => pRbY00 + Cdk4Y01; X*kuYD4YYpRb*Cdk4Y01YpRbY00YpRbY10YInt;  // isVersionOf GO:0043241
  rxnY087: Cdk4Y01YpRbY00YpRbY10YInt => pRbY10 + Cdk4Y01; X*kupYD4YYpRb*Cdk4Y01YpRbY00YpRbY10YInt;  // isVersionOf GO:0043241
  rxnY088: pRbY01 + Cdk4Y01 => Cdk4Y01YpRbY01YpRbY11YInt; X*kbYD4YYpRb*pRbY01*Cdk4Y01;  // isVersionOf GO:0006461
  rxnY089: Cdk4Y01YpRbY01YpRbY11YInt => pRbY01 + Cdk4Y01; X*kuYD4YYpRb*Cdk4Y01YpRbY01YpRbY11YInt;  // isVersionOf GO:0043241
  rxnY090: Cdk4Y01YpRbY01YpRbY11YInt => pRbY11 + Cdk4Y01; X*kupYD4YYpRb*Cdk4Y01YpRbY01YpRbY11YInt;  // isVersionOf GO:0043241
  rxnY091: pRbY10 + Cdk2Y011 => Cdk2Y011YpRbY10YpRbY20YInt; X*kbYE2YYpRb*pRbY10*Cdk2Y011;  // isVersionOf GO:0006461
  rxnY092: Cdk2Y011YpRbY10YpRbY20YInt => pRbY10 + Cdk2Y011; X*kuYE2YYpRb*Cdk2Y011YpRbY10YpRbY20YInt;  // isVersionOf GO:0043241
  rxnY093: Cdk2Y011YpRbY10YpRbY20YInt => pRbY20 + Cdk2Y011; X*kupYE2YYpRb*Cdk2Y011YpRbY10YpRbY20YInt;  // isVersionOf GO:0043241
  rxnY094: pRbY11 + Cdk2Y011 => Cdk2Y011YpRbY11YpRbY21YInt; X*kbYE2YYpRb*pRbY11*Cdk2Y011;  // isVersionOf GO:0006461
  rxnY095: Cdk2Y011YpRbY11YpRbY21YInt => pRbY11 + Cdk2Y011; X*kuYE2YYpRb*Cdk2Y011YpRbY11YpRbY21YInt;  // isVersionOf GO:0043241
  rxnY096: Cdk2Y011YpRbY11YpRbY21YInt => pRbY21 + Cdk2Y011; X*kupYE2YYpRb*Cdk2Y011YpRbY11YpRbY21YInt;  // isVersionOf GO:0043241
  rxnY097: pRbY10 + Cdk2Y012 => Cdk2Y012YpRbY10YpRbY20YInt; X*kbYA2YYpRb*pRbY10*Cdk2Y012;  // isVersionOf GO:0006461
  rxnY098: Cdk2Y012YpRbY10YpRbY20YInt => pRbY10 + Cdk2Y012; X*kuYA2YYpRb*Cdk2Y012YpRbY10YpRbY20YInt;  // isVersionOf GO:0043241
  rxnY099: Cdk2Y012YpRbY10YpRbY20YInt => pRbY20 + Cdk2Y012; X*kupYA2YYpRb*Cdk2Y012YpRbY10YpRbY20YInt;  // isVersionOf GO:0043241
  rxnY100: pRbY11 + Cdk2Y012 => Cdk2Y012YpRbY11YpRbY21YInt; X*kbYA2YYpRb*pRbY11*Cdk2Y012;  // isVersionOf GO:0006461
  rxnY101: Cdk2Y012YpRbY11YpRbY21YInt => pRbY11 + Cdk2Y012; X*kuYA2YYpRb*Cdk2Y012YpRbY11YpRbY21YInt;  // isVersionOf GO:0043241
  rxnY102: Cdk2Y012YpRbY11YpRbY21YInt => pRbY21 + Cdk2Y012; X*kupYA2YYpRb*Cdk2Y012YpRbY11YpRbY21YInt;  // isVersionOf GO:0043241
  rxnY103: pRbY10 + Cdk1Y11 => Cdk1Y11YpRbY10YpRbY20YInt; X*kbYA1YYpRb*pRbY10*Cdk1Y11;  // isVersionOf GO:0006461
  rxnY104: Cdk1Y11YpRbY10YpRbY20YInt => pRbY10 + Cdk1Y11; X*kuYA1YYpRb*Cdk1Y11YpRbY10YpRbY20YInt;  // isVersionOf GO:0043241
  rxnY105: Cdk1Y11YpRbY10YpRbY20YInt => pRbY20 + Cdk1Y11; X*kupYA1YYpRb*Cdk1Y11YpRbY10YpRbY20YInt;  // isVersionOf GO:0043241
  rxnY106: pRbY11 + Cdk1Y11 => Cdk1Y11YpRbY11YpRbY21YInt; X*kbYA1YYpRb*pRbY10*Cdk1Y11;  // modifiers: pRbY10
  rxnY107: Cdk1Y11YpRbY11YpRbY21YInt => pRbY11 + Cdk1Y11; X*kuYA1YYpRb*Cdk1Y11YpRbY11YpRbY21YInt;  // isVersionOf GO:0043241
  rxnY108: Cdk1Y11YpRbY11YpRbY21YInt => pRbY21 + Cdk1Y11; X*kupYA1YYpRb*Cdk1Y11YpRbY11YpRbY21YInt;  // isVersionOf GO:0043241
  rxnY109: pRbY20 => pRbY00; X*ktYpRbYYDephos*pRbY20;  // isVersionOf GO:0016311
  rxnY110: pRbY21 => pRbY01; X*ktYpRbYYDephos*pRbY21;  // isVersionOf GO:0016311
  rxnY111: pRbY00 + E2F => pRbY01; X*kbYE2FYYpRb*pRbY00*E2F;  // isVersionOf GO:0006461
  rxnY112: pRbY01 => pRbY00 + E2F; X*kuYE2FYYpRb*pRbY01;  // isVersionOf GO:0043241
  rxnY113: pRbY10 + E2F => pRbY11; X*kbYE2FYYpRb*pRbY10*E2F;  // isVersionOf GO:0006461
  rxnY114: pRbY11 => pRbY10 + E2F; X*kuYE2FYYpRb*pRbY11;  // isVersionOf GO:0043241
  rxnY115: pRbY21 => pRbY20 + E2F; X*kuYE2FYYpRb*pRbY21;  // isVersionOf GO:0043241
  rxnY116: APCC + Emi1 => APCCYEmi1; X*kbYEmi1YYAPCC*APCC*Emi1;  // isVersionOf GO:0006461
  rxnY117: APCCYEmi1 => APCC + Emi1; X*kuYEmi1YYAPCC*APCCYEmi1;  // isVersionOf GO:0043241
  rxnY118: CyclinA + APCC => APCCYCyclinAYInt; X*kbYAPCCYYCyclinA*CyclinA*APCC;  // isVersionOf GO:0005515
  rxnY119: APCCYCyclinAYInt => CyclinA + APCC; X*kuYAPCCYYCyclinA*APCCYCyclinAYInt;  // isVersionOf GO:0043241
  rxnY120: APCCYCyclinAYInt => APCC; X*kudYAPCCYYCyclinA*APCCYCyclinAYInt;  // isVersionOf GO:0043241
  rxnY121: Cdk2Y002 + APCC => APCCYCdk2Y000YCdk2Y002YInt; X*kbYAPCCYYCyclinA*Cdk2Y002*APCC;  // isVersionOf GO:0006461
  rxnY122: APCCYCdk2Y000YCdk2Y002YInt => Cdk2Y002 + APCC; X*kuYAPCCYYCyclinA*APCCYCdk2Y000YCdk2Y002YInt;  // isVersionOf GO:0043241
  rxnY123: APCCYCdk2Y000YCdk2Y002YInt => Cdk2Y000 + APCC; X*kudYAPCCYYCyclinA*APCCYCdk2Y000YCdk2Y002YInt;  // isVersionOf GO:0043241
  rxnY124: Cdk2Y102 + APCC => APCCYCdk2Y100YCdk2Y102YInt; X*kbYAPCCYYCyclinA*Cdk2Y102*APCC;  // isVersionOf GO:0006461
  rxnY125: APCCYCdk2Y100YCdk2Y102YInt => Cdk2Y102 + APCC; X*kuYAPCCYYCyclinA*APCCYCdk2Y100YCdk2Y102YInt;  // isVersionOf GO:0043241
  rxnY126: APCCYCdk2Y100YCdk2Y102YInt => Cdk2Y100 + APCC; X*kudYAPCCYYCyclinA*APCCYCdk2Y100YCdk2Y102YInt;  // isVersionOf GO:0043241
  rxnY127: Cdk2Y012 + APCC => APCCYCdk2Y010YCdk2Y012YInt; X*kbYAPCCYYCyclinA*Cdk2Y102*APCC;  // modifiers: Cdk2Y102
  rxnY128: APCCYCdk2Y010YCdk2Y012YInt => Cdk2Y012 + APCC; X*kuYAPCCYYCyclinA*APCCYCdk2Y010YCdk2Y012YInt;  // isVersionOf GO:0043241
  rxnY129: APCCYCdk2Y010YCdk2Y012YInt => Cdk2Y010 + APCC; X*kudYAPCCYYCyclinA*APCCYCdk2Y010YCdk2Y012YInt;  // isVersionOf GO:0043241
  rxnY130: Cdk2Y112 + APCC => APCCYCdk2Y110YCdk2Y112YInt; X*kbYAPCCYYCyclinA*Cdk2Y112*APCC;  // isVersionOf GO:0006461
  rxnY131: APCCYCdk2Y110YCdk2Y112YInt => Cdk2Y112 + APCC; X*kuYAPCCYYCyclinA*APCCYCdk2Y110YCdk2Y112YInt;  // isVersionOf GO:0043241
  rxnY132: APCCYCdk2Y110YCdk2Y112YInt => Cdk2Y110 + APCC; X*kudYAPCCYYCyclinA*APCCYCdk2Y110YCdk2Y112YInt;  // isVersionOf GO:0043241
  rxnY133: Cdk1Y01 + APCC => APCCYCdk1Y00YCdk1Y01YInt; X*kbYAPCCYYCyclinA*Cdk1Y01*APCC;  // isVersionOf GO:0005515
  rxnY134: APCCYCdk1Y00YCdk1Y01YInt + APCC => Cdk1Y01; X*kuYAPCCYYCyclinA*APCCYCdk1Y00YCdk1Y01YInt;  // isVersionOf GO:0005515
  rxnY135: APCCYCdk1Y00YCdk1Y01YInt => Cdk1Y00 + APCC; X*kudYAPCCYYCyclinA*APCCYCdk1Y00YCdk1Y01YInt;  // isVersionOf GO:0043241
  rxnY136: Cdk1Y11 + APCC => APCCYCdk1Y10YCdk1Y11YInt; X*kbYAPCCYYCyclinA*Cdk1Y11*APCC;  // isVersionOf GO:0006461
  rxnY137: APCCYCdk1Y10YCdk1Y11YInt + APCC => Cdk1Y11; X*kuYAPCCYYCyclinA*APCCYCdk1Y10YCdk1Y11YInt;
  rxnY138: APCCYCdk1Y10YCdk1Y11YInt => Cdk1Y10 + APCC; X*kudYAPCCYYCyclinA*APCCYCdk1Y10YCdk1Y11YInt;  // isVersionOf GO:0043241

  // Events:
  // when time >= time_Modifier, kYact=k1Yact, otherwise kYact=0. Here time_Modifier=240.0637 from the set2 of the supplementary table 2.
  at (time > 240.0637): kYact = k1Yact;  // modifier activation; isVersionOf GO:0004693

  // Unit definitions:
  unit time = 60 second; time is "min";
  unit substance = item; substance is "#";
  unit volume = litre;
  unit area = metre^2;
end
