// SBML level 2 version 4
// This model was downloaded from BioModels Database
// http://www.ebi.ac.uk/biomodels/

model ODea2007_IkappaB()
  // O'Dea, E.L., Barken, D., Peralta, R.Q., Tran K.T., Werner, S.L., Kearns, J.D., Levchenko, A., Hoffmann, A. A homeostatic model of IkB metabolism to control constitutive activity. Molecular Systems Biology, 3:111, pp. 1-7. 2007
  // Questions concerning the paper should be addressed to the corresponding author. Alexander Hoffmann (ahoffmann@ucsd.edu)
  // The original model was written and simulated within MathWorks MatLab 2006a using the ode15s (stiff/NDF) solver. It is highly recommended that those wanting to model this system use the MatLab version which we will freely provide upon request. As always, simulation results vary according to the numerical solver used.
  // Translation to SBML Level 2.1 was performed via reconstruction of the model within MathWorks SimBiology Desktop (version 2.1) followed by an Export to SBML. Please address questions about this SBML model to Jeff Kearns (jkearns@ucsd.edu).
  // BioModels DB curation: The model reproduces the values of diffferent species depicted in Fig 3A and 3B (wt) of the paper corresponding to Model1.1. To depict the the total IkB alpha, beta epsilon species, three additional parameters and their corresponding assignment rules have been introduced in this model by the creator. Model succesfully tested on MathSBML.
  // This model originates from BioModels Database: A Database of Annotated Published Models. It is copyright (c) 2005-2010 The BioModels Team.
  // For more information see the terms of use.
  // To cite BioModels Database, please use Le Novère N., Bornstein B., Broicher A., Courtot M., Donizelli M., Dharuri H., Li L., Sauro H., Schilstra M., Shapiro B., Snoep J.L., Hucka M. (2006) BioModels Database: A Free, Centralized Database of Curated, Published, Quantitative Kinetic Models of Biochemical and Cellular Systems Nucleic Acids Res., 34: D689-D691.
  // biomodels.db:MODEL2784772048
  // biomodels.db:BIOMD0000000147
  // isDescribedBy pubmed:17486138
  // isDerivedFrom biomodels.db:BIOMD0000000139 biomodels.db:BIOMD0000000140
  // isPartOf kegg.pathway:mmu04660
  // GO:0007249

  // Compartments:
  compartment cytoplasm = 1;  // GO:0005737
  compartment nucleus = 1;  // GO:0005634

  // Species:
  species IkBa_mRNA in nucleus = 0; IkBa_mRNA is "IkBat";
  species IkBa_cytoplasm in cytoplasm = 0;  // isVersionOf uniprot:Q9Z1E3
  species IkBa_nucleus in nucleus = 0; IkBa_nucleus is "IkBan";  // isVersionOf uniprot:Q9Z1E3
  species IkBaIKK in cytoplasm = 0;  // hasPart uniprot:O88351 uniprot:O88522 uniprot:Q60680 uniprot:Q9Z1E3
  species IkBaNFkB_cytoplasm in cytoplasm = 0.06;  // hasPart uniprot:P25799 uniprot:Q9Z1E3
  species IkBaNFkB_nucleus in nucleus = 0; IkBaNFkB_nucleus is "IkBaNFkBn";  // hasPart uniprot:P25799 uniprot:Q9Z1E3
  species IkBaIKKNFkB in cytoplasm = 0;  // hasPart uniprot:P25799 uniprot:O88522 uniprot:Q60680 uniprot:O88351
  species NFkB_cytoplasm in cytoplasm = 0;  // isVersionOf uniprot:P25799
  species IKK in cytoplasm = 0.001;  // hasPart uniprot:O88351 uniprot:O88522 uniprot:Q60680
  species NFkB_nucleus in nucleus = 0; NFkB_nucleus is "NFkBn";  // isVersionOf uniprot:P25799
  species IkBbIKK in cytoplasm = 0;  // hasPart uniprot:Q60778 uniprot:O88351 uniprot:O88522 uniprot:Q60680
  species IkBbIKKNFkB in cytoplasm = 0;  // hasPart uniprot:Q60778 uniprot:P25799 uniprot:O88351 uniprot:O88522
  species IkBbNFkB_nucleus in nucleus = 0; IkBbNFkB_nucleus is "IkBbNFkBn";  // hasPart uniprot:Q60778 uniprot:P25799
  species IkBbNFkB_cytoplasm in cytoplasm = 0.03;  // hasPart uniprot:Q60778 uniprot:P25799
  species IkBb_nucleus in nucleus = 0; IkBb_nucleus is "IkBbn";  // isVersionOf uniprot:Q60778
  species IkBb_cytoplasm in cytoplasm = 0;  // isVersionOf uniprot:Q60778
  species IkBb_mRNA in nucleus = 0; IkBb_mRNA is "IkBbt";
  species IkBe_mRNA in nucleus = 0; IkBe_mRNA is "IkBet";
  species IkBe_cytoplasm in cytoplasm = 0;  // isVersionOf uniprot:O54910
  species IkBe_nucleus in nucleus = 0; IkBe_nucleus is "IkBen";  // isVersionOf uniprot:O54910
  species IkBeNFkB_cytoplasm in cytoplasm = 0.01;  // hasPart uniprot:O54910 uniprot:P25799
  species IkBeNFkB_nucleus in nucleus = 0; IkBeNFkB_nucleus is "IkBeNFkBn";  // hasPart uniprot:O54910 uniprot:P25799
  species IkBeIKKNFkB in cytoplasm = 0;  // hasPart uniprot:O54910 uniprot:P25799 uniprot:O88351 uniprot:O88522
  species IkBeIKK in cytoplasm = 0;  // hasPart uniprot:O54910 uniprot:O88351 uniprot:O88522 uniprot:Q60680

  // Assignment rules:
  Total_IkBalpha := IkBa_cytoplasm + IkBa_nucleus + IkBaIKK + IkBaIKKNFkB + IkBaNFkB_cytoplasm + IkBaNFkB_nucleus;
  Total_IkBbeta := IkBb_cytoplasm + IkBb_nucleus + IkBbIKK + IkBbIKKNFkB + IkBbNFkB_cytoplasm + IkBbNFkB_nucleus;
  Total_IkBeps := IkBe_cytoplasm + IkBe_nucleus + IkBeIKK + IkBeIKKNFkB + IkBeNFkB_cytoplasm + IkBeNFkB_nucleus;

  // Reactions:
  txn_a: => IkBa_mRNA; nucleus*tr2a;  // GO:0006351
    tr2a = 0.0001848 uM_per_min;
  mdeg_a: IkBa_mRNA => ; nucleus*tr3a*IkBa_mRNA;  // isVersionOf GO:0006402
    tr3a = 0.0168 per_min;
  tsl_a: IkBa_mRNA => IkBa_mRNA + IkBa_cytoplasm; nucleus*tr1a*IkBa_mRNA;  // isVersionOf GO:0006412
    tr1a = 0.2448 per_min;
  int_ai: IkBa_cytoplasm + IKK -> IkBaIKK; cytoplasm*(a1*IkBa_cytoplasm*IKK - d1_1*IkBaIKK);  // isVersionOf GO:0005515
    a1 = 1.35 per_uM_per_min; d1_1 = 0.075 per_min;
  int_an: IkBa_cytoplasm + NFkB_cytoplasm -> IkBaNFkB_cytoplasm; cytoplasm*(a4_1*IkBa_cytoplasm*NFkB_cytoplasm - d4_1*IkBaNFkB_cytoplasm);  // isVersionOf GO:0032088 GO:0005515
    a4_1 = 30 per_uM_per_min; d4_1 = 6e-5 per_min;
  int_an_n: IkBa_nucleus + NFkB_nucleus -> IkBaNFkB_nucleus; nucleus*(a4_2*IkBa_nucleus*NFkB_nucleus - d4_2*IkBaNFkB_nucleus);  // isVersionOf GO:0008134 GO:0005515
    a4_2 = 30 per_uM_per_min; d4_2 = 6e-5 per_min;
  int_2ani: IkBaNFkB_cytoplasm + IKK -> IkBaIKKNFkB; cytoplasm*(a7*IkBaNFkB_cytoplasm*IKK - d1_2*IkBaIKKNFkB);  // isVersionOf GO:0005515
    a7 = 11.1 per_uM_per_min; d1_2 = 0.075 per_min;
  int_2ain: IkBaIKK + NFkB_cytoplasm -> IkBaIKKNFkB; cytoplasm*(a4_3*IkBaIKK*NFkB_cytoplasm - d4_3*IkBaIKKNFkB);  // isVersionOf GO:0008134 GO:0005515
    a4_3 = 30 per_uM_per_min; d4_3 = 6e-5 per_min;
  deg_a: IkBa_cytoplasm => ; cytoplasm*deg1_c*IkBa_cytoplasm;  // isVersionOf GO:0044257
    deg1_c = 0.12 per_min;
  deg_a_n: IkBa_nucleus => ; nucleus*deg1_n*IkBa_nucleus;  // isVersionOf GO:0044257
    deg1_n = 0.12 per_min;
  deg_an_n: IkBaNFkB_nucleus => NFkB_nucleus; nucleus*deg4_n*IkBaNFkB_nucleus;  // isVersionOf GO:0044257
    deg4_n = 6e-5 per_min;
  deg_an: IkBaNFkB_cytoplasm => NFkB_cytoplasm; cytoplasm*deg4_c*IkBaNFkB_cytoplasm;  // isVersionOf GO:0044257
    deg4_c = 6e-5 per_min;
  deg_ai: IkBaIKK => IKK; cytoplasm*r1*IkBaIKK;  // ec-code:2.7.11.10 GO:0008384
    r1 = 0.072 per_min;
  deg_ain: IkBaIKKNFkB => NFkB_cytoplasm + IKK; cytoplasm*r4*IkBaIKKNFkB;  // ec-code:2.7.11.10 GO:0051092 GO:0008384
    r4 = 0.36 per_min;
  loc_a: IkBa_cytoplasm -> IkBa_nucleus; cytoplasm*tp1a*IkBa_cytoplasm - nucleus*tp2a*IkBa_nucleus;  // isVersionOf GO:0000060
    tp1a = 0.018 per_min; tp2a = 0.012 per_min;
  loc_an: IkBaNFkB_nucleus => IkBaNFkB_cytoplasm; nucleus*k2_a*IkBaNFkB_nucleus;  // isVersionOf GO:0006611
    k2_a = 0.828 per_min;
  loc_bn: IkBbNFkB_nucleus => IkBbNFkB_cytoplasm; nucleus*k2_b*IkBbNFkB_nucleus;  // isVersionOf GO:0006611
    k2_b = 0.414 per_min;
  loc_b: IkBb_cytoplasm -> IkBb_nucleus; cytoplasm*tp1b*IkBb_cytoplasm - nucleus*tp2b*IkBb_nucleus;  // isVersionOf GO:0000060
    tp1b = 0.018 per_min; tp2b = 0.012 per_min;
  deg_bin: IkBbIKKNFkB => NFkB_cytoplasm + IKK; cytoplasm*r5*IkBbIKKNFkB;  // ec-code:2.7.11.10 GO:0051092 GO:0008384
    r5 = 0.12 per_min;
  deg_bi: IkBbIKK => IKK; cytoplasm*r2*IkBbIKK;  // ec-code:2.7.11.10 GO:0008384
    r2 = 0.024 per_min;
  deg_bn: IkBbNFkB_cytoplasm => NFkB_cytoplasm; cytoplasm*deg5_c*IkBbNFkB_cytoplasm;  // isVersionOf GO:0044257
    deg5_c = 6e-5 per_min;
  deg_bn_n: IkBbNFkB_nucleus => NFkB_nucleus; nucleus*deg5_n*IkBbNFkB_nucleus;  // isVersionOf GO:0044257
    deg5_n = 6e-5 per_min;
  deg_b_n: IkBb_nucleus => ; nucleus*deg2_n*IkBb_nucleus;  // isVersionOf GO:0044257
    deg2_n = 0.18 per_min;
  deg_b: IkBb_cytoplasm => ; cytoplasm*deg2_c*IkBb_cytoplasm;  // isVersionOf GO:0044257
    deg2_c = 0.18 per_min;
  int_2bin: IkBbIKK + NFkB_cytoplasm -> IkBbIKKNFkB; cytoplasm*(a5_3*IkBbIKK*NFkB_cytoplasm - d5_3*IkBbIKKNFkB);  // isVersionOf GO:0008134 GO:0005515
    a5_3 = 30 per_uM_per_min; d5_3 = 6e-5 per_min;
  int_2bni: IkBbNFkB_cytoplasm + IKK -> IkBbIKKNFkB; cytoplasm*(a8*IkBbNFkB_cytoplasm*IKK - d2_2*IkBbIKKNFkB);  // isVersionOf GO:0005515
    a8 = 2.88 per_uM_per_min; d2_2 = 0.105 per_min;
  int_bn_n: IkBb_nucleus + NFkB_nucleus -> IkBbNFkB_nucleus; nucleus*(a5_2*IkBb_nucleus*NFkB_nucleus - d5_2*IkBbNFkB_nucleus);  // isVersionOf GO:0008134 GO:0005515
    a5_2 = 30 per_uM_per_min; d5_2 = 6e-5 per_min;
  int_bn: IkBb_cytoplasm + NFkB_cytoplasm -> IkBbNFkB_cytoplasm; cytoplasm*(a5_1*IkBb_cytoplasm*NFkB_cytoplasm - d5_1*IkBbNFkB_cytoplasm);  // isVersionOf GO:0032088 GO:0005515
    a5_1 = 30 per_uM_per_min; d5_1 = 6e-5 per_min;
  int_bi: IkBb_cytoplasm + IKK -> IkBbIKK; cytoplasm*(a2*IkBb_cytoplasm*IKK - d2_1*IkBbIKK);  // isVersionOf GO:0005515
    a2 = 0.36 per_uM_per_min; d2_1 = 0.105 per_min;
  tsl_b: IkBb_mRNA => IkBb_mRNA + IkBb_cytoplasm; nucleus*tr1b*IkBb_mRNA;  // isVersionOf GO:0006412
    tr1b = 0.2448 per_min;
  mdeg_b: IkBb_mRNA => ; nucleus*tr3b*IkBb_mRNA;  // isVersionOf GO:0006402
    tr3b = 0.0168 per_min;
  txn_b: => IkBb_mRNA; nucleus*tr2b;  // GO:0006351
    tr2b = 4.272e-5 uM_per_min;
  loc_n: NFkB_cytoplasm -> NFkB_nucleus; cytoplasm*k1_2*NFkB_cytoplasm - nucleus*k1_1*NFkB_nucleus;  // isVersionOf GO:0000060
    k1_2 = 5.4 per_min; k1_1 = 0.0048 per_min;
  txn_e: => IkBe_mRNA; nucleus*tr2e;  // GO:0006351
    tr2e = 3.048e-5 uM_per_min;
  mdeg_e: IkBe_mRNA => ; nucleus*tr3e*IkBe_mRNA;  // isVersionOf GO:0006402
    tr3e = 0.0168 per_min;
  tsl_e: IkBe_mRNA => IkBe_mRNA + IkBe_cytoplasm; nucleus*tr1e*IkBe_mRNA;  // isVersionOf GO:0006412
    tr1e = 0.2448 per_min;
  int_ei: IkBe_cytoplasm + IKK -> IkBeIKK; cytoplasm*(a3*IkBe_cytoplasm*IKK - d3_1*IkBeIKK);  // isVersionOf GO:0005515
    a3 = 0.54 per_uM_per_min; d3_1 = 0.105 per_min;
  int_en: IkBe_cytoplasm + NFkB_cytoplasm -> IkBeNFkB_cytoplasm; cytoplasm*(a6_1*IkBe_cytoplasm*NFkB_cytoplasm - d6_1*IkBeNFkB_cytoplasm);  // isVersionOf GO:0005515 GO:0032088
    a6_1 = 30 per_uM_per_min; d6_1 = 6e-5 per_min;
  int_en_n: IkBe_nucleus + NFkB_nucleus -> IkBeNFkB_nucleus; nucleus*(a6_2*IkBe_nucleus*NFkB_nucleus - d6_2*IkBeNFkB_nucleus);  // isVersionOf GO:0005515 GO:0008134
    a6_2 = 30 per_uM_per_min; d6_2 = 6e-5 per_min;
  int_2eni: IkBeNFkB_cytoplasm + IKK -> IkBeIKKNFkB; cytoplasm*(a9*IkBeNFkB_cytoplasm*IKK - d3_2*IkBeIKKNFkB);  // isVersionOf GO:0005515
    a9 = 4.2 per_uM_per_min; d3_2 = 0.105 per_min;
  int_2ein: IkBeIKK + NFkB_cytoplasm -> IkBeIKKNFkB; cytoplasm*(a6_3*IkBeIKK*NFkB_cytoplasm - d6_3*IkBeIKKNFkB);  // isVersionOf GO:0005515 GO:0008134
    a6_3 = 30 per_uM_per_min; d6_3 = 6e-5 per_min;
  deg_e: IkBe_cytoplasm => ; cytoplasm*deg3_c*IkBe_cytoplasm;  // isVersionOf GO:0044257
    deg3_c = 0.18 per_min;
  deg_e_n: IkBe_nucleus => ; nucleus*deg3_n*IkBe_nucleus;  // isVersionOf GO:0044257
    deg3_n = 0.18 per_min;
  deg_en_n: IkBeNFkB_nucleus => NFkB_nucleus; nucleus*deg6_n*IkBeNFkB_nucleus;  // isVersionOf GO:0044257
    deg6_n = 6e-5 per_min;
  deg_en: IkBeNFkB_cytoplasm => NFkB_cytoplasm; cytoplasm*deg6_c*IkBeNFkB_cytoplasm;  // isVersionOf GO:0044257
    deg6_c = 6e-5 per_min;
  deg_ei: IkBeIKK => IKK; cytoplasm*r3*IkBeIKK;  // ec-code:2.7.11.10 GO:0008384
    r3 = 0.036 per_min;
  deg_ein: IkBeIKKNFkB => NFkB_cytoplasm + IKK; cytoplasm*r6*IkBeIKKNFkB;  // ec-code:2.7.11.10 GO:0008384 GO:0051092
    r6 = 0.18 per_min;
  loc_e: IkBe_cytoplasm -> IkBe_nucleus; cytoplasm*tp1e*IkBe_cytoplasm - nucleus*tp2e*IkBe_nucleus;  // isVersionOf GO:0000060
    tp1e = 0.018 per_min; tp2e = 0.012 per_min;
  loc_en: IkBeNFkB_nucleus => IkBeNFkB_cytoplasm; nucleus*k2_e*IkBeNFkB_nucleus;  // isVersionOf GO:0006611
    k2_e = 0.414 per_min;
  IKK_deg: IKK => ; cytoplasm*k_IKK_deg*IKK;  // isVersionOf GO:0044257
    k_IKK_deg = 0 per_min;
  itxn_a: => IkBa_mRNA; nucleus*tr2a_i*NFkB_nucleus^2;  // modifiers: NFkB_nucleus; isVersionOf GO:0006351
    tr2a_i = 1.98 per_uM_per_min;

  // Unit definitions:
  unit substance = 1e-6 mole; substance is "micromole";
  unit uM_per_min = 1e-6 mole / (60 second * litre);
  unit per_min = 1 / (60 second);
  unit per_uM_per_min = litre / (1e-6 mole * 60 second);
end
