// SBML level 2 version 3
// This model was downloaded from BioModels Database
// http://www.ebi.ac.uk/biomodels/

model MODEL7957907314()
  // Chickarmane2006 - Stem cell switch reversible
  // Kinetic modeling approach of the transcriptional dynamics of the embryonic stem cell switch.
  // This model is described in the article:
  // Transcriptional dynamics of the embryonic stem cell switch.
  // Chickarmane V, Troein C, Nuber UA, Sauro HM, Peterson C
  // PLoS Computational Biology. 2006; 2(9):e123
  // Abstract:
  // Recent ChIP experiments of human and mouse embryonic stem cells have elucidated the architecture of the transcriptional regulatory circuitry responsible for cell determination, which involves the transcription factors OCT4, SOX2, and NANOG. In addition to regulating each other through feedback loops, these genes also regulate downstream target genes involved in the maintenance and differentiation of embryonic stem cells. A search for the OCT4-SOX2-NANOG network motif in other species reveals that it is unique to mammals. With a kinetic modeling approach, we ascribe function to the observed OCT4-SOX2-NANOG network by making plausible assumptions about the interactions between the transcription factors at the gene promoter binding sites and RNA polymerase (RNAP), at each of the three genes as well as at the target genes. We identify a bistable switch in the network, which arises due to several positive feedback loops, and is switched on/off by input environmental signals. The switch stabilizes the expression levels of the three genes, and through their regulatory roles on the downstream target genes, leads to a binary decision: when OCT4, SOX2, and NANOG are expressed and the switch is on, the self-renewal genes are on and the differentiation genes are off. The opposite holds when the switch is off. The model is extremely robust to parameter changes. In addition to providing a self-consistent picture of the transcriptional circuit, the model generates several predictions. Increasing the binding strength of NANOG to OCT4 and SOX2, or increasing its basal transcriptional rate, leads to an irreversible bistable switch: the switch remains on even when the activating signal is removed. Hence, the stem cell can be manipulated to be self-renewing without the requirement of input signals. We also suggest tests that could discriminate between a variety of feedforward regulation architectures of the target genes by OCT4, SOX2, and NANOG.
  // This model is hosted on BioModels Database and identified by: MODEL7957907314 .
  // To cite BioModels Database, please use: BioModels Database: An enhanced, curated and annotated resource for published quantitative kinetic models .
  // To the extent possible under law, all copyright and related or neighbouring rights to this encoded model have been dedicated to the public domain worldwide. Please refer to CC0 Public Domain Dedication for more information.
  // biomodels.db:MODEL7957907314
  // biomodels.db:BIOMD0000000203
  // isDescribedBy pubmed:16978048
  // isVersionOf GO:0048863
  // hasTaxon taxonomy:9606 taxonomy:10090

  // Compartments:
  compartment compartment = 1;  // isVersionOf GO:0005623

  // Species:
  species $OCT4_Gene in compartment = 0;  // isVersionOf ensembl:ENSG00000204531; encodes uniprot:Q01860
  species $NANOG_Gene in compartment = 0;  // isVersionOf ensembl:ENSG00000176654; encodes uniprot:Q8N7R0
  species $SOX2_Gene in compartment = 0;  // isVersionOf ensembl:ENSG00000165661; encodes uniprot:Q6ZRP7
  species $targetGene in compartment = 0.01/compartment;
  species $degradation in compartment = 0;
  species $p53 in compartment = 0;  // isVersionOf uniprot:P04637
  species $A in compartment = 10/compartment;  // isVersionOf GO:0042813
  species OCT4 in compartment = 0.01/compartment;  // isVersionOf uniprot:Q01860
  species SOX2 in compartment = 0.01/compartment;  // isVersionOf uniprot:Q6ZRP7
  species NANOG in compartment = 0.01/compartment;  // isVersionOf uniprot:Q8N7R0
  species OCT4_SOX2 in compartment = 0.1/compartment;  // hasPart uniprot:Q01860 uniprot:Q6ZRP7
  species Protein in compartment = 0;

  // Parameters:
  eta1 = 0.0001;
  a1 = 1;
  a2 = 0.01;
  a3 = 0.2;
  f = 1000;
  b1 = 0.0011;
  b2 = 0.001;
  b3 = 0.0007;
  gamma1 = 1;
  eta5 = 0.0001;
  e1 = 0.005;
  e2 = 0.1;
  f2 = 0.000995;
  f1 = 0.001;
  f3 = 0.01;
  gamma2 = 1;
  k1c = 0.05;
  k2c = 0.001;
  k3c = 5;
  eta3 = 0.0001;
  c1 = 1;
  c2 = 0.01;
  c3 = 0.2;
  d1 = 0.0011;
  d2 = 0.001;
  d3 = 0.0007;
  gamma3 = 1;
  g1 = 0.1;
  eta7 = 0.0001;
  h1 = 0.0019;
  h2 = 0.05;
  gamma4 = 0.01;

  // Reactions:
  J0: $OCT4_Gene => OCT4; (eta1 + a1*A + a2*OCT4_SOX2 + a3*OCT4_SOX2*NANOG)/(1 + eta1/f + b1*A + b2*OCT4_SOX2 + b3*OCT4_SOX2*NANOG);  // modifiers: A, OCT4_SOX2, NANOG; isVersionOf GO:0010467
  J1: OCT4 => $degradation; gamma1*OCT4;  // isVersionOf GO:0030163
  J2: $NANOG_Gene => NANOG; (eta5 + e1*OCT4_SOX2 + e2*OCT4_SOX2*NANOG)/(1 + eta5/f + f2*OCT4_SOX2 + f1*OCT4_SOX2*NANOG + f3*p53);  // modifiers: OCT4_SOX2, p53; isVersionOf GO:0010467
  J3: NANOG => $degradation; gamma2*NANOG;  // isVersionOf GO:0030163
  J4: OCT4 + SOX2 => OCT4_SOX2; k1c*OCT4*SOX2 - k2c*OCT4_SOX2;  // isVersionOf GO:0006461
  J5: OCT4_SOX2 => $degradation; k3c*OCT4_SOX2;  // isVersionOf GO:0030163
  J6: $SOX2_Gene => SOX2; (eta3 + c1*A + c2*OCT4_SOX2 + c3*OCT4_SOX2*NANOG)/(1 + eta3/f + d1*A + d2*OCT4_SOX2 + d3*OCT4_SOX2*NANOG);  // modifiers: A, OCT4_SOX2, NANOG; isVersionOf GO:0010467
  J7: SOX2 => $degradation; gamma3*SOX2;  // isVersionOf GO:0030163
  J8: $targetGene => Protein; (g1*OCT4_SOX2 + eta7)/(1 + eta7/f + h1*OCT4_SOX2 + h2*OCT4_SOX2*NANOG);  // modifiers: OCT4_SOX2, NANOG; isVersionOf GO:0010467
  J9: Protein => $degradation; gamma4*Protein;  // isVersionOf GO:0030163

  // Unit definitions:
  unit substance = dimensionless; substance is "arb_substance";
  unit volume = litre; volume is "arb_volume";
  unit time = dimensionless; time is "arb_time";
end
