// SBML level 3 version 2

model MODEL1304020001()
  // Bidkhori2012 - EGFR signalling in NSCLC
  // The paper describes and compares two models on EGFR signalling between normal and NSCLC cells. Moreover, it is shown that ERK (MAPK), STAT and Akt factor's activation pattern are different between normal and NSCLA models. This model corresponds to EGFR signalling in NSCLA cells.
  // Created by The MathWorks, Inc. SimBiology tool, Version 3.3
  // This model is described in the article:
  // Modeling of tumor progression in NSCLC and intrinsic resistance to TKI in loss of PTEN expression.
  // Bidkhori G, Moeini A, Masoudi-Nejad A
  // PloS one [2012, 7(10):e48004]
  // Abstract:
  // EGFR signaling plays a very important role in NSCLC. It activates Ras/ERK, PI3K/Akt and STAT activation pathways. These are the main pathways for cell proliferation and survival. We have developed two mathematical models to relate to the different EGFR signaling in NSCLC and normal cells in the presence or absence of EGFR and PTEN mutations. The dynamics of downstream signaling pathways vary in the disease state and activation of some factors can be indicative of drug resistance. Our simulation denotes the effect of EGFR mutations and increased expression of certain factors in NSCLC EGFR signaling on each of the three pathways where levels of pERK, pSTAT and pAkt are increased. Over activation of ERK, Akt and STAT3 which are the main cell proliferation and survival factors act as promoting factors for tumor progression in NSCLC. In case of loss of PTEN, Akt activity level is considerably increased. Our simulation results show that in the presence of erlotinib, downstream factors i.e. pAkt, pSTAT3 and pERK are inhibited. However, in case of loss of PTEN expression in the presence of erlotinib, pAkt level would not decrease which demonstrates that these cells are resistant to erlotinib.
  // This model is hosted on BioModels Database and identified by: MODEL1304020001 .
  // To cite BioModels Database, please use: BioModels Database: An enhanced, curated and annotated resource for published quantitative kinetic models .
  // To the extent possible under law, all copyright and related or neighbouring rights to this encoded model have been dedicated to the public domain worldwide. Please refer to CC0 Public Domain Dedication for more information.
  // biomodels.db:MODEL1304020001
  // biomodels.db:BIOMD0000000453
  // isDescribedBy pubmed:23133538
  // isDerivedFrom biomodels.db:BIOMD0000000019 biomodels.db:BIOMD0000000049 biomodels.db:BIOMD0000000048 biomodels.db:BIOMD0000000009 biomodels.db:BIOMD0000000205 biomodels.db:BIOMD0000000093
  // hasTaxon taxonomy:131567
  // isVersionOf GO:0007173
  // model units - substance: substance, time: second, volume: volume, area: area, length: metre, extent: substance

  // Compartments:
  compartment unnamed = 1 volume;  // isVersionOf GO:0005623

  // Species:
  species EGF in unnamed = 0.0081967/unnamed;  // isVersionOf uniprot:P01133
  species EGFR in unnamed = 1/unnamed;  // isVersionOf uniprot:P00533
  species EGF_EGFR in unnamed = 0; EGF_EGFR is "EGF-EGFR";  // hasPart uniprot:P01133 uniprot:P00533
  species EGF_EGFR2 in unnamed = 0; EGF_EGFR2 is "EGF-EGFR2";  // hasPart uniprot:P01133 uniprot:P00533
  species pEGF_EGFR2 in unnamed = 0; pEGF_EGFR2 is "pEGF-EGFR2";  // hasPart uniprot:P01133 uniprot:P00533; hasProperty PATO:0002220
  species cbl in unnamed = 0.8/unnamed;  // isVersionOf uniprot:P22681
  species Shc in unnamed = 1/unnamed;  // isVersionOf uniprot:P98077
  species pEGF_EGFR2_Shc in unnamed = 0; pEGF_EGFR2_Shc is "pEGF-EGFR2-Shc";  // hasPart uniprot:P01133 uniprot:P00533 uniprot:P98077; hasProperty PATO:0002220
  species SHP in unnamed = 0.2/unnamed;  // isVersionOf uniprot:Q15466
  species pEGF_EGFR2_SHP2 in unnamed = 0; pEGF_EGFR2_SHP2 is "pEGF-EGFR2-SHP2";  // hasPart uniprot:P01133 uniprot:P00533 uniprot:Q15466; hasProperty PATO:0002220
  species pEGF_EGFR2_pShc in unnamed = 0; pEGF_EGFR2_pShc is "pEGF-EGFR2-pShc";  // hasPart uniprot:P01133 uniprot:P00533 uniprot:P98077; hasProperty PATO:0002220
  species pShc in unnamed = 0;  // isVersionOf uniprot:P98077; hasProperty PATO:0002220
  species pShc_SHP2 in unnamed = 0; pShc_SHP2 is "pShc-SHP2";  // hasPart uniprot:P98077 uniprot:Q15466; hasProperty PATO:0002220
  species Grb2 in unnamed = 1/unnamed;  // isVersionOf uniprot:P62993
  species pEGF_EGFR2_pShc_Grb2 in unnamed = 0; pEGF_EGFR2_pShc_Grb2 is "pEGF-EGFR2-pShc-Grb2";  // hasPart uniprot:P01133 uniprot:P00533 uniprot:P98077 uniprot:P62993; hasProperty PATO:0002220
  species pEGF_EGFR2_pShc_Grb2_SHP2 in unnamed = 0; pEGF_EGFR2_pShc_Grb2_SHP2 is "pEGF-EGFR2-pShc-Grb2-SHP2";  // hasPart uniprot:P01133 uniprot:P00533 uniprot:P98077 uniprot:Q15466; hasProperty PATO:0002220
  species SOS in unnamed = 0.3/unnamed;  // isVersionOf uniprot:Q07889
  species pEGF_EGFR2_pShc_Grb2_SOS in unnamed = 0; pEGF_EGFR2_pShc_Grb2_SOS is "pEGF-EGFR2-pShc-Grb2-SOS";  // hasPart uniprot:P01133 uniprot:P00533 uniprot:P98077 uniprot:P62993; hasProperty PATO:0002220
  species pEGF_EGFR2_pShc_Grb2_SOS_cbl in unnamed = 0; pEGF_EGFR2_pShc_Grb2_SOS_cbl is "pEGF-EGFR2-pShc-Grb2-SOS-cbl";  // hasPart uniprot:P01133 uniprot:P00533 uniprot:P98077 uniprot:P62993; hasProperty PATO:0002220
  species Grb2_SOS in unnamed = 0; Grb2_SOS is "Grb2-SOS";  // hasPart uniprot:P62993 uniprot:Q07889
  species pEGF_EGFR2_Grb2 in unnamed = 0; pEGF_EGFR2_Grb2 is "pEGF-EGFR2-Grb2";  // hasPart uniprot:P01133 uniprot:P00533 uniprot:P62993; hasProperty PATO:0002220
  species pEGF_EGFR2_Grb2_SHP2 in unnamed = 0; pEGF_EGFR2_Grb2_SHP2 is "pEGF-EGFR2-Grb2-SHP2";  // hasPart uniprot:P01133 uniprot:P00533 uniprot:Q15466 uniprot:P62993; hasProperty PATO:0002220
  species pEGF_EGFR2_Grb2_SOS in unnamed = 0; pEGF_EGFR2_Grb2_SOS is "pEGF-EGFR2-Grb2-SOS";  // hasPart uniprot:P01133 uniprot:P00533 uniprot:P62993 uniprot:Q07889; hasProperty PATO:0002220
  species pEGF_EGFR2_Grb2_SOS_cbl in unnamed = 0; pEGF_EGFR2_Grb2_SOS_cbl is "pEGF-EGFR2-Grb2-SOS-cbl";  // hasPart uniprot:P01133 uniprot:P00533 uniprot:P62993 uniprot:Q07889; hasProperty PATO:0002220
  species Ras_GDP in unnamed = 0.3/unnamed; Ras_GDP is "Ras-GDP";  // hasPart CHEBI:17552 uniprot:P01112
  species pEGF_EGFR2_pShc_Grb2_SOS_Ras_GDP in unnamed = 0; pEGF_EGFR2_pShc_Grb2_SOS_Ras_GDP is "pEGF-EGFR2-pShc-Grb2-SOS-Ras-GDP";  // hasPart CHEBI:17552 uniprot:P01133 uniprot:P00533 uniprot:P98077; hasProperty PATO:0002220
  species Ras_GTP in unnamed = 0; Ras_GTP is "Ras-GTP";  // hasPart CHEBI:15996 uniprot:P01112
  species pEGF_EGFR2_Grb2_SOS_Ras_GDP in unnamed = 0; pEGF_EGFR2_Grb2_SOS_Ras_GDP is "pEGF-EGFR2-Grb2-SOS-Ras-GDP";  // hasPart CHEBI:17552 uniprot:P01133 uniprot:P00533 uniprot:P62993; hasProperty PATO:0002220
  species Ras_GAP in unnamed = 0.1/unnamed; Ras_GAP is "Ras-GAP";  // hasPart uniprot:P01112 uniprot:P20936
  species Ras_GTP_Ras_GAP in unnamed = 0; Ras_GTP_Ras_GAP is "Ras-GTP-Ras-GAP";  // hasPart CHEBI:15996 uniprot:P01112 uniprot:P20936
  species pEGF_EGFR2_Ras_GAP in unnamed = 0; pEGF_EGFR2_Ras_GAP is "pEGF-EGFR2-Ras-GAP";  // hasPart uniprot:P01133 uniprot:P00533 uniprot:P01112 uniprot:P20936; hasProperty PATO:0002220
  species pEGF_EGFR2_Ras_GAP_Ras_GTP in unnamed = 0; pEGF_EGFR2_Ras_GAP_Ras_GTP is "pEGF-EGFR2-Ras-GAP-Ras-GTP";  // hasPart CHEBI:15996 uniprot:P01133 uniprot:P00533 uniprot:P01112; hasProperty PATO:0002220
  species pEGF_EGFR2_Ras_GAP_SHP2 in unnamed = 0; pEGF_EGFR2_Ras_GAP_SHP2 is "pEGF-EGFR2-Ras-GAP-SHP2";  // hasPart uniprot:P01133 uniprot:P00533 uniprot:Q15466 uniprot:P01112; hasProperty PATO:0002220
  species Raf1 in unnamed = 0.5/unnamed;  // isVersionOf uniprot:P04049
  species Raf1_Ras_GTP in unnamed = 0; Raf1_Ras_GTP is "Raf1-Ras-GTP";  // hasPart CHEBI:15996 uniprot:P01112 uniprot:P04049
  species Raf1active in unnamed = 0;  // isVersionOf uniprot:P04049
  species MEK in unnamed = 0.68/unnamed;  // isVersionOf uniprot:Q02750
  species Raf1active_MEK in unnamed = 0; Raf1active_MEK is "Raf1active-MEK";  // hasPart uniprot:P04049 uniprot:Q02750
  species pMEK in unnamed = 0;  // isVersionOf uniprot:Q02750; hasProperty PATO:0002220
  species Raf1active_pMEK in unnamed = 0; Raf1active_pMEK is "Raf1active-pMEK";  // hasPart uniprot:P04049 uniprot:Q02750; hasProperty PATO:0002220
  species ppMEK in unnamed = 0;  // isVersionOf uniprot:Q02750; hasProperty PATO:0002220
  species ERK in unnamed = 0.8/unnamed;  // isVersionOf uniprot:P28482
  species ppMEK_ERK in unnamed = 0; ppMEK_ERK is "ppMEK-ERK";  // hasPart uniprot:Q02750 uniprot:P28482; hasProperty PATO:0002220
  species pERK in unnamed = 0;  // isVersionOf uniprot:P28482; hasProperty PATO:0002220
  species ppMEK_pERK in unnamed = 0; ppMEK_pERK is "ppMEK-pERK";  // hasPart uniprot:Q02750 uniprot:P28482; hasProperty PATO:0002220
  species ppERK in unnamed = 0;  // isVersionOf uniprot:P28482; hasProperty PATO:0002220
  species Pase in unnamed = 0.5/unnamed;  // isVersionOf uniprot:P28562
  species Raf1active_Pase in unnamed = 0; Raf1active_Pase is "Raf1active-Pase";  // hasPart uniprot:P04049 uniprot:P28562
  species Pase2 in unnamed = 0.02/unnamed;  // isVersionOf uniprot:Q13115
  species ppMEK_Pase2 in unnamed = 0; ppMEK_Pase2 is "ppMEK-Pase2";  // hasPart uniprot:Q02750 uniprot:Q13115; hasProperty PATO:0002220
  species pMEK_Pase2 in unnamed = 0; pMEK_Pase2 is "pMEK-Pase2";  // hasPart uniprot:Q02750 uniprot:Q13115; hasProperty PATO:0002220
  species Pase3 in unnamed = 0.002/unnamed;  // isVersionOf uniprot:Q16828
  species pERK_Pase3 in unnamed = 0; pERK_Pase3 is "pERK-Pase3";  // hasPart uniprot:P28482 uniprot:Q16828; hasProperty PATO:0002220
  species ppERK_Pase3 in unnamed = 0; ppERK_Pase3 is "ppERK-Pase3";  // hasPart uniprot:P28482 uniprot:Q16828; hasProperty PATO:0002220
  species ppERK_pEGF_EGFR2_pShc_Grb2_SOS in unnamed = 0; ppERK_pEGF_EGFR2_pShc_Grb2_SOS is "ppERK-pEGF-EGFR2-pShc-Grb2-SOS";  // hasPart uniprot:P01133 uniprot:P00533 uniprot:P98077 uniprot:P62993; hasProperty PATO:0002220
  species pSOS in unnamed = 0;  // isVersionOf uniprot:Q07889; hasProperty PATO:0002220
  species ppERK_pEGF_EGFR2_Grb2_SOS in unnamed = 0; ppERK_pEGF_EGFR2_Grb2_SOS is "ppERK-pEGF-EGFR2-Grb2-SOS";  // hasPart uniprot:P01133 uniprot:P00533 uniprot:P62993 uniprot:Q07889; hasProperty PATO:0002220
  species ProEGFR in unnamed = 1/unnamed;  // isVersionOf uniprot:P00533
  species pEGF_EGFR2_pShc_Grb2_SOS_cbl_EPn in unnamed = 0; pEGF_EGFR2_pShc_Grb2_SOS_cbl_EPn is "pEGF-EGFR2-pShc-Grb2-SOS-cbl-EPn";  // hasPart uniprot:P01133 uniprot:P00533 uniprot:P98077 uniprot:P62993; hasProperty PATO:0002220
  species EPn in unnamed = 0.5/unnamed;  // isVersionOf uniprot:Q9Y6I3
  species pEGF_EGFR2_Grb2_SOS_cbl_EPn in unnamed = 0; pEGF_EGFR2_Grb2_SOS_cbl_EPn is "pEGF-EGFR2-Grb2-SOS-cbl-EPn";  // hasPart uniprot:P01133 uniprot:P00533 uniprot:P62993 uniprot:Q07889; hasProperty PATO:0002220
  species pEGF_EGFR2_cbl in unnamed = 0; pEGF_EGFR2_cbl is "pEGF-EGFR2-cbl";  // hasPart uniprot:P01133 uniprot:P00533 uniprot:P22681; hasProperty PATO:0002220
  species pEGF_EGFR2_cbl_EPn in unnamed = 0; pEGF_EGFR2_cbl_EPn is "pEGF-EGFR2-cbl-EPn";  // hasPart uniprot:P01133 uniprot:P00533 uniprot:P22681 uniprot:Q9Y6I3; hasProperty PATO:0002220
  species PI3K in unnamed = 0.4/unnamed;  // hasPart uniprot:Q8NEB9 uniprot:O00459
  species pEGF_EGFR2_PI3K in unnamed = 0; pEGF_EGFR2_PI3K is "pEGF-EGFR2-PI3K";  // hasPart uniprot:P01133 uniprot:P00533 uniprot:Q8NEB9 uniprot:O00459; hasProperty PATO:0002220
  species pEGF_EGFR2_pPI3K in unnamed = 0; pEGF_EGFR2_pPI3K is "pEGF-EGFR2-pPI3K";  // hasPart uniprot:P01133 uniprot:P00533 uniprot:Q8NEB9 uniprot:O00459; hasProperty PATO:0002220
  species pPI3K in unnamed = 0;  // hasPart uniprot:Q8NEB9 uniprot:O00459; hasProperty PATO:0002220
  species TP4 in unnamed = 0.2/unnamed;  // isVersionOf uniprot:O15357
  species TP4_pPI3K in unnamed = 0; TP4_pPI3K is "TP4-pPI3K";  // hasPart uniprot:Q8NEB9 uniprot:O00459 uniprot:O15357
  species TP4_PI3K in unnamed = 0; TP4_PI3K is "TP4-PI3K";  // hasPart uniprot:Q8NEB9 uniprot:O00459 uniprot:O15357
  species PIP2 in unnamed = 0.5/unnamed;  // isVersionOf CHEBI:37328
  species pPI3K_PIP2 in unnamed = 0; pPI3K_PIP2 is "pPI3K-PIP2";  // hasPart CHEBI:37328 uniprot:Q8NEB9 uniprot:O00459
  species PIP3 in unnamed = 0;  // isVersionOf pubchem.compound:24755492
  species Akt in unnamed = 0.2/unnamed;  // isVersionOf uniprot:P31751
  species Aktm in unnamed = 0;  // encodes uniprot:P31751
  species PDK1 in unnamed = 0.1/unnamed;  // isVersionOf uniprot:O15530
  species Aktm_PDK1 in unnamed = 0; Aktm_PDK1 is "Aktm-PDK1";  // hasPart uniprot:P31751 uniprot:O15530
  species pAktm_PDK1 in unnamed = 0; pAktm_PDK1 is "pAktm-PDK1";  // hasPart uniprot:P31751 uniprot:O15530; hasProperty PATO:0002220
  species pAktm in unnamed = 0;  // isVersionOf uniprot:P31751; hasProperty PATO:0002220
  species pAkt in unnamed = 0;  // isVersionOf uniprot:P31751; hasProperty PATO:0002220
  species pAkt_Takt in unnamed = 0; pAkt_Takt is "pAkt-Takt";  // hasPart CHEBI:16541 uniprot:P31751; hasProperty PATO:0002220
  species Akt_Takt in unnamed = 0; Akt_Takt is "Akt-Takt";  // hasPart CHEBI:16541 uniprot:P31751
  species Takt in unnamed = 0.1/unnamed;  // isVersionOf CHEBI:16541
  species pAktm_Takt in unnamed = 0; pAktm_Takt is "pAktm-Takt";  // hasPart CHEBI:16541 uniprot:P31751; hasProperty PATO:0002220
  species Aktm_Takt in unnamed = 0; Aktm_Takt is "Aktm-Takt";  // hasPart CHEBI:16541 uniprot:P31751
  species pAktm_PDK1_Takt in unnamed = 0; pAktm_PDK1_Takt is "pAktm-PDK1-Takt";  // hasPart CHEBI:16541 uniprot:P31751 uniprot:O15530; hasProperty PATO:0002220
  species Aktm_PDK1_Takt in unnamed = 0; Aktm_PDK1_Takt is "Aktm-PDK1-Takt";  // hasPart CHEBI:16541 uniprot:P31751 uniprot:O15530
  species pAkt_total in unnamed;  // isVersionOf uniprot:P31751
  species pRaf1active in unnamed = 0;  // hasPart uniprot:P04049
  species STAT3c in unnamed = 2/unnamed;  // isVersionOf uniprot:P40763
  species pEGF_EGFR2_STAT3c in unnamed = 0; pEGF_EGFR2_STAT3c is "pEGF-EGFR2-STAT3c";  // hasPart uniprot:P01133 uniprot:P00533 uniprot:P40763; hasProperty PATO:0002220
  species pSTAT3c in unnamed = 0;  // isVersionOf uniprot:P40763; hasProperty PATO:0002220
  species pEGF_EGFR2_pSTAT3c in unnamed = 0; pEGF_EGFR2_pSTAT3c is "pEGF-EGFR2-pSTAT3c";  // hasPart uniprot:P01133 uniprot:P00533 uniprot:P40763; hasProperty PATO:0002220
  species PP1 in unnamed = 0.5/unnamed;  // isVersionOf uniprot:P60484
  species pSTAT3c_PP1 in unnamed = 0; pSTAT3c_PP1 is "pSTAT3c-PP1";  // hasPart uniprot:P40763 uniprot:P60484; hasProperty PATO:0002220
  species pSTAT3c_pSTAT3c_PP1 in unnamed = 0; pSTAT3c_pSTAT3c_PP1 is "pSTAT3c-pSTAT3c-PP1";  // hasPart uniprot:P40763 uniprot:P60484; hasProperty PATO:0002220
  species pSTAT3c_pSTAT3c in unnamed = 0; pSTAT3c_pSTAT3c is "pSTAT3c-pSTAT3c";  // hasPart uniprot:P40763; hasProperty PATO:0002220
  species STAT3c_pSTAT3c in unnamed = 0; STAT3c_pSTAT3c is "STAT3c-pSTAT3c";  // hasPart uniprot:P40763; hasProperty PATO:0002220
  species pSTAT3n_pSTAT3n in unnamed = 0; pSTAT3n_pSTAT3n is "pSTAT3n-pSTAT3n";  // hasPart uniprot:P40763; hasProperty PATO:0002220
  species pSTAT3n in unnamed = 0;  // isVersionOf uniprot:P40763; hasProperty PATO:0002220
  species PP2 in unnamed = 0.6/unnamed;  // isVersionOf uniprot:O14781
  species pSTAT3n_pSTAT3n_PP2 in unnamed = 0; pSTAT3n_pSTAT3n_PP2 is "pSTAT3n-pSTAT3n-PP2";  // hasProperty PATO:0002220; hasPart uniprot:P40763 uniprot:O14781
  species STAT3n_pSTAT3n in unnamed = 0; STAT3n_pSTAT3n is "STAT3n-pSTAT3n";  // hasPart uniprot:P40763; hasProperty PATO:0002220
  species STAT3n in unnamed = 0;  // isVersionOf uniprot:P40763
  species pSTAT3n_PP2 in unnamed = 0; pSTAT3n_PP2 is "pSTAT3n-PP2";  // hasPart uniprot:P40763 uniprot:O14781; hasProperty PATO:0002220
  species pEGF_EGFR2_STAT3c_cbl in unnamed = 0; pEGF_EGFR2_STAT3c_cbl is "pEGF-EGFR2-STAT3c-cbl";  // hasPart uniprot:P01133 uniprot:P00533 uniprot:P22681 uniprot:P40763; hasProperty PATO:0002220
  species pEGF_EGFR2_STAT3c_cbl_EPn in unnamed = 0; pEGF_EGFR2_STAT3c_cbl_EPn is "pEGF-EGFR2-STAT3c-cbl-EPn";  // hasPart uniprot:P01133 uniprot:P00533 uniprot:P22681 uniprot:P40763; hasProperty PATO:0002220
  species pEGF_EGFR2_PI3K_cbl in unnamed = 0; pEGF_EGFR2_PI3K_cbl is "pEGF-EGFR2-PI3K-cbl";  // hasPart uniprot:P01133 uniprot:P00533 uniprot:Q8NEB9 uniprot:O00459; hasProperty PATO:0002220
  species pEGF_EGFR2_PI3K_cbl_EPn in unnamed = 0; pEGF_EGFR2_PI3K_cbl_EPn is "pEGF-EGFR2-PI3K-cbl-EPn";  // hasPart uniprot:P01133 uniprot:P00533 uniprot:Q8NEB9 uniprot:O00459; hasProperty PATO:0002220

  // Assignment rules:
  pAkt_total := pAkt + pAktm;

  // Reactions:
  r1: EGF + EGFR -> EGF_EGFR; k1*EGF*EGFR - k1r*EGF_EGFR;
    k1 = 100; k1r = 0.0038;
  r2: EGF_EGFR + EGF_EGFR -> EGF_EGFR2; k2*EGF_EGFR*EGF_EGFR - k2r*EGF_EGFR2;
    k2 = 10; k2r = 0.02;
  r3: EGF_EGFR2 => pEGF_EGFR2; vmax*EGF_EGFR2/(km + EGF_EGFR2);
    vmax = 0.24; km = 13;
  r8: pEGF_EGFR2 + Shc -> pEGF_EGFR2_Shc; k8*pEGF_EGFR2*Shc - k8r*pEGF_EGFR2_Shc;
    k8 = 90; k8r = 0.6;
  r6: pEGF_EGFR2 + SHP -> pEGF_EGFR2_SHP2; k6*pEGF_EGFR2*SHP - k6r*pEGF_EGFR2_SHP2;
    k6 = 3.114; k6r = 0.2;
  r9: pEGF_EGFR2_Shc => pEGF_EGFR2_pShc; k9*pEGF_EGFR2_Shc;
    k9 = 0.5838;
  r7: pEGF_EGFR2_SHP2 => EGF_EGFR2 + SHP; k7*pEGF_EGFR2_SHP2;
    k7 = 0.2661;
  r10: pEGF_EGFR2_pShc -> pEGF_EGFR2 + pShc; k10*pEGF_EGFR2_pShc - k10r*pEGF_EGFR2*pShc;
    k10 = 4.481; k10r = 0.3;
  r11: pShc + SHP -> pShc_SHP2; k11*pShc*SHP - k11r*pShc_SHP2;
    k11 = 3.114; k11r = 0.2;
  r12: pShc_SHP2 => Shc + SHP; k12*pShc_SHP2;
    k12 = 0.2661;
  r13: pShc => Shc; k13*pShc;
    k13 = 0.005;
  r18: pEGF_EGFR2_pShc + Grb2 -> pEGF_EGFR2_pShc_Grb2; k18*pEGF_EGFR2_pShc*Grb2 - kr18*pEGF_EGFR2_pShc_Grb2;
    k18 = 3; kr18 = 0.1;
  r19: pEGF_EGFR2_pShc_Grb2 + SHP -> pEGF_EGFR2_pShc_Grb2_SHP2; k19*pEGF_EGFR2_pShc_Grb2*SHP - kr19*pEGF_EGFR2_pShc_Grb2_SHP2;
    k19 = 10; kr19 = 1;
  r20: pEGF_EGFR2_pShc_Grb2_SHP2 => EGF_EGFR2 + pShc + Grb2 + SHP; k20*pEGF_EGFR2_pShc_Grb2_SHP2;
    k20 = 2.661;
  r23: pEGF_EGFR2_pShc_Grb2 + SOS -> pEGF_EGFR2_pShc_Grb2_SOS; k23*pEGF_EGFR2_pShc_Grb2*SOS - kr23*pEGF_EGFR2_pShc_Grb2_SOS;
    k23 = 10; kr23 = 0.0214;
  r26: Grb2 + SOS -> Grb2_SOS; k26*Grb2*SOS - kr26*Grb2_SOS;
    k26 = 0.1; kr26 = 0.0015;
  r27: pEGF_EGFR2_pShc + Grb2_SOS -> pEGF_EGFR2_pShc_Grb2_SOS; k27*pEGF_EGFR2_pShc*Grb2_SOS - kr27*pEGF_EGFR2_pShc_Grb2_SOS;
    k27 = 10; kr27 = 0.045;
  r28: pEGF_EGFR2 + Grb2 -> pEGF_EGFR2_Grb2; k28*pEGF_EGFR2*Grb2 - kr28*pEGF_EGFR2_Grb2;
    k28 = 3; kr28 = 0.05;
  r29: pEGF_EGFR2_Grb2 + SHP -> pEGF_EGFR2_Grb2_SHP2; k29*pEGF_EGFR2_Grb2*SHP - kr29*pEGF_EGFR2_Grb2_SHP2;
    k29 = 10; kr29 = 1;
  r30: pEGF_EGFR2_Grb2_SHP2 => EGF_EGFR2 + Grb2 + SHP; k30*pEGF_EGFR2_Grb2_SHP2;
    k30 = 2.661;
  r31: pEGF_EGFR2_Grb2 + SOS -> pEGF_EGFR2_Grb2_SOS; k31*pEGF_EGFR2_Grb2*SOS - kr31*pEGF_EGFR2_Grb2_SOS;
    k31 = 10; kr31 = 0.06;
  r32: pEGF_EGFR2 + Grb2_SOS -> pEGF_EGFR2_Grb2_SOS; k32*pEGF_EGFR2*Grb2_SOS - kr32*pEGF_EGFR2_Grb2_SOS;
    k32 = 2.734; kr32 = 0.025;
  r35: pEGF_EGFR2_pShc_Grb2_SOS + Ras_GDP -> pEGF_EGFR2_pShc_Grb2_SOS_Ras_GDP; k35*pEGF_EGFR2_pShc_Grb2_SOS*Ras_GDP - kr35*pEGF_EGFR2_pShc_Grb2_SOS_Ras_GDP;
    k35 = 202.9; kr35 = 0.18;
  r39: Ras_GTP => Ras_GDP; k39*Ras_GTP;
    k39 = 0.000167;
  r36: pEGF_EGFR2_pShc_Grb2_SOS_Ras_GDP => pEGF_EGFR2_pShc_Grb2_SOS + Ras_GTP; k36*pEGF_EGFR2_pShc_Grb2_SOS_Ras_GDP;
    k36 = 0.1434;
  r38: pEGF_EGFR2_Grb2_SOS_Ras_GDP => pEGF_EGFR2_Grb2_SOS + Ras_GTP; k38*pEGF_EGFR2_Grb2_SOS_Ras_GDP;
    k38 = 0.1434;
  r37: pEGF_EGFR2_Grb2_SOS + Ras_GDP -> pEGF_EGFR2_Grb2_SOS_Ras_GDP; k37*pEGF_EGFR2_Grb2_SOS*Ras_GDP - kr37*pEGF_EGFR2_Grb2_SOS_Ras_GDP;
    k37 = 202.9; kr37 = 0.18;
  r40: Ras_GTP + Ras_GAP -> Ras_GTP_Ras_GAP; k40*Ras_GTP*Ras_GAP - kr40*Ras_GTP_Ras_GAP;
    k40 = 2.854; kr40 = 0.96;
  r41: Ras_GTP_Ras_GAP => Ras_GDP + Ras_GAP; k41*Ras_GTP_Ras_GAP;
    k41 = 7.76;
  r42: pEGF_EGFR2 + Ras_GAP -> pEGF_EGFR2_Ras_GAP; k42*pEGF_EGFR2*Ras_GAP - kr42*pEGF_EGFR2_Ras_GAP;
    k42 = 0.1; kr42 = 0.01;
  r43: pEGF_EGFR2_Ras_GAP + Ras_GTP -> pEGF_EGFR2_Ras_GAP_Ras_GTP; k43*pEGF_EGFR2_Ras_GAP*Ras_GTP - kr43*pEGF_EGFR2_Ras_GAP_Ras_GTP;
    k43 = 2.845; kr43 = 0.96;
  r44: pEGF_EGFR2_Ras_GAP_Ras_GTP => pEGF_EGFR2_Ras_GAP + Ras_GDP; k44*pEGF_EGFR2_Ras_GAP_Ras_GTP;
    k44 = 7.76;
  r45: pEGF_EGFR2_Ras_GAP + SHP -> pEGF_EGFR2_Ras_GAP_SHP2; k45*pEGF_EGFR2_Ras_GAP*SHP - kr45*pEGF_EGFR2_Ras_GAP_SHP2;
    k45 = 3.114; kr45 = 0.2;
  r46: pEGF_EGFR2_Ras_GAP_SHP2 => EGF_EGFR2 + Ras_GAP + SHP; k46*pEGF_EGFR2_Ras_GAP_SHP2;
    k46 = 2.661;
  r47: Raf1 + Ras_GTP -> Raf1_Ras_GTP; k47*Raf1*Ras_GTP - kr47*Raf1_Ras_GTP;
    k47 = 1.75; kr47 = 0.05;
  r48: Raf1_Ras_GTP => Raf1active + Ras_GTP; k48*Raf1_Ras_GTP;
    k48 = 0.7624;
  r49: Raf1active + MEK -> Raf1active_MEK; k49*Raf1active*MEK - kr49*Raf1active_MEK;
    k49 = 4; kr49 = 0.01833;
  r50: Raf1active_MEK => Raf1active + pMEK; k50*Raf1active_MEK;
    k50 = 3.5;
  r51: Raf1active + pMEK -> Raf1active_pMEK; k51*Raf1active*pMEK - kr51*Raf1active_pMEK;
    k51 = 4; kr51 = 0.01833;
  r52: Raf1active_pMEK => Raf1active + ppMEK; k52*Raf1active_pMEK;
    k52 = 2.9;
  r53: ppMEK + ERK -> ppMEK_ERK; k53*ppMEK*ERK - kr53*ppMEK_ERK;
    k53 = 3; kr53 = 0.033;
  r54: ppMEK_ERK => ppMEK + pERK; k54*ppMEK_ERK;
    k54 = 16;
  r55: ppMEK + pERK -> ppMEK_pERK; k55*ppMEK*pERK - kr55*ppMEK_pERK;
    k55 = 3; kr55 = 0.033;
  r56: ppMEK_pERK => ppMEK + ppERK; k56*ppMEK_pERK;
    k56 = 5.7;
  r57: Raf1active + Pase -> Raf1active_Pase; k57*Raf1active*Pase - kr57*Raf1active_Pase;
    k57 = 71.7; kr57 = 0.2;
  r58: Raf1active_Pase => Raf1 + Pase; k58*Raf1active_Pase;
    k58 = 1;
  r59: ppMEK + Pase2 -> ppMEK_Pase2; k59*ppMEK*Pase2 - kr59*ppMEK_Pase2;
    k59 = 14.3; kr59 = 0.8;
  r60: ppMEK_Pase2 => pMEK + Pase2; k60*ppMEK_Pase2;
    k60 = 0.058;
  r61: pMEK + Pase2 -> pMEK_Pase2; k61*pMEK*Pase2 - kr61*pMEK_Pase2;
    k61 = 0.25; kr61 = 0.5;
  r62: pMEK_Pase2 => MEK + Pase2; k62*pMEK_Pase2;
    k62 = 0.058;
  r63: ppERK + Pase3 -> ppERK_Pase3; k63*ppERK*Pase3 - kr63*ppERK_Pase3;
    k63 = 7; kr63 = 0.6;
  r64: ppERK_Pase3 => pERK + Pase3; k64*ppERK_Pase3;
    k64 = 0.27;
  r66: pERK_Pase3 => ERK + Pase3; k66*pERK_Pase3;
    k66 = 0.3;
  r65: pERK + Pase3 -> pERK_Pase3; k65*pERK*Pase3 - kr65*pERK_Pase3;
    k65 = 5; kr65 = 0.5;
  r67: ppERK + pEGF_EGFR2_pShc_Grb2_SOS -> ppERK_pEGF_EGFR2_pShc_Grb2_SOS; k67*ppERK*pEGF_EGFR2_pShc_Grb2_SOS - kr67*ppERK_pEGF_EGFR2_pShc_Grb2_SOS;
    k67 = 8.898; kr67 = 1;
  r68: ppERK_pEGF_EGFR2_pShc_Grb2_SOS => ppERK + pEGF_EGFR2 + pShc + Grb2 + pSOS; k68*ppERK_pEGF_EGFR2_pShc_Grb2_SOS;
    k68 = 0.0426;
  r69: ppERK + pEGF_EGFR2_Grb2_SOS -> ppERK_pEGF_EGFR2_Grb2_SOS; k69*ppERK*pEGF_EGFR2_Grb2_SOS - kr69*ppERK_pEGF_EGFR2_Grb2_SOS;
    k69 = 8.898; kr69 = 1;
  r70: ppERK_pEGF_EGFR2_Grb2_SOS => ppERK + pEGF_EGFR2 + Grb2 + pSOS; k70*ppERK_pEGF_EGFR2_Grb2_SOS;
    k70 = 0.0426;
  r71: pSOS => SOS; k71*pSOS;
    k71 = 0.002;
  r72: ProEGFR => EGFR; k72*ProEGFR;
    k72 = 0.005;
  r73: pEGF_EGFR2_pShc_Grb2_SOS + cbl -> pEGF_EGFR2_pShc_Grb2_SOS_cbl; k73*pEGF_EGFR2_pShc_Grb2_SOS*cbl - k73r*pEGF_EGFR2_pShc_Grb2_SOS_cbl;
    k73 = 0.2; k73r = 0.0025;
  r74: pEGF_EGFR2_pShc_Grb2_SOS_cbl + EPn -> pEGF_EGFR2_pShc_Grb2_SOS_cbl_EPn; k74*pEGF_EGFR2_pShc_Grb2_SOS_cbl*EPn - k74r*pEGF_EGFR2_pShc_Grb2_SOS_cbl_EPn;
    k74 = 2; k74r = 0.05;
  r75: pEGF_EGFR2_pShc_Grb2_SOS_cbl_EPn => cbl + Grb2_SOS + EPn + pShc; k75*pEGF_EGFR2_pShc_Grb2_SOS_cbl_EPn;
    k75 = 0.0005;
  r76: pEGF_EGFR2_Grb2_SOS + cbl -> pEGF_EGFR2_Grb2_SOS_cbl; k76*pEGF_EGFR2_Grb2_SOS*cbl - k76r*pEGF_EGFR2_Grb2_SOS_cbl;
    k76 = 0.2; k76r = 0.0025;
  r77: pEGF_EGFR2_Grb2_SOS_cbl + EPn -> pEGF_EGFR2_Grb2_SOS_cbl_EPn; k77*pEGF_EGFR2_Grb2_SOS_cbl*EPn - k77r*pEGF_EGFR2_Grb2_SOS_cbl_EPn;
    k77 = 2; k77r = 0.05;
  r78: pEGF_EGFR2_Grb2_SOS_cbl_EPn => cbl + Grb2_SOS + EPn; k78*pEGF_EGFR2_Grb2_SOS_cbl_EPn;
    k78 = 0.0005;
  r79: pEGF_EGFR2 + cbl -> pEGF_EGFR2_cbl; k79*pEGF_EGFR2*cbl - k79r*pEGF_EGFR2_cbl;
    k79 = 0.2; k79r = 0.0005;
  r80: pEGF_EGFR2_cbl + EPn -> pEGF_EGFR2_cbl_EPn; k80*pEGF_EGFR2_cbl*EPn - kr80*pEGF_EGFR2_cbl_EPn;
    k80 = 2; kr80 = 0.05;
  r81: pEGF_EGFR2_cbl_EPn => cbl + EPn; k81*pEGF_EGFR2_cbl_EPn;
    k81 = 0.0005;
  r82: pEGF_EGFR2 + PI3K -> pEGF_EGFR2_PI3K; k82*pEGF_EGFR2*PI3K - kr82*pEGF_EGFR2_PI3K;
    k82 = 14; kr82 = 0.1743;
  r83: pEGF_EGFR2_PI3K -> pEGF_EGFR2_pPI3K; k83*pEGF_EGFR2_PI3K - kr83*pEGF_EGFR2_pPI3K;
    k83 = 33.72; kr83 = 0.0003372;
  r84: pEGF_EGFR2_PI3K -> pEGF_EGFR2 + pPI3K; k84*pEGF_EGFR2_PI3K - kr84*pEGF_EGFR2*pPI3K;
    k84 = 0.09; kr84 = 0.1764;
  r85: TP4 + pPI3K -> TP4_pPI3K; k85*TP4*pPI3K - kr85*TP4_pPI3K;
    k85 = 1; kr85 = 0.038;
  r86: TP4_pPI3K => TP4_PI3K; k86*TP4_pPI3K;
    k86 = 0.595;
  r87: TP4_PI3K -> TP4 + PI3K; k87*TP4_PI3K - kr87*TP4*PI3K;
    k87 = 4.7e-6; kr87 = 2.297e-6;
  r88: pPI3K + PIP2 -> pPI3K_PIP2; k88*pPI3K*PIP2 - kr88*pPI3K_PIP2;
    k88 = 25; kr88 = 3.5;
  r89: pPI3K_PIP2 => pPI3K + PIP3; k89*pPI3K_PIP2;
    k89 = 25;
  r90: Akt + PIP3 -> Aktm; k90*Akt*PIP3 - kr90*Aktm;
    k90 = 10; kr90 = 1;
  r91: Aktm + PDK1 -> Aktm_PDK1; k91*Aktm*PDK1 - kr91*Aktm_PDK1;
    k91 = 10; kr91 = 1;
  r92: Aktm_PDK1 => pAktm_PDK1; k92*Aktm_PDK1;
    k92 = 10;
  r93: pAktm_PDK1 -> pAktm + PDK1; k93*pAktm_PDK1 - kr93*pAktm*PDK1;
    k93 = 0.1; kr93 = 0.005;
  r94: pAktm -> pAkt + PIP3; k94*pAktm - kr94*pAkt*PIP3;
    k94 = 1; kr94 = 0.001;
  r95: pAkt_Takt => Akt_Takt; k95*pAkt_Takt;
    k95 = 0.05;
  r96: Akt_Takt -> Akt + Takt; k96*Akt_Takt - kr96*Akt*Takt;
    k96 = 0.001; kr96 = 0.001;
  r97: pAkt + Takt -> pAkt_Takt; k97*pAkt*Takt - kr97*pAkt_Takt;
    k97 = 10; kr97 = 1;
  r98: pAktm + Takt -> pAktm_Takt; k98*pAktm*Takt - kr98*pAktm_Takt;
    k98 = 10; kr98 = 1;
  r99: pAktm_Takt => Aktm_Takt; k99*pAktm_Takt;
    k99 = 0.05;
  r100: Aktm_Takt -> Aktm + Takt; k100*Aktm_Takt - kr100*Aktm*Takt;
    k100 = 0.001; kr100 = 0.001;
  r101: pAktm_PDK1 + Takt -> pAktm_PDK1_Takt; k101*pAktm_PDK1*Takt - kr101*pAktm_PDK1_Takt;
    k101 = 10; kr101 = 1;
  r102: pAktm_PDK1_Takt => Aktm_PDK1_Takt; k102*pAktm_PDK1_Takt;
    k102 = 0.05;
  r103: Aktm_PDK1_Takt -> Aktm_PDK1 + Takt; k103*Aktm_PDK1_Takt - kr103*Aktm_PDK1*Takt;
    k103 = 0.001; kr103 = 0.001;
  r104: Raf1active => pRaf1active; Kon*pAkt_total*Raf1active/(Km + Raf1active);  // modifiers: pAkt_total
    Kon = 0.1; Km = 0.2;
  r105: pRaf1active => Raf1active; k105*pRaf1active;
    k105 = 1;
  r106: pEGF_EGFR2 + STAT3c -> pEGF_EGFR2_STAT3c; k106*pEGF_EGFR2*STAT3c - k106r*pEGF_EGFR2_STAT3c;
    k106 = 5.5; k106r = 11.74;
  r107: pEGF_EGFR2_STAT3c => pEGF_EGFR2 + pSTAT3c; K107*pEGF_EGFR2_STAT3c;
    K107 = 0.4;
  r108: pEGF_EGFR2 + pSTAT3c -> pEGF_EGFR2_pSTAT3c; K108*pEGF_EGFR2*pSTAT3c - K108r*pEGF_EGFR2_pSTAT3c;
    K108 = 5; K108r = 0.5;
  r109: pSTAT3c + PP1 -> pSTAT3c_PP1; k109*pSTAT3c*PP1 - k109r*pSTAT3c_PP1;
    k109 = 1; k109r = 0.2;
  r110: pSTAT3c_PP1 => STAT3c + PP1; k110*pSTAT3c_PP1;
    k110 = 0.003;
  r111: pSTAT3c + pSTAT3c -> pSTAT3c_pSTAT3c; k111*pSTAT3c*pSTAT3c - k111r*pSTAT3c_pSTAT3c;
    k111 = 20; k111r = 0.1;
  r112: pSTAT3c_pSTAT3c + PP1 -> pSTAT3c_pSTAT3c_PP1; k112*pSTAT3c_pSTAT3c*PP1 - k112r*pSTAT3c_pSTAT3c_PP1;
    k112 = 1; k112r = 0.2;
  r113: pSTAT3c_pSTAT3c_PP1 => STAT3c_pSTAT3c + PP1; k113*pSTAT3c_pSTAT3c_PP1;
    k113 = 0.003;
  r114: STAT3c + pSTAT3c -> STAT3c_pSTAT3c; k114*STAT3c*pSTAT3c - k114r*STAT3c_pSTAT3c;
    k114 = 0.0002; k114r = 0.2;
  r115: pSTAT3c_pSTAT3c => pSTAT3n_pSTAT3n; k115*pSTAT3c_pSTAT3c;
    k115 = 0.005;
  r116: pSTAT3n + pSTAT3n -> pSTAT3n_pSTAT3n; k116*pSTAT3n*pSTAT3n - k116r*pSTAT3n_pSTAT3n;
    k116 = 20; k116r = 0.1;
  r117: pSTAT3n_pSTAT3n + PP2 -> pSTAT3n_pSTAT3n_PP2; k117*pSTAT3n_pSTAT3n*PP2 - k117r*pSTAT3n_pSTAT3n_PP2;
    k117 = 1; k117r = 0.2;
  r118: pSTAT3n_pSTAT3n_PP2 => STAT3n_pSTAT3n + PP2; k118*pSTAT3n_pSTAT3n_PP2;
    k118 = 0.005;
  r119: STAT3n + pSTAT3n -> STAT3n_pSTAT3n; k119*STAT3n*pSTAT3n - k119r*STAT3n_pSTAT3n;
    k119 = 0.0002; k119r = 0.2;
  r120: pSTAT3n + PP2 -> pSTAT3n_PP2; k120*pSTAT3n*PP2 - k120r*pSTAT3n_PP2;
    k120 = 1; k120r = 0.2;
  r121: pSTAT3n_PP2 => STAT3n + PP2; k121*pSTAT3n_PP2;
    k121 = 0.005;
  r122: STAT3n => STAT3c; k122*STAT3n;
    k122 = 0.05;
  r123: PIP3 => PIP2; k123*PIP3;
    k123 = 17;
  r124: pEGF_EGFR2_STAT3c + cbl -> pEGF_EGFR2_STAT3c_cbl; k124*pEGF_EGFR2_STAT3c*cbl - kr124*pEGF_EGFR2_STAT3c_cbl;
    k124 = 0.2; kr124 = 0.005;
  r125: pEGF_EGFR2_STAT3c_cbl + EPn -> pEGF_EGFR2_STAT3c_cbl_EPn; k125*pEGF_EGFR2_STAT3c_cbl*EPn - kr125*pEGF_EGFR2_STAT3c_cbl_EPn;
    k125 = 2; kr125 = 0.05;
  r126: pEGF_EGFR2_STAT3c_cbl_EPn => STAT3c + cbl + EPn; k126*pEGF_EGFR2_STAT3c_cbl_EPn;
    k126 = 0.0005;
  r127: pEGF_EGFR2_PI3K + cbl -> pEGF_EGFR2_PI3K_cbl; k127*pEGF_EGFR2_PI3K*cbl - kr127*pEGF_EGFR2_PI3K_cbl;
    k127 = 0.2; kr127 = 0.005;
  r128: pEGF_EGFR2_PI3K_cbl + EPn -> pEGF_EGFR2_PI3K_cbl_EPn; k128*pEGF_EGFR2_PI3K_cbl*EPn - kr128*pEGF_EGFR2_PI3K_cbl_EPn;
    k128 = 2; kr128 = 0.05;
  r129: pEGF_EGFR2_PI3K_cbl_EPn => PI3K + EPn; k129*pEGF_EGFR2_PI3K_cbl_EPn;
    k129 = 0.0005;

  // Unit definitions:
  unit volume = litre;
  unit substance = mole;
  unit area = metre^2;
end
