// SBML level 2 version 4
// This model was downloaded from BioModels Database
// http://www.ebi.ac.uk/biomodels/

model MODEL1301110000()
  // Saeidi2012 - Quorum sensing device that produces GFP
  // Saeidi et al. (2012) has modelled a quorum sensing device that produces green fluorescent protein (GFP) as reporter in the presence of Acyl Homoserine Lactone (AHL).
  // This model is described in the article:
  // Characterization of a quorum sensing device for synthetic biology design: Experimental and modeling validation
  // Nazanin Saeidi, Mohamed Arshath, Matthew Wook Chang, Chueh Loo Poh
  // Chemical Engineering Science. December 2012.
  // Abstract:
  // Modeling of biological parts is of crucial importance as it enables the in silico study of synthetic biological systems prior to the actual construction of genetic circuits, which can be time consuming and costly. Because standard biological parts are utilized to build the synthetic systems, it is important that each of these standard parts is well characterized and has a corresponding mathematical model that could simulate the characteristics of the part. These models could be used in computer aided design (CAD) tools during the design stage to facilitate the building of the model of biological systems. This paper describes the development of a mathematical model that is able to simulate both the dynamic and static performance of a biological device created using standard parts. We modeled an example quorum sensing device that produces green fluorescent protein (GFP) as reporter in the presence of Acyl Homoserine Lactone (AHL). The parameters of the model were estimated using experimental results. The simulation results show that the model was able to simulate behavior similar to experimental results. Since it is important that these models and the content in the models can be searchable and readable by machines, standard SBML (system biology markup language) format was used to store the models. All parts and reactions are fully annotated to enable easy searching, and the models follow the Minimum Information Requested In the Annotation of Models (MIRIAM) compliance as well as the Minimum Information About a Simulation Experiment (MIASE).
  // Figure 4a of the reference publication has been reproduced as curation figure. The plot shows the performance of the model at different concentrations of the inducer (3OC12HSL=5E-10, 5E-07, 5E-07).
  // This model is hosted on BioModels Database and identified by: MODEL1301110000 .
  // To cite BioModels Database, please use: BioModels Database: An enhanced, curated and annotated resource for published quantitative kinetic models .
  // To the extent possible under law, all copyright and related or neighbouring rights to this encoded model have been dedicated to the public domain worldwide. Please refer to CC0 Public Domain Dedication for more information.
  // biomodels.db:MODEL1301110000
  // biomodels.db:BIOMD0000000438
  // isDescribedBy doi:10.1016/j.ces.2012.12.016
  // hasTaxon taxonomy:131567
  // isVersionOf GO:0009372

  // Compartments:
  compartment default = 1 volume;

  // Species:
  substanceOnly species Ptet_LasR in default = 1e-5; Ptet_LasR is "Ptet-LasR";
  substanceOnly species LasR in default = 1e-6;  // uniprot:P25084
  substanceOnly species sa3_degraded in default = 0;
  species _3OC12HSL in default = 5e-6;  // CHEBI:56080
  substanceOnly species pLuxR in default = 1e-5;
  species A_pLux in default = 0;  // isVersionOf GO:0000428
  species sa6_degraded in default = 0;
  species LasR_AHL in default = 0; LasR_AHL is "LasR/AHL";  // isVersionOf GO:0005667
  substanceOnly species mRNA_LasR in default = 0; mRNA_LasR is "mRNA(LasR)";  // isVersionOf CHEBI:33699
  species GFP in default = 0;  // uniprot:P42212

  // Reactions:
  re3: LasR => sa3_degraded; Y2*LasR;  // isVersionOf GO:0030163
    Y2 = 0.0696 substance;
  re2: mRNA_LasR => LasR; k2*mRNA_LasR;  // isVersionOf GO:0006412
    k2 = 35.7 substance;
  re4: LasR + _3OC12HSL => LasR_AHL; LasR*_3OC12HSL*k3 - k4*LasR_AHL;  // isVersionOf GO:0008134
    k3 = 9600000 substance; k4 = 0 substance;
  re5: LasR_AHL + pLuxR => A_pLux; pLuxR*LasR_AHL*k5 - k6*A_pLux;  // isVersionOf GO:0010843
    k5 = 1960000 substance; k6 = 10.2 substance;
  re8: _3OC12HSL => sa6_degraded; Y3*_3OC12HSL;
    Y3 = 0.0002832 substance;
  re1: Ptet_LasR => mRNA_LasR; k1*Ptet_LasR - Y1*mRNA_LasR;  // isVersionOf GO:0009299
    k1 = 3.734 substance; Y1 = 0.348 substance;
  re14: A_pLux => GFP; (K7 + K8*A_pLux^n1/(K9^n1 + A_pLux^n1))*(k10 + K11*A_pLux^n2/(K12^n2 + A_pLux^n2) - GFP);  // isVersionOf GO:0006412
    K7 = 0.004051 substance; K8 = 0.009567 substance; K9 = 9.742e-8 substance; k10 = 6.5e-16 substance; K11 = 1e-14 substance; K12 = 2.4e-7 substance; n1 = 2 substance; n2 = 2 substance;

  // Unit definitions:
  unit substance = mole;
  unit volume = litre;
  unit area = metre^2;
  unit length = metre;
  unit time = second;
end
