// SBML level 3 version 2

model MODEL1402200004()
  // Hui2014 - Age-related changes in articular cartilage
  // This model is described in the article:
  // Oxidative changes and signalling pathways are pivotal in initiating age-related changes in articular cartilage
  // Wang Hui1, David A Young1, Andrew D Rowan1, Xin Xu2, Tim E Cawston1, Carole J Proctor1,3
  // Annals of the Rheumatic Diseases
  // Abstract:
  // Objective: To use a computational approach to investigate the cellular and extracellular matrix changes that occur with age in the knee joints of mice. Methods: Knee joints from an inbred C57/BL1/6 (ICRFa) mouse colony were harvested at 3–30?months of age. Sections were stained with H&E, Safranin-O, Picro-sirius red and antibodies to matrix metalloproteinase-13 (MMP-13), nitrotyrosine, LC-3B, Bcl-2, and cleaved type II collagen used for immunohistochemistry. Based on this and other data from the literature, a computer simulation model was built using the Systems Biology Markup Language using an iterative approach of data analysis and modelling. Individual parameters were subsequently altered to assess their effect on the model. Results: A progressive loss of cartilage matrix occurred with age. Nitrotyrosine, MMP-13 and anaplastic lymphoma kinase (ALK1) staining in cartilage increased with age with a concomitant decrease in LC-3B and Bcl-2. Stochastic simulations from the computational model showed a good agreement with these data, once transforming growth factor-? signalling via ALK1/ALK5 receptors was included. Oxidative stress and the interleukin 1 pathway were identified as key factors in driving the cartilage breakdown associated with ageing. Conclusions: A progressive loss of cartilage matrix and cellularity occurs with age. This is accompanied with increased levels of oxidative stress, apoptosis and MMP-13 and a decrease in chondrocyte autophagy. These changes explain the marked predisposition of joints to develop osteoarthritis with age. Computational modelling provides useful insights into the underlying mechanisms involved in age-related changes in musculoskeletal tissues.
  // This model is hosted on BioModels Database and identified by: BIOMD0000000560.
  // To cite BioModels Database, please use: BioModels Database: An enhanced, curated and annotated resource for published quantitative kinetic models.
  // To the extent possible under law, all copyright and related or neighbouring rights to this encoded model have been dedicated to the public domain worldwide. Please refer to CC0 Public Domain Dedication for more information.
  // biomodels.db:MODEL1402200004
  // biomodels.db:BIOMD0000000560
  // isDescribedBy pubmed:25475114
  // hasProperty DOID:8398
  // isVersionOf GO:0001322 GO:0051216
  // hasTaxon taxonomy:10090
  // model units - substance: substance, time: second, volume: volume, area: area, length: metre, extent: substance

  // Compartments:
  compartment cell = 1 volume;  // isVersionOf GO:0005623
  compartment nucleus = 1 volume;  // isVersionOf GO:0005634
  compartment membrane = 1 volume;  // isVersionOf GO:0016020
  compartment ecm = 1 volume;  // isVersionOf GO:0065010

  // Species:
  substanceOnly species AcanmRNA in cell = 0;  // isVersionOf uniprot:P16112
  substanceOnly species ADAMTS5 in cell = 0;  // isVersionOf uniprot:Q9UNA0
  substanceOnly species AGEprod in cell = 0;
  substanceOnly species Alk1 in cell = 500;  // isVersionOf uniprot:P37023
  substanceOnly species Alk1_Alk5 in cell = 0;  // hasPart uniprot:P37023 uniprot:P36897
  substanceOnly species Alk5 in cell = 500;  // isVersionOf uniprot:P36897
  substanceOnly species Alk5_dimer in cell = 0;  // isVersionOf uniprot:P36897
  substanceOnly species Bax in cell = 0;  // isVersionOf uniprot:Q07812
  substanceOnly species Bax_Bcl2 in cell = 90;  // hasPart uniprot:Q07812 uniprot:P10415
  substanceOnly species Bax_Bcl2_Beclin in cell = 10;  // hasPart uniprot:Q07812 uniprot:P10415 uniprot:Q14457
  substanceOnly species Bax_Bcl2_Beclin_I in cell = 0;  // hasPart uniprot:Q07812 uniprot:P10415 uniprot:Q14457
  substanceOnly species Bcl2 in cell = 30;  // isVersionOf uniprot:P10415
  substanceOnly species Bcl2_Beclin in cell = 25;  // hasPart uniprot:P10415 uniprot:Q14457
  substanceOnly species Bcl2_Beclin_I in cell = 0;  // hasPart uniprot:P10415 uniprot:Q14457
  substanceOnly species Beclin in cell = 75;  // isVersionOf uniprot:Q14457
  substanceOnly species Beclin_I in cell = 0;  // isVersionOf uniprot:Q14457
  substanceOnly species Caspase_A in cell = 0;  // isVersionOf uniprot:P42574
  substanceOnly species Caspase_I in cell = 100;  // isVersionOf uniprot:P42574
  substanceOnly species Col2mRNA in cell = 0;  // isVersionOf uniprot:P02458
  substanceOnly species DamP in cell = 0;
  substanceOnly species IkB in cell = 0;  // isVersionOf uniprot:P25963
  substanceOnly species IkB_NFkB in cell = 100;  // hasPart uniprot:P25963 uniprot:Q04206
  substanceOnly species IL1 in cell = 0;  // isVersionOf uniprot:P01583
  substanceOnly species Lys_A in cell = 40;  // isVersionOf GO:0005764
  substanceOnly species Lys_I in cell = 360;  // isVersionOf GO:0005764
  substanceOnly species MMP13 in cell = 0;  // isVersionOf uniprot:P45452
  substanceOnly species MMP2 in cell = 0;  // isVersionOf uniprot:P08253
  substanceOnly species $NatP in cell = 1500;
  substanceOnly species NFkB in cell = 0;  // isVersionOf uniprot:Q04206
  substanceOnly species NFkB_P in cell = 0;  // isVersionOf uniprot:Q04206; PR:000037070
  substanceOnly species p38 in cell = 100;  // isVersionOf uniprot:Q16539
  substanceOnly species p38_P in cell = 0;  // isVersionOf uniprot:Q16539; PR:000037070
  substanceOnly species proMMP13 in cell = 0;  // isVersionOf uniprot:P45452
  substanceOnly species proMMP2 in cell = 0;  // isVersionOf uniprot:P08253
  substanceOnly species RAGE in cell = 0;  // isVersionOf uniprot:Q15109
  substanceOnly species ROS in cell = 2;  // isVersionOf CHEBI:26523
  substanceOnly species Runx2_A in cell = 0;  // isVersionOf uniprot:Q13950
  substanceOnly species Runx2_I in cell = 100;  // isVersionOf uniprot:Q13950
  substanceOnly species Smad1 in cell = 600;  // isVersionOf uniprot:Q15797
  substanceOnly species Smad1_P in cell = 0;  // isVersionOf uniprot:Q15797; PR:000037070
  substanceOnly species Smad1_P_Smad4 in cell = 0;  // hasPart uniprot:Q15797 uniprot:Q13485; PR:000037070
  substanceOnly species Smad2 in cell = 600;  // isVersionOf uniprot:Q15796
  substanceOnly species Smad2_P in cell = 0;  // isVersionOf uniprot:Q15796; PR:000037070
  substanceOnly species Smad2_P_Smad4 in cell = 0;  // hasPart uniprot:Q15796 uniprot:Q13485; PR:000037070
  substanceOnly species Smad4 in cell = 600;  // isVersionOf uniprot:Q13485
  substanceOnly species Smad7 in cell = 0;  // isVersionOf uniprot:O15105
  substanceOnly species SOD in cell = 2;  // isVersionOf uniprot:P00441
  substanceOnly species Sox9 in cell = 100;  // isVersionOf uniprot:P48436
  substanceOnly species Sox9_A in cell = 0;  // isVersionOf uniprot:P48436
  substanceOnly species Sox9mRNA in cell = 10;  // encodes uniprot:P48436
  substanceOnly species Tgfb_A in cell = 0;  // isVersionOf uniprot:P01137
  substanceOnly species Tgfb_Alk1_Alk5 in cell = 0;  // hasPart uniprot:P01137 uniprot:P37023 uniprot:P36897 uniprot:O15105
  substanceOnly species Tgfb_Alk1_Alk5_Smad7 in cell = 0;  // hasPart uniprot:P01137 uniprot:P37023 uniprot:P36897 uniprot:O15105
  substanceOnly species Tgfb_Alk5_dimer in cell = 0;  // hasPart uniprot:P01137 uniprot:P36897
  substanceOnly species Tgfb_Alk5_dimer_Smad7 in cell = 0;  // hasPart uniprot:P01137 uniprot:P36897 uniprot:O15105
  substanceOnly species AggFrag in ecm = 0;  // isVersionOf uniprot:P16112; hasProperty PATO:0001444
  substanceOnly species Aggrecan in ecm = 0;  // isVersionOf uniprot:P16112
  substanceOnly species Aggrecan_Collagen2 in ecm = 1000;  // hasPart uniprot:P16112 uniprot:P02458
  substanceOnly species ColFrag in ecm = 0;  // isVersionOf uniprot:P02458; hasProperty PATO:0001444
  substanceOnly species Collagen2 in ecm = 0;  // isVersionOf uniprot:P02458
  substanceOnly species Integrin in ecm = 0;  // isVersionOf GO:0008305
  substanceOnly species Tgfb_I in ecm = 200;  // isVersionOf uniprot:P01137
  substanceOnly species $Sink in cell = 0;
  substanceOnly species $Source in cell = 1;
  substanceOnly species IntegrinCount in ecm = 0;  // isVersionOf GO:0008305; PATO:0000070

  // Parameters:
  kactCasp = 1e-7;
  kactCaspBecI = 8.3e-7;
  kactCaspp38 = 8e-7;
  kactIntegrin = 4e-7;
  kactLys = 1e-8;
  kactMMP13 = 0.0001;
  kactMMP2 = 1e-7;
  kactNFkB = 0.0001;
  kactRAGE = 0.001;
  kactRunx2 = 0.001;
  kactSox9 = 5e-6;
  kactTgfbIntegrin = 0.001;
  kactTgfbMMP2 = 1e-7;
  kbinAggrecanCollagen2 = 0.0001;
  kbinAlk1Alk5 = 5e-5;
  kbinBaxBcl2 = 1.67;
  kbinBaxToBcl2Bec = 0.000167;
  kbinBcl2Beclin = 7.5e-5;
  kbinBecToBaxBcl2 = 1.67e-5;
  kbinSmad1Smad4 = 5e-5;
  kbinSmad2Smad4 = 0.0001;
  kbinSmad7Alk1 = 0.5;
  kbinSmad7Alk5 = 2e-5;
  kbinTgfbAlk1 = 2e-5;
  kbinTgfbAlk5 = 3e-5;
  kdamLys = 5e-6;
  kdamNatP = 8e-6;
  kdedimerAlk5 = 0.001;
  kdegAcanmRNA = 9e-6;
  kdegADAMTS5 = 5e-5;
  kdegAggrecan = 1e-9;
  kdegAlk1 = 1.2e-8;
  kdegAlk5 = 4e-7;
  kdegBcl2 = 0.000167;
  kdegBcl2Casp = 0.00167;
  kdegBcl2ROS = 0.00167;
  kdegCol2mRNA = 1.07e-5;
  kdegCollagen = 1e-8;
  kdegDamP = 4e-5;
  kdegIkB = 1e-6;
  kdegIL1 = 0.005;
  kdegMMP13 = 6.4e-6;
  kdegMMP2 = 6.4e-6;
  kdegSmad7 = 0.005;
  kdegSmad7Alk1 = 5e-6;
  kdegSmad7Alk5 = 1e-5;
  kdegSOD = 0.001;
  kdegSox9 = 4.8e-5;
  kdegSox9mRNA = 0.0001;
  kdegTgfb = 0.00578;
  kdephosNFkB = 0.01;
  kdephosp38 = 0.01;
  kdephosSmad1 = 0.0005;
  kdephosSmad1Smad7 = 0.0006;
  kdephosSmad2 = 0.006;
  kdimerAlk5 = 0.0002;
  kgenROS = 0.0005;
  kgenROSbyDamP = 0.0001;
  kgenROSbyp38 = 0.0001;
  kgenROSbyRAGE = 0.0004;
  kinactBec = 5e-10;
  kinactBecCasp = 1e-8;
  kinactCasp = 0.0003;
  kinactCaspBcl2 = 0.0003;
  kinactIntegrin = 0.0005;
  kinactNFkB = 0.1;
  kinactRAGE = 0.001;
  kinactRunx2 = 0.0005;
  kinactSox9 = 0.0015;
  kinactTgfb = 0.05;
  kinhibLys = 7e-6;
  kphosNFkB = 0.001;
  kphosp38 = 1e-7;
  kphosp38ROS = 0.0001;
  kphosSmad1 = 2e-5;
  kphosSmad2 = 4e-5;
  kprodAGE = 1e-6;
  krelAlk1Alk5 = 0.01;
  krelBaxBcl2 = 0.00167;
  krelBaxBcl2Bec = 0.00167;
  krelBcl2Beclin = 0.0005;
  krelBecBaxBcl2 = 0.0167;
  krelSmad1Smad4 = 0.0167;
  krelSmad2Smad4 = 0.0167;
  krelSmad7Alk1 = 0.001;
  krelSmad7Alk5 = 1e-6;
  krelTgfbAlk1 = 1e-6;
  krelTgfbAlk5 = 1e-6;
  kremROS = 0.000383;
  kremROSbySOD = 0.0001;
  ksynAcanmRNA = 0;
  ksynAcanmRNASox9A = 4.6e-6;
  ksynADAMTS5 = 0.0005;
  ksynAggrecan = 1e-6;
  ksynAlk1 = 5e-6;
  ksynAlk5 = 5e-6;
  ksynBcl2 = 0.002;
  ksynCol2 = 1e-7;
  ksynCol2mRNA = 0;
  ksynCol2mRNASmad = 1e-6;
  ksynCol2mRNASox9A = 1e-6;
  ksynIkB = 0.001;
  ksynIL1 = 0.005;
  ksynMMP13 = 3.2e-5;
  ksynMMP13Runx2 = 1.5e-6;
  ksynMMP2 = 5e-6;
  ksynNatP = 0;
  ksynRAGE = 0.0001;
  ksynSmad7 = 1e-5;
  ksynSOD = 0.002;
  ksynSox9 = 0.00048;
  ksynSox9mRNA = 1e-5;
  ksynSox9mRNASox9A = 5e-6;

  // Reactions:
  CaspaseActivation: Caspase_I + Bax => Caspase_A + Bax; kactCasp*Caspase_I*Bax;
  CaspaseActivationByBeclin_I: Caspase_I + Beclin_I => Caspase_A + Beclin_I; kactCaspBecI*Caspase_I*Beclin_I;
  CaspaseActivationBy_p38: Caspase_I + p38_P => Caspase_A + p38_P; kactCaspp38*Caspase_I*p38_P;
  CaspaseInactivation1: Caspase_A => Caspase_I; kinactCasp*Caspase_A;
  InhibitCaspase2: Caspase_A + Bcl2_Beclin => Caspase_I + Bcl2_Beclin; kinactCaspBcl2*Caspase_A*Bcl2_Beclin;
  InhibitCaspase3: Caspase_A + Bcl2 => Caspase_I + Bcl2; kinactCaspBcl2*Caspase_A*Bcl2;
  ActivateLysosome: Lys_I + Beclin => Lys_A + Beclin; kactLys*Lys_I*Beclin;
  InhibitLysosome: Lys_A => Lys_I; kinhibLys*Lys_A;
  Bcl2Synthesis: $Source => Bcl2; ksynBcl2*Source;
  Bcl2Degradation: Bcl2 => $Sink; kdegBcl2*Bcl2;
  Bcl2DegradationStressInduced: Bcl2 + ROS => $Sink + ROS; kdegBcl2ROS*Bcl2*ROS;
  Bcl2DegradationCaspaseInduced: Bcl2 + Caspase_A => $Sink + Caspase_A; kdegBcl2Casp*Bcl2*Caspase_A;
  Bax_Bcl2Binding: Bax + Bcl2 => Bax_Bcl2; kbinBaxBcl2*Bax*Bcl2;
  Bax_Bcl2Release: Bax_Bcl2 => Bax + Bcl2; krelBaxBcl2*Bax_Bcl2;
  Bcl2_BeclinBinding: Bcl2 + Beclin => Bcl2_Beclin; kbinBcl2Beclin*Bcl2*Beclin;
  Bcl2_BeclinRelease: Bcl2_Beclin => Bcl2 + Beclin; krelBcl2Beclin*Bcl2_Beclin;
  Bcl2_Beclin_I_Binding: Bcl2 + Beclin_I => Bcl2_Beclin_I; kbinBcl2Beclin*Bcl2*Beclin_I;
  Bcl2_Beclin_I_Release: Bcl2_Beclin_I => Bcl2 + Beclin_I; krelBcl2Beclin*Bcl2_Beclin_I;
  BeclinInactivation: Beclin => Beclin_I; kinactBec*Beclin;
  BeclinInactivationByCaspase: Beclin + Caspase_A => Beclin_I + Caspase_A; kinactBecCasp*Beclin*Caspase_A;
  BeclinBindingToBax_Bcl2: Beclin + Bax_Bcl2 => Bax_Bcl2_Beclin; kbinBecToBaxBcl2*Beclin*Bax_Bcl2;
  BeclinIBindingToBax_Bcl2: Beclin_I + Bax_Bcl2 => Bax_Bcl2_Beclin_I; kbinBecToBaxBcl2*Beclin_I*Bax_Bcl2;
  BaxBindingToBcl2_Beclin: Bax + Bcl2_Beclin => Bax_Bcl2_Beclin; kbinBaxToBcl2Bec*Bax*Bcl2_Beclin;
  BaxBindingToBcl2_BeclinI: Bax + Bcl2_Beclin_I => Bax_Bcl2_Beclin_I; kbinBaxToBcl2Bec*Bax*Bcl2_Beclin_I;
  BaxDissociation_Bax_Bcl2_Beclin: Bax_Bcl2_Beclin => Bax + Bcl2_Beclin; krelBaxBcl2Bec*Bax_Bcl2_Beclin;
  BaxDissociation_Bax_Bcl2_Beclin_I: Bax_Bcl2_Beclin_I => Bax + Bcl2_Beclin_I; krelBaxBcl2Bec*Bax_Bcl2_Beclin_I;
  BeclinDissociation_Bax_Bcl2_Beclin: Bax_Bcl2_Beclin => Beclin + Bax_Bcl2; krelBecBaxBcl2*Bax_Bcl2_Beclin;
  Beclin_I_Dissociation_Bax_Bcl2_Beclin: Bax_Bcl2_Beclin_I => Beclin_I + Bax_Bcl2; krelBecBaxBcl2*Bax_Bcl2_Beclin_I;
  ROS_generation: $Source => ROS; kgenROS*Source;
  ROS_removal: ROS => $Sink; kremROS*ROS;
  Protein_Damage_by_ROS: $NatP + ROS => DamP + ROS; kdamNatP*NatP*ROS/(10 + ROS);
  Removal_DamP_by_Autophagy: DamP + Lys_A => Lys_A; kdegDamP*DamP*Lys_A;
  Production_of_AGEproducts: $Source => AGEprod; kprodAGE*Source;
  RAGE_activation: AGEprod => AGEprod + RAGE; kactRAGE*AGEprod;
  ROS_production_by_RAGE: RAGE => RAGE + ROS; kgenROSbyRAGE*RAGE;
  IkB_degradation_via_ROS: ROS + IkB_NFkB => ROS + NFkB; kdegIkB*ROS*IkB_NFkB;
  IkB_degradation_via_IL1: IL1 + IkB_NFkB => IL1 + NFkB; kdegIkB*IL1*IkB_NFkB;
  NFkB_inactivation: NFkB + IkB => IkB_NFkB; kinactNFkB*NFkB*IkB;
  RAGE_inactivation: RAGE => $Sink; kinactRAGE*RAGE;
  RAGE_upregulation_byNFkB: NFkB_P => NFkB_P + RAGE; ksynRAGE*NFkB_P;
  IL1_production: NFkB_P => NFkB_P + IL1; ksynIL1*NFkB_P;
  IL1_degradation: IL1 => $Sink; kdegIL1*IL1;
  IkB_production: NFkB_P => NFkB_P + IkB; ksynIkB*NFkB_P;
  MMP13_production: IL1 => IL1 + proMMP13; ksynMMP13*IL1;
  MMP13_removal: MMP13 => $Sink; kdegMMP13*MMP13;
  MMP2_production: IL1 => IL1 + proMMP2; ksynMMP2*IL1;
  MMP_activation: proMMP2 => MMP2; kactMMP2*proMMP2;
  MMP2_degradation: MMP2 => $Sink; kdegMMP2*MMP2;
  ADAMTS5_production: IL1 => IL1 + ADAMTS5; ksynADAMTS5*IL1;
  ADAMTS5_removal: ADAMTS5 => $Sink; kdegADAMTS5*ADAMTS5;
  Aggrecan_degradation: Aggrecan_Collagen2 + ADAMTS5 => Collagen2 + ADAMTS5 + AggFrag; kdegAggrecan*Aggrecan_Collagen2*ADAMTS5;
  Collagen_degradation: Collagen2 + MMP13 => MMP13 + ColFrag; kdegCollagen*Collagen2*MMP13;
  ROS_production_by_DamP: DamP => DamP + ROS; kgenROSbyDamP*DamP;
  Protein_synthesis: $Source => $NatP; ksynNatP*Source;
  SOD_synthesis: NFkB_P => NFkB_P + SOD; ksynSOD*NFkB_P;
  SOD_degradation: SOD => $Sink; kdegSOD*SOD;
  ROS_removal_by_SOD: ROS + SOD => SOD; kremROSbySOD*SOD*ROS;
  p38_phosphorylation: p38 + IL1 => p38_P + IL1; kphosp38*p38*IL1;
  p38_phosphorylation_via_ROS: p38 + ROS => p38_P + ROS; kphosp38ROS*p38*ROS;
  p38_dephosphorylation: p38_P => p38; kdephosp38*p38_P;
  NFkB_activation: NFkB + p38_P => NFkB_P + p38_P; kphosNFkB*NFkB*p38_P;
  NFkB_dephosphorylation: NFkB_P => NFkB; kdephosNFkB*NFkB_P;
  ROS_production_by_p38_P: p38_P => p38_P + ROS; kgenROSbyp38*p38_P;
  Lysosome_damage_by_ROS: Lys_A + ROS => Lys_I + ROS; kdamLys*Lys_A*ROS/(10 + ROS);
  IntegrinActivationByMechanicalStress: $Source => Integrin + IntegrinCount; kactIntegrin*Source;
  IntegrinInactivation: Integrin => $Sink; kinactIntegrin*Integrin;
  Alk5Synthesis: $Source => Alk5; ksynAlk5*Source;
  TgfbActivationByIntegrin: Tgfb_I + Integrin => Tgfb_A + Integrin; kactTgfbIntegrin*Tgfb_I*Integrin;
  TgfbActivationByMMP2: Tgfb_I + MMP2 => Tgfb_A + MMP2; kactTgfbMMP2*Tgfb_I*MMP2;
  TgfbInactivation: Tgfb_A => Tgfb_I; kinactTgfb*Tgfb_A;
  Alk5Dimerisation: 2 Alk5 => Alk5_dimer; kdimerAlk5*Alk5*(Alk5 - 1)*0.5;
  Alk5Dedimerisation: Alk5_dimer => 2 Alk5; kdedimerAlk5*Alk5_dimer;
  Alk1Alk5Binding: Alk1 + Alk5 => Alk1_Alk5; kbinAlk1Alk5*Alk1*Alk5;
  Alk1Alk5Release: Alk1_Alk5 => Alk1 + Alk5; krelAlk1Alk5*Alk1_Alk5;
  TgfbReceptorBindingAlk5: Tgfb_A + Alk5_dimer => Tgfb_Alk5_dimer; kbinTgfbAlk5*Tgfb_A*Alk5_dimer;
  TgfbReceptorRelease: Tgfb_Alk5_dimer => Tgfb_A + Alk5_dimer; krelTgfbAlk5*Tgfb_Alk5_dimer;
  Tgfb_Alk5_BindingSmad7: Tgfb_Alk5_dimer + Smad7 => Tgfb_Alk5_dimer_Smad7; kbinSmad7Alk5*Tgfb_Alk5_dimer*Smad7;
  Tgfb_Alk5_Smad7Release: Tgfb_Alk5_dimer_Smad7 => Tgfb_Alk5_dimer + Smad7; krelSmad7Alk5*Tgfb_Alk5_dimer_Smad7;
  Alk5_Smad7Degradation: Tgfb_Alk5_dimer_Smad7 => Tgfb_I; kdegSmad7Alk5*Tgfb_Alk5_dimer_Smad7;
  TgfbReceptorBindingAlk1: Tgfb_A + Alk1_Alk5 => Tgfb_Alk1_Alk5; kbinTgfbAlk1*Tgfb_A*Alk1_Alk5;
  TgfbAlk1Release: Tgfb_Alk1_Alk5 => Tgfb_A + Alk1_Alk5; krelTgfbAlk1*Tgfb_Alk1_Alk5;
  Smad2Phosphorylation: Tgfb_Alk5_dimer + Smad2 => Tgfb_Alk5_dimer + Smad2_P; kphosSmad2*Tgfb_Alk5_dimer*Smad2;
  Smad2Smad4Binding: Smad2_P + Smad4 => Smad2_P_Smad4; kbinSmad2Smad4*Smad2_P*Smad4;
  Smad2PSmad4Release: Smad2_P_Smad4 => Smad2_P + Smad4; krelSmad2Smad4*Smad2_P_Smad4;
  Smad2DephosphorylationNuc: Smad2_P => Smad2; kdephosSmad2*Smad2_P;
  Smad7Synthesis: Smad2_P_Smad4 => Smad2_P_Smad4 + Smad7; ksynSmad7*Smad2_P_Smad4;
  Sox9Activation: Smad2_P_Smad4 + Sox9 => Smad2_P_Smad4 + Sox9_A; kactSox9*Smad2_P_Smad4*Sox9;
  Sox9Inactivation: Sox9_A => Sox9; kinactSox9*Sox9_A;
  Sox9BasalTranscription: $Source => Sox9mRNA; ksynSox9mRNA*Source;
  Sox9EnhancedTranscription: Sox9_A => Sox9_A + Sox9mRNA; ksynSox9mRNASox9A*Sox9_A;
  Sox9mRNA_Degradation: Sox9mRNA => $Sink; kdegSox9mRNA*Sox9mRNA;
  Sox9Translation: Sox9mRNA => Sox9mRNA + Sox9; ksynSox9*Sox9mRNA;
  Sox9Degradation: Sox9 => $Sink; kdegSox9*Sox9;
  Collagen2EnhancedTranscriptionBySox9: Sox9_A => Sox9_A + Col2mRNA; ksynCol2mRNASox9A*Sox9_A;
  Collagen2TranscriptionBySmad2Smad4: Smad2_P_Smad4 => Smad2_P_Smad4 + Col2mRNA; ksynCol2mRNASmad*Smad2_P_Smad4;
  Col2mRNA_Degradation: Col2mRNA => $Sink; kdegCol2mRNA*Col2mRNA;
  Collagen2Translation: Col2mRNA => Col2mRNA + Collagen2; ksynCol2*Col2mRNA;
  AggrecanEnhancedTranscription: Sox9_A => Sox9_A + AcanmRNA; ksynAcanmRNASox9A*Sox9_A;
  AcanmRNA_Degradation: AcanmRNA => $Sink; kdegAcanmRNA*AcanmRNA;
  AggrecanTranslation: AcanmRNA => AcanmRNA + Aggrecan; ksynAggrecan*AcanmRNA;
  AggrecanCollagen2Binding: Aggrecan + Collagen2 => Aggrecan_Collagen2; kbinAggrecanCollagen2*Aggrecan*Collagen2;
  Runx2_InhibitionBySmad2: Runx2_A + Smad2_P_Smad4 => Runx2_I + Smad2_P_Smad4; kinactRunx2*Runx2_A*Smad2_P_Smad4;
  Alk5Degradation: Alk5 => $Sink; kdegAlk5*Alk5;
  Smad1Activation: Tgfb_Alk1_Alk5 + Smad1 => Tgfb_Alk1_Alk5 + Smad1_P; kphosSmad1*Tgfb_Alk1_Alk5*Smad1;
  Smad1Dephosphorylation: Smad1_P => Smad1; kdephosSmad1*Smad1_P;
  Smad1DephosphorylationViaSmad7: Smad1_P + Smad7 => Smad1 + Smad7; kdephosSmad1Smad7*Smad1_P*Smad7;
  Smad1Smad4Binding: Smad1_P + Smad4 => Smad1_P_Smad4; kbinSmad1Smad4*Smad1_P*Smad4;
  Smad1Smad4Release: Smad1_P_Smad4 => Smad1_P + Smad4; krelSmad1Smad4*Smad1_P_Smad4;
  Runx2ActivationBySmad1: Runx2_I + Smad1_P_Smad4 => Runx2_A + Smad1_P_Smad4; kactRunx2*Runx2_I*Smad1_P_Smad4;
  MMP13InductionByRunx2: Runx2_A => proMMP13 + Runx2_A; ksynMMP13Runx2*Runx2_A;
  Alk1Synthesis: $Source => Alk1; ksynAlk1*Source;
  Alk1Degradation: Alk1 => $Sink; kdegAlk1*Alk1;
  MMP13Activation: proMMP13 => MMP13; kactMMP13*proMMP13;
  Tgfb_Alk1_Alk5_BindingSmad7: Tgfb_Alk1_Alk5 + Smad7 => Tgfb_Alk1_Alk5_Smad7; kbinSmad7Alk1*Tgfb_Alk1_Alk5*Smad7;
  Tgfb_Alk1_Alk5_Smad7Release: Tgfb_Alk1_Alk5_Smad7 => Tgfb_Alk1_Alk5 + Smad7; krelSmad7Alk1*Tgfb_Alk1_Alk5_Smad7;
  Alk1_Smad7Degradation: Tgfb_Alk1_Alk5_Smad7 => Tgfb_I; kdegSmad7Alk1*Tgfb_Alk1_Alk5_Smad7;
  Smad7Degradation: Smad7 => $Sink; kdegSmad7*Smad7;

  // Unit definitions:
  unit substance = item;
  unit volume = litre;
  unit area = metre^2;
end
