// SBML level 3 version 2

function J3Sub(K, X1, G1, X2, G2, X3, G3)
  K*X1^G1*X2^G2*X3^G3;
end

function J1Sub(K, X, G)
  K*X^G;
end

function J2Sub(K, X1, G1, X2, G2)
  K*X1^G1*X2^G2;
end

function J1Sub3Mod(K, X1, G1, X2, G2, X3, G3, X4, G4)
  K*X1^G1*X2^G2*X3^G3*X4^G4;
end

function J2Sub1Mod(K, X1, G1, X2, G2, X3, G3)
  K*X1^G1*X2^G2*X3^G3;
end

function J1Sub1Mod(K, X1, G1, X2, G2)
  K*X1^G1*X2^G2;
end

function J3Sub1Mod(K, X1, G1, X2, G2, X3, G3, X4, G4)
  K*X1^G1*X2^G2*X3^G3*X4^G4;
end

model MODEL1504130001()
  // Sass2009 - Approach to an α-synuclein-based BST model of Parkinson's disease
  // This model is described in the article:
  // A pragmatic approach to biochemical systems theory applied to an alpha-synuclein-based model of Parkinson's disease.
  // Sass MB, Lorenz AN, Green RL, Coleman RA.
  // J. Neurosci. Methods 2009 Apr; 178(2): 366-377
  // Abstract:
  // This paper presents a detailed systems model of Parkinson's disease (PD), developed utilizing a pragmatic application of biochemical systems theory (BST) intended to assist experimentalists in the study of system behavior. This approach utilizes relative values as a reasonable initial estimate for BST and provides a theoretical means of applying numerical solutions to qualitative and semi-quantitative understandings of cellular pathways and mechanisms. The approach allows for the simulation of human disease through its ability to organize and integrate existing information about metabolic pathways without having a full quantitative description of those pathways, so that hypotheses about individual processes may be tested in a systems environment. Incorporating this method, the PD model describes alpha-synuclein aggregation as mediated by dopamine metabolism, the ubiquitin-proteasome system, and lysosomal degradation, allowing for the examination of dynamic pathway interactions and the evaluation of possible toxic mechanisms in the aggregation process. Four system perturbations: elevated alpha-synuclein aggregation, impaired dopamine packaging, increased neurotoxins, and alpha-synuclein overexpression, were analyzed for correlation to qualitative PD system hypotheses present in the literature, with the model demonstrating a high level of agreement with these hypotheses. Additionally, various PD treatment methods, including levadopa and monoamine oxidase inhibition (MAOI) therapy, were applied to the disease models to examine their effects on the system. Future additions and refinements to the model may further the understanding of the emergent behaviors of the disease, helping in the identification of system sensitivities and possible therapeutic targets.
  // This model is hosted on BioModels Database and identified by: BIOMD0000000575.
  // To cite BioModels Database, please use: BioModels Database: An enhanced, curated and annotated resource for published quantitative kinetic models.
  // To the extent possible under law, all copyright and related or neighbouring rights to this encoded model have been dedicated to the public domain worldwide. Please refer to CC0 Public Domain Dedication for more information.
  // biomodels.db:MODEL1504130001
  // biomodels.db:BIOMD0000000575
  // isDescribedBy pubmed:19136028
  // hasTaxon taxonomy:9606
  // isVersionOf GO:0070841 GO:0016236 GO:0061684 GO:0043161 GO:0042417
  // hasProperty DOID:14330
  // model units - substance: substance, time: time, volume: volume, area: area, length: metre, extent: substance

  // Compartments:
  compartment Neuronal_cytosol = 1 volume;  // GO:0005829
  compartment Vesicle = 1 volume;  // GO:0031982
  compartment Autophagosome = 1 volume;  // GO:0005776
  compartment Proteasome = 1 volume;  // GO:0000502
  compartment Lysosome = 1 volume;  // GO:0005764

  // Species:
  // Alpha synuclein protofibril
  species Protofibril in Neuronal_cytosol = 0.05;  // isVersionOf uniprot:P37840
  // Alpha synuclein fibril
  species Fibril in Neuronal_cytosol = 0.025;  // isVersionOf uniprot:P37840; hasProperty GO:0043205
  // Lewy Bodies
  species Lewy_body in Neuronal_cytosol = 0.01;  // isVersionOf uniprot:P37840; hasProperty GO:0097413
  // Dopamine
  species Dopamine in Neuronal_cytosol = 2;  // CHEBI:18243
  // Hydroxide
  species OH in Neuronal_cytosol = 0.5; OH is "OH-";  // CHEBI:16234
  // Hydroxyl radical
  species OH_radical in Neuronal_cytosol = 0.02;  // CHEBI:29191
  // Hidrogen Peroxide
  species H2O2 in Neuronal_cytosol = 0.1;  // CHEBI:16240
  // Dopamine quinone (oxidized form)
  species DA_quinone in Neuronal_cytosol = 0.05;  // hasPart CHEBI:18243 CHEBI:36141
  // Ubiquitin
  species Ubiquitin in Neuronal_cytosol = 1;  // uniprot:P0CG47
  // Ubiquitin-activating enzymes (E1)
  species E1 in Neuronal_cytosol = 0.2;  // uniprot:P22314
  // Ubiquitin - Ubiquitin-activating enzymes (E1)
  species Ub_E1 in Neuronal_cytosol = 0.35; Ub_E1 is "Ub-E1";  // hasPart uniprot:P0CG47 uniprot:P22314
  // Ubiquitin/ISG15-conjugating enzyme E2
  species UbcH8 in Neuronal_cytosol = 0.2;  // uniprot:O14933
  // Ubiquitin - Ubiquitin/ISG15-conjugating enzyme E2
  species UbcH8_Ub in Neuronal_cytosol = 0.35; UbcH8_Ub is "UbcH8-Ub";  // hasPart uniprot:P0CG47 uniprot:O14933
  // E3 ubiquitin-protein ligase parkin
  species Parkin in Neuronal_cytosol = 0.2;  // uniprot:O60260
  // E3 ubiquitin-protein ligase parkin - Substrate
  species Parkin_sub in Neuronal_cytosol = 0.1; Parkin_sub is "Parkin-sub";  // isVersionOf uniprot:O60260
  // E3 ubiquitin-protein ligase parkin - synphilin-1 complex
  species Parkin_synphilin_1 in Neuronal_cytosol = 1.3; Parkin_synphilin_1 is "Parkin-synphilin-1";  // hasPart uniprot:O60260 uniprot:Q9Y6H5
  // E3 ubiquitin-protein ligase parkin - synphilin-1-ubiquitin complex
  species Parkin_synphilin_1_ub in Neuronal_cytosol = 2.5; Parkin_synphilin_1_ub is "Parkin-synphilin-1-ub";  // hasPart uniprot:P0CG47 uniprot:O60260 uniprot:Q9Y6H5
  // E3 ubiquitin-protein ligase parkin - 4 Ubiquitinated substrate
  species Parkin_sub_ub4 in Neuronal_cytosol = 0.2; Parkin_sub_ub4 is "Parkin-sub-ub4";  // hasPart uniprot:P0CG47 uniprot:O60260
  // Degraded fragments
  species Fragments in Neuronal_cytosol = 0.1;  // hasProperty PATO:0002355; isVersionOf CHEBI:16670
  // Ubiquitin carboxyl-terminal hydrolase isozyme L1 (UCH-L1)
  species UCH_L1 in Neuronal_cytosol = 0.5; UCH_L1 is "UCH-L1";  // uniprot:P09936
  // L-3,4-dihydroxyphenylalanine
  species L_Dopa in Neuronal_cytosol = 1; L_Dopa is "L-Dopa";  // CHEBI:15765
  // 3,4-Dihydroxyphenylacetaldehyde (DOPAL)
  species DOPAL in Neuronal_cytosol = 0.05;  // CHEBI:27978
  // 3,4-Dihydroxyphenylacetic acid (DOPAC)
  species DOPAC in Neuronal_cytosol = 0.3;  // CHEBI:41941
  // Glutathione (GSH)
  species GSH in Neuronal_cytosol = 1.5;  // CHEBI:16856
  // Glutathione disulfide (GSSG)
  species GSSG in Neuronal_cytosol = 1.5;  // CHEBI:17858
  // Iron (2+)
  species $Fe2 in Neuronal_cytosol = 0.5; Fe2 is "Fe2+";  // CHEBI:29033
  // Iron (Fe3+)
  species Fe3 in Neuronal_cytosol = 0.5; Fe3 is "Fe3+";  // CHEBI:29034
  // 2 Ubiquitin - Ubiquitin/ISG15-conjugating enzyme E2
  species UbcH8ub2 in Neuronal_cytosol = 0.35;  // hasPart uniprot:P0CG47 uniprot:O14933
  // 3 Ubiquitin - Ubiquitin/ISG15-conjugating enzyme E2
  species UbcH8ub3 in Neuronal_cytosol = 0.35;  // hasPart uniprot:P0CG47 uniprot:O14933
  // 4 Ubiquitin - Ubiquitin/ISG15-conjugating enzyme E2
  species UbcH8ub4 in Neuronal_cytosol = 0.35;  // hasPart uniprot:P0CG47 uniprot:O14933
  // Ubiquitin-conjugating enzyme (E2) / Ubiquitin-conjugating enzyme (Uev1a)
  species UbcH13_Uev1a in Neuronal_cytosol = 0.2; UbcH13_Uev1a is "UbcH13/Uev1a";  // hasPart uniprot:P61088 uniprot:Q13404
  // Ubiquitin - Ubiquitin-conjugating enzyme (E2) / Ubiquitin-conjugating enzyme (Uev1a)
  species UbcH13_Uev1a_ub in Neuronal_cytosol = 0.35; UbcH13_Uev1a_ub is "UbcH13/Uev1a-ub";  // hasPart uniprot:P0CG47 uniprot:P61088 uniprot:Q13404
  // Alpha synuclein - Ubiquitin carboxyl-terminal hydrolase isozyme L1 (UCH-L1)
  species asyn_UCH_L1 in Neuronal_cytosol = 0.1; asyn_UCH_L1 is "asyn-UCH-L1";  // hasPart uniprot:P09936 uniprot:P37840
  // Ubiquitinated alpha synuclein
  species asyn_ub in Neuronal_cytosol = 0.05; asyn_ub is "asyn-ub";  // hasPart uniprot:P0CG47 uniprot:P37840
  // Alpha synuclein protofibril - Ubiquitin carboxyl-terminal hydrolase isozyme L1 (UCH-L1)
  species Protofibril_UCH_L1 in Neuronal_cytosol = 0.025; Protofibril_UCH_L1 is "Protofibril-UCH-L1";  // hasPart uniprot:P09936 uniprot:P37840
  // Ubiquitinated alpha synuclein protofibril
  species Protofibril_Ub in Neuronal_cytosol = 0.013; Protofibril_Ub is "Protofibril-Ub";  // hasPart uniprot:P0CG47 uniprot:P37840
  // Ubiquitin carboxyl-terminal hydrolase isozyme L1 (UCH-L1) - 4 Ubiquitinated alpha synuclein
  species UCH_L1_asyn_ub4 in Neuronal_cytosol = 0.1; UCH_L1_asyn_ub4 is "UCH-L1-asyn-ub4";  // hasPart uniprot:P0CG47 uniprot:P09936 uniprot:P37840
  // Alpha synuclein - Heat shock cognate 70 kDa protein (chaperone)
  species Hsc70_asyn in Neuronal_cytosol = 0.1; Hsc70_asyn is "Hsc70-asyn";  // hasPart uniprot:P37840 uniprot:P11142
  // Alpha synuclein protofibril - Heat shock cognate 70 kDa protein (chaperone)
  species Hsc70_Protofibril in Neuronal_cytosol = 0.025; Hsc70_Protofibril is "Hsc70-Protofibril";  // hasPart uniprot:P37840 uniprot:P11142
  // Alpha synuclein fibril - Heat shock cognate 70 kDa protein (chaperone)
  species Hsc70_fibril in Neuronal_cytosol = 0.013; Hsc70_fibril is "Hsc70-fibril";  // hasPart uniprot:P37840 uniprot:P11142; hasProperty GO:0043205
  // Heat shock cognate 70 kDa protein (chaperone)
  species Hsc70 in Neuronal_cytosol = 0.5;  // uniprot:P11142
  // Dopamine quinone (oxidized form) - E3 ubiquitin-protein ligase parkin
  species DA_S_parkin in Neuronal_cytosol = 0.2; DA_S_parkin is "DA-S-parkin";  // hasPart CHEBI:18243 CHEBI:36141 uniprot:O60260
  // Superoxide radical (O2-)
  species O2 in Neuronal_cytosol = 0.02; O2 is "O2-";  // CHEBI:18421
  // Dopamine - Glutathione (GSH)
  species DA_GSH in Neuronal_cytosol = 0.2; DA_GSH is "DA-GSH";  // hasPart CHEBI:18243 CHEBI:16856
  // Neuromelanin (NM)
  species Neuromelanin in Neuronal_cytosol = 1;  // isVersionOf CHEBI:27404; hasProperty CHEBI:60027
  // Neuromelanin (NM) with neurotoxins and Fe2+. Neurotoxins such as rotenone and MPTP.
  species Neuromelanin_ntox_Fe3 in Neuronal_cytosol = 0.5; Neuromelanin_ntox_Fe3 is "Neuromelanin-ntox-Fe3+";  // hasProperty CHEBI:60027; hasPart CHEBI:27404 CHEBI:29034 CHEBI:50910
  // Alpha synuclein
  species $Alpha_synuclein in Neuronal_cytosol = 0.2;  // uniprot:P37840
  // Adenosine triphosphate (ATP)
  species $ATP in Neuronal_cytosol = 2;  // CHEBI:15422
  // Synphilin-1
  species $Synphilin_1 in Neuronal_cytosol = 0.05; Synphilin_1 is "Synphilin-1";  // uniprot:Q9Y6H5
  // Substrate
  species $Substrate in Neuronal_cytosol = 0.4;
  // Tyrosine hydroxylase (TH)
  species $TH in Neuronal_cytosol = 0.6;  // uniprot:P07101
  // L-Tyrosine
  species $L_Tyr in Neuronal_cytosol = 5; L_Tyr is "L-Tyr";  // CHEBI:17895
  // Carbon dioxide (CO2)
  species $CO2 in Neuronal_cytosol = 0.5;  // CHEBI:16526
  // Neurotoxins such as rotenone and MPTP
  species $Neurotoxins in Neuronal_cytosol = 0.01;  // CHEBI:50910
  // Biogenic amine
  species $Bioamines in Neuronal_cytosol = 0.1;  // isVersionOf CHEBI:32952; hasProperty CHEBI:24432
  // vesicular monoamine transporter 2 (VMAT2)
  species $VMAT2 in Neuronal_cytosol = 2;  // uniprot:Q05940
  // Oxygen (O2)
  species $O2_0 in Neuronal_cytosol = 2;  // CHEBI:15379
  // L-Monoamine oxidases (MAO)
  species $MAO in Neuronal_cytosol = 1.5;  // uniprot:P21397
  // Ammonia (NH3)
  species $NH3 in Neuronal_cytosol = 0.5;  // CHEBI:16134
  // Aldehyde dehydrogenases (ALDH)
  species $ALDH in Neuronal_cytosol = 1.5;  // uniprot:P30838
  // Nicotinamide adenine dinucleotide (oxidized)
  species $NAD in Neuronal_cytosol = 1.5; NAD is "NAD+";  // CHEBI:15846
  // Nicotinamide adenine dinucleotide (reduced)
  species $NADH in Neuronal_cytosol = 1.5;  // CHEBI:16908
  // Catalase
  species $Catalase in Neuronal_cytosol = 1;  // uniprot:P04040
  // Water (H2O)
  species $H2O in Neuronal_cytosol = 3;  // CHEBI:15377
  // Glutathione peroxidase
  species $Gluta_per in Neuronal_cytosol = 0.8;  // uniprot:P07203
  // Glutathione reductase
  species $Gluta_red in Neuronal_cytosol = 0.8;  // uniprot:P78417
  // Aromatic L-amino acid decarboxylase (DDC)
  species $DDC in Neuronal_cytosol = 1.5;  // uniprot:P20711
  // Preautophagosome membrane
  species $Preautophagosome_membrane in Neuronal_cytosol = 1;  // GO:0000421
  // Superoxide dismutases (SOD)
  species $SOD in Neuronal_cytosol = 0.6;  // uniprot:P00441
  // Cysteine
  species $Cysteine in Neuronal_cytosol = 0.5;  // CHEBI:15356
  // Vesicular dopamine
  species V_DA in Vesicle = 10; V_DA is "V-DA";  // CHEBI:18243
  // Vesicular neurotoxins and bio-amines. Neurotoxins such as rotenone and MPTP.
  species V_ntox_ba in Vesicle = 0.3; V_ntox_ba is "V-ntox-ba";  // hasPart CHEBI:50910 CHEBI:32952; hasProperty CHEBI:24432
  // Vesicle
  species $Vesicle_0 in Vesicle = 1;  // GO:0031982
  // Autophagosome
  species Autophagosome_0 in Autophagosome = 0.5;  // GO:0005776
  // Proteasome
  species $Proteasome_0 in Proteasome = 1.5;  // GO:0000502
  // Lysosome
  species $Lysosome_0 in Lysosome = 2.5;  // GO:0005764

  // Parameters:
  g11 = 1;
  p186 = 0.5;
  p110 = 1;
  p19 = 1;
  p18 = 1;
  k1 = 0.03;
  g22 = 1;
  p286 = 0.25;
  p210 = 0.5;
  p29 = 0.5;
  p28 = 0.5;
  i26 = -1;
  k2 = 0.01;
  g326 = 1;
  g23 = 1;
  k3 = 0.007;
  k4 = 0.9;
  i41 = -0.01;
  i42 = -0.01;
  i43 = -0.01;
  g412 = 1;
  g415 = 1;
  g427 = 1;
  g430 = 1;
  k6 = 0.5;
  g613 = 1;
  g614 = 1;
  g615 = 1;
  k7 = 0.03;
  g715 = 1;
  g716 = 1;
  g717 = 1;
  k8 = 0.001;
  g819 = 1;
  g821 = 1;
  k9 = 0.001;
  g919 = 1;
  g920 = 1;
  k10 = 0.05;
  g1025 = 1;
  g1072 = 1;
  k11 = 0.05;
  g1124 = 1;
  g1170 = 1;
  k13 = 0.1;
  i131 = -0.01;
  i1310 = -0.01;
  g1335 = 1;
  g1336 = 1;
  g1351 = 1;
  k14 = 3;
  g1437 = 1;
  g1467 = 1;
  k15 = 0.2;
  i152 = -0.1;
  g156 = 1;
  g1544 = 1;
  g1545 = 1;
  k16 = 0.0001;
  g1643 = 1;
  g1644 = 1;
  k17 = 0.0001;
  g1742 = 1;
  g1744 = 1;
  k18 = 0.02;
  g186 = 1;
  g1851 = 1;
  k19 = 0.01;
  g196 = 1;
  g1951 = 1;
  g1953 = 1;
  g1960 = 1;
  k20 = 0.1;
  g209 = 1;
  g2065 = 1;
  k21 = 0.1;
  g2166 = 1;
  k22 = 0.5;
  g229 = 1;
  g2259 = 1;
  k23 = 0.5;
  g239 = 1;
  g2361 = 1;
  g2362 = 1;
  k24 = 1;
  g2463 = 1;
  g2464 = 1;
  k25 = 0.05;
  g2552 = 1;
  g2555 = 0.3;
  g2556 = 0.25;
  k26f = 0.05;
  g26f15 = 1;
  g26f16 = 1;
  g26f18 = 1;
  k26r = 0.005;
  g26r30 = 1;
  g26r68 = 1;
  k27f = 0.05;
  g27f15 = 1;
  g27f16 = 1;
  g27f68 = 1;
  k27r = 0.005;
  g27r30 = 1;
  g27r69 = 1;
  k28f = 0.05;
  g28f15 = 1;
  g28f16 = 1;
  g28f69 = 1;
  k28r = 0.005;
  g28r30 = 1;
  g28r70 = 1;
  k29 = 0.05;
  g2915 = 1;
  g2916 = 1;
  g2971 = 1;
  k30 = 0.001;
  g301 = 1;
  g3030 = 1;
  k31 = 0.05;
  g3172 = 1;
  g3173 = 1;
  k32 = 0.001;
  g321 = 1;
  p328 = 0.1;
  p329 = 0.1;
  p3210 = 0.1;
  p3286 = 0.05;
  g3274 = 1;
  k33 = 0.001;
  g332 = 1;
  g3330 = 1;
  k34 = 0.05;
  g3472 = 1;
  g3475 = 1;
  k35 = 0.001;
  g352 = 1;
  p358 = 0.1;
  p359 = 0.1;
  p3510 = 0.1;
  p3586 = 0.05;
  g3576 = 1;
  k36 = 0.05;
  i368 = -0.1;
  i369 = -0.1;
  i3610 = -0.1;
  i3686 = -0.05;
  g3677 = 1;
  g3679 = 1;
  k37 = 0.05;
  g3770 = 1;
  g3773 = 1;
  k38 = 0.7;
  i381 = -0.01;
  i382 = -0.01;
  i383 = -0.01;
  g3812 = 1;
  g3815 = 1;
  g3830 = 1;
  g3878 = 1;
  k43 = 0.05;
  g431 = 1;
  g4384 = 1;
  k44 = 0.045;
  g442 = 1;
  g4484 = 1;
  k45 = 0.04;
  g453 = 1;
  g4584 = 1;
  k46 = 0.03;
  i468 = -0.1;
  i469 = -0.1;
  i4610 = -0.1;
  i4686 = -0.05;
  g4677 = 1;
  g4681 = 1;
  k47 = 0.03;
  i478 = -0.1;
  i479 = -0.1;
  i4710 = -0.1;
  i4786 = -0.05;
  g4777 = 1;
  g4782 = 1;
  k48 = 0.03;
  i488 = -0.1;
  i489 = -0.1;
  i4810 = -0.1;
  i4886 = -0.05;
  g4877 = 1;
  g4883 = 1;
  k50 = 0.05;
  g501 = 1;
  g5080 = 1;
  k51 = 0.05;
  g512 = 1;
  g5180 = 1;
  k52 = 0.05;
  g523 = 1;
  g5280 = 1;
  k53 = 0.05;
  g534 = 1;
  g5380 = 1;
  k54 = 0.005;
  g5410 = 1;
  g5419 = 1;
  k55 = 0.05;
  g556 = 1;
  g5586 = 1;
  k56 = 0.05;
  g5686 = 1;
  g5687 = 1;
  k57 = 0.005;
  g5710 = 1;
  g5762 = 1;
  k100 = 0.005;
  g10037 = 1;
  g10051 = 1;
  g100115 = 1;
  k101 = 0.005;
  g10136 = 1;
  g10151 = 1;
  g101115 = 1;
  k102 = 0.005;
  g10210 = 1;
  g10251 = 1;
  g102115 = 1;
  k115 = 0.5;
  g11565 = 1;
  g11566 = 1;
  g115118 = 1;
  k116 = 0.5;
  g11642 = 1;
  g116118 = 1;
  var k1_0; k1_0 is "k1'";
  var k2_0; k2_0 is "k2'";
  var k4_0; k4_0 is "k4'";
  var k13_0; k13_0 is "k13'";
  var k15_0; k15_0 is "k15'";
  var k32_0; k32_0 is "k32'";
  var k35_0; k35_0 is "k35'";
  var k36_0; k36_0 is "k36'";
  var k38_0; k38_0 is "k38'";
  var k46_0; k46_0 is "k46'";
  var k47_0; k47_0 is "k47'";
  var k48_0; k48_0 is "k48'";

  // Assignment rules:
  k1_0 := 0.0003*(p18*OH_radical + p19*H2O2 + p110*DA_quinone + p186*O2);
  k2_0 := 0.0001*(i26*Dopamine + p28*OH_radical + p29*H2O2 + p210*DA_quinone + p286*O2);
  k4_0 := 0.009*(i41*Alpha_synuclein + i42*Protofibril + i43*Fibril);
  k13_0 := 0.001*(i131*Alpha_synuclein + i1310*DA_quinone);
  k15_0 := 0.002*i152*Protofibril;
  k32_0 := 1e-5*(p328*OH_radical + p329*H2O2 + p3210*DA_quinone + p3286*O2);
  k35_0 := 1e-5*(p358*OH_radical + p359*H2O2 + p3510*DA_quinone + p3586*O2);
  k36_0 := 0.0005*(i368*OH_radical + i369*H2O2 + i3610*DA_quinone + i3686*O2);
  k38_0 := 0.007*(i381*Alpha_synuclein + i382*Protofibril + i383*Fibril);
  k46_0 := 0.0003*(i468*OH_radical + i469*H2O2 + i4610*DA_quinone + i4686*O2);
  k47_0 := 0.0003*(i478*OH_radical + i479*H2O2 + i4710*DA_quinone + i4786*O2);
  k48_0 := 0.0003*(i488*OH_radical + i489*H2O2 + i4810*DA_quinone + i4886*O2);

  // Rate rules:
  Fe2' = J21 - J20 + 0.01;

  // Reactions:
  // Protofibril aggregation
  J1: $Alpha_synuclein => Protofibril; Neuronal_cytosol*J1Sub(k1, Alpha_synuclein, g11);
  // Fibril aggregation
  J2: Protofibril => Fibril; Neuronal_cytosol*J1Sub(k2, Protofibril, g22);
  // Lewy Body formation
  J3: Fibril + Parkin_synphilin_1_ub => Lewy_body; Neuronal_cytosol*J2Sub(k3, Fibril, g23, Parkin_synphilin_1_ub, g326);
  // Proteasome Degradation of parkin-sub-ub4
  J4: Parkin_sub_ub4 => Parkin + Fragments + 4 Ubiquitin; Neuronal_cytosol*J1Sub3Mod(k4, Parkin_sub_ub4, g427, Proteasome_0, g412, ATP, g415, UCH_L1, g430);  // modifiers: Proteasome_0, ATP, UCH_L1
  // Ubiquitin Activation
  J6: Ubiquitin + E1 => Ub_E1; Neuronal_cytosol*J2Sub1Mod(k6, Ubiquitin, g613, E1, g614, ATP, g615);  // modifiers: ATP
  // Ubiquitin Conjugation
  J7: Ub_E1 + UbcH8 => E1 + UbcH8_Ub; Neuronal_cytosol*J2Sub1Mod(k7, Ub_E1, g716, UbcH8, g717, ATP, g715);  // modifiers: ATP
  // Substrate ligation
  J8: Parkin + $Substrate => Parkin_sub; Neuronal_cytosol*J2Sub(k8, Parkin, g819, Substrate, g821);
  // Synphilin-1 ligation
  J9: Parkin + $Synphilin_1 => Parkin_synphilin_1; Neuronal_cytosol*J2Sub(k9, Parkin, g919, Synphilin_1, g920);
  // K63 Synphilin-1 Ubiquitination
  J10: Parkin_synphilin_1 + UbcH13_Uev1a_ub => Parkin_synphilin_1_ub + UbcH13_Uev1a; Neuronal_cytosol*J2Sub(k10, Parkin_synphilin_1, g1025, UbcH13_Uev1a_ub, g1072);
  // K48 Substrate Ubiquitination
  J11: Parkin_sub + UbcH8ub4 => Parkin_sub_ub4 + UbcH8; Neuronal_cytosol*J2Sub(k11, Parkin_sub, g1124, UbcH8ub4, g1170);
  // L-Dopa formation
  J13: $L_Tyr + $O2_0 => L_Dopa; Neuronal_cytosol*J2Sub1Mod(k13, L_Tyr, g1336, O2_0, g1351, TH, g1335);  // modifiers: TH
  // Dopamine formation
  J14: L_Dopa => Dopamine + $CO2; Neuronal_cytosol*J1Sub1Mod(k14, L_Dopa, g1437, DDC, g1467);  // modifiers: DDC
  // Dopamine vesicle packaging
  J15: Dopamine + $Vesicle_0 => V_DA; J2Sub1Mod(k15, Dopamine, g156, Vesicle_0, g1544, VMAT2, g1545);  // modifiers: VMAT2
  // Bioamine vesicle packaging
  J16: $Bioamines + $Vesicle_0 => V_ntox_ba; J2Sub(k16, Bioamines, g1643, Vesicle_0, g1644);
  // Neurotoxin vesicle packaging
  J17: $Neurotoxins + $Vesicle_0 => V_ntox_ba; J2Sub(k17, Neurotoxins, g1742, Vesicle_0, g1744);
  // DA quinone and superoxide radical synthesis
  J18: Dopamine + $O2_0 => DA_quinone + O2; Neuronal_cytosol*J2Sub(k18, Dopamine, g186, O2_0, g1851);
  // DOPAL and H2O2 synthesis
  J19: Dopamine + $O2_0 + $H2O => $NH3 + DOPAL + H2O2; Neuronal_cytosol*J3Sub1Mod(k19, Dopamine, g196, O2_0, g1951, H2O, g1960, MAO, g1953);  // modifiers: MAO
  // Iron oxidation and formation of OH radicals
  J20: H2O2 + $Fe2 => Fe3 + OH_radical + OH; Neuronal_cytosol*J2Sub(k20, H2O2, g209, Fe2, g2065);
  // Iron reduction
  J21: Fe3 => $Fe2; Neuronal_cytosol*J1Sub(k21, Fe3, g2166);
  // H2O2 depletion by catalase
  J22: H2O2 => $H2O + $O2_0; Neuronal_cytosol*J1Sub1Mod(k22, H2O2, g229, Catalase, g2259);  // modifiers: Catalase
  // H2O2 depletion by GSH
  J23: H2O2 + GSH => $H2O + GSSG; Neuronal_cytosol*J2Sub1Mod(k23, H2O2, g239, GSH, g2362, Gluta_per, g2361);  // modifiers: Gluta_per
  J24: GSSG => GSH; Neuronal_cytosol*J1Sub1Mod(k24, GSSG, g2463, Gluta_red, g2464);  // modifiers: Gluta_red
  // DOPAC formation
  J25: DOPAL + $NAD => DOPAC + $NADH; Neuronal_cytosol*J2Sub1Mod(k25, DOPAL, g2552, NAD, g2556, ALDH, g2555);  // modifiers: ALDH
  // Forward ubiquitination tag 2
  J26f: Ub_E1 + UbcH8_Ub => E1 + UbcH8ub2; Neuronal_cytosol*J2Sub1Mod(k26f, Ub_E1, g26f16, UbcH8_Ub, g26f18, ATP, g26f15);  // modifiers: ATP
  // Reverse ubiquitination tag 2
  J26r: UbcH8ub2 => UbcH8 + 2 Ubiquitin; Neuronal_cytosol*J1Sub1Mod(k26r, UbcH8ub2, g26r68, UCH_L1, g26r30);  // modifiers: UCH_L1
  // Forward ubiquitination tag 3
  J27f: Ub_E1 + UbcH8ub2 => E1 + UbcH8ub3; Neuronal_cytosol*J2Sub1Mod(k27f, Ub_E1, g27f16, UbcH8ub2, g27f68, ATP, g27f15);  // modifiers: ATP
  // Reverse ubiquitination tag 3
  J27r: UbcH8ub3 => UbcH8 + 3 Ubiquitin; Neuronal_cytosol*J1Sub1Mod(k27r, UbcH8ub3, g27r69, UCH_L1, g27r30);  // modifiers: UCH_L1
  // Forward ubiquitination tag 4
  J28f: Ub_E1 + UbcH8ub3 => E1 + UbcH8ub4; Neuronal_cytosol*J2Sub1Mod(k28f, Ub_E1, g28f16, UbcH8ub3, g28f69, ATP, g28f15);  // modifiers: ATP
  // Reverse ubiquitination tag 4
  J28r: UbcH8ub4 => UbcH8 + 4 Ubiquitin; Neuronal_cytosol*J1Sub1Mod(k28r, UbcH8ub4, g28r70, UCH_L1, g28r30);  // modifiers: UCH_L1
  // UbcH13/Uev1a conjugation
  J29: Ub_E1 + UbcH13_Uev1a => E1 + UbcH13_Uev1a_ub; Neuronal_cytosol*J2Sub1Mod(k29, Ub_E1, g2916, UbcH13_Uev1a, g2971, ATP, g2915);  // modifiers: ATP
  // Asyn ligation to UCH-L1
  J30: $Alpha_synuclein + UCH_L1 => asyn_UCH_L1; Neuronal_cytosol*J2Sub(k30, Alpha_synuclein, g301, UCH_L1, g3030);
  // Alpha synuclein K63 ubiquitination
  J31: UbcH13_Uev1a_ub + asyn_UCH_L1 => UbcH13_Uev1a + UCH_L1 + asyn_ub; Neuronal_cytosol*J2Sub(k31, UbcH13_Uev1a_ub, g3172, asyn_UCH_L1, g3173);
  // Asyn reaction with asyn-ub to form protofibrils
  J32: $Alpha_synuclein + asyn_ub => Protofibril; Neuronal_cytosol*J2Sub(k32, Alpha_synuclein, g321, asyn_ub, g3274);
  // Protofibril ligation to UCH-L1
  J33: Protofibril + UCH_L1 => Protofibril_UCH_L1; Neuronal_cytosol*J2Sub(k33, Protofibril, g332, UCH_L1, g3330);
  // Protofibril K63 ubiquitination
  J34: UbcH13_Uev1a_ub + Protofibril_UCH_L1 => UbcH13_Uev1a + UCH_L1 + Protofibril_Ub; Neuronal_cytosol*J2Sub(k34, UbcH13_Uev1a_ub, g3472, Protofibril_UCH_L1, g3475);
  // Protofibril reaction with protofibril-ub to form fibrils
  J35: Protofibril + Protofibril_Ub => Fibril; Neuronal_cytosol*J2Sub(k35, Protofibril, g352, Protofibril_Ub, g3576);
  // Lysosomal degradation of autophagosome
  J36: Autophagosome_0 => Fragments; J1Sub1Mod(k36, Autophagosome_0, g3679, Lysosome_0, g3677);  // modifiers: Lysosome_0
  // Asyn K48 ubiquitination
  J37: UbcH8ub4 + asyn_UCH_L1 => UCH_L1_asyn_ub4 + UbcH8; Neuronal_cytosol*J2Sub(k37, UbcH8ub4, g3770, asyn_UCH_L1, g3773);
  // Proteasomal degradation of UCH-L1-asyn-ub4
  J38: UCH_L1_asyn_ub4 => Fragments + UCH_L1 + 4 Ubiquitin; Neuronal_cytosol*J1Sub3Mod(k38, UCH_L1_asyn_ub4, g3878, Proteasome_0, g3812, ATP, g3815, UCH_L1, g3830);  // modifiers: Proteasome_0, ATP
  // hsc70-asyn formation
  J43: $Alpha_synuclein + Hsc70 => Hsc70_asyn; Neuronal_cytosol*J2Sub(k43, Alpha_synuclein, g431, Hsc70, g4384);
  // Hsc70-protofibril formation
  J44: Protofibril + Hsc70 => Hsc70_Protofibril; Neuronal_cytosol*J2Sub(k44, Protofibril, g442, Hsc70, g4484);
  // Hsc70-fibril formation
  J45: Fibril + Hsc70 => Hsc70_fibril; Neuronal_cytosol*J2Sub(k45, Fibril, g453, Hsc70, g4584);
  // Lysosomal degradation of Hsc70-asyn
  J46: Hsc70_asyn => Hsc70 + Fragments; Neuronal_cytosol*J1Sub1Mod(k46, Hsc70_asyn, g4681, Lysosome_0, g4677);  // modifiers: Lysosome_0
  // Lysosomal degradation of Hsc70-protofibril
  J47: Hsc70_Protofibril => Hsc70 + Fragments; Neuronal_cytosol*J1Sub1Mod(k47, Hsc70_Protofibril, g4782, Lysosome_0, g4777);  // modifiers: Lysosome_0
  // Lysosomal degradation of Hsc70-fibril
  J48: Hsc70_fibril => Hsc70 + Fragments; Neuronal_cytosol*J1Sub1Mod(k48, Hsc70_fibril, g4883, Lysosome_0, g4877);  // modifiers: Lysosome_0
  // Autophagosome engulf alpha-synuclein
  J50: $Alpha_synuclein + $Preautophagosome_membrane => Autophagosome_0; J2Sub(k50, Alpha_synuclein, g501, Preautophagosome_membrane, g5080);
  // Autophagosome engulf protofibril
  J51: Protofibril + $Preautophagosome_membrane => Autophagosome_0; J2Sub(k51, Protofibril, g512, Preautophagosome_membrane, g5180);
  // Autophagosome engulf fibril
  J52: Fibril + $Preautophagosome_membrane => Autophagosome_0; J2Sub(k52, Fibril, g523, Preautophagosome_membrane, g5280);
  // Autophagosome engulf lewy body
  J53: Lewy_body + $Preautophagosome_membrane => Autophagosome_0; J2Sub(k53, Lewy_body, g534, Preautophagosome_membrane, g5380);
  // DA-S-Parkin formation
  J54: DA_quinone + Parkin => DA_S_parkin; Neuronal_cytosol*J2Sub(k54, DA_quinone, g5410, Parkin, g5419);
  // DA-quinone synthesis from DA and superoxide
  J55: Dopamine + O2 => H2O2 + DA_quinone; Neuronal_cytosol*J2Sub(k55, Dopamine, g556, O2, g5586);
  // Superoxide dismutase reaction
  J56: O2 => H2O2 + $O2_0; Neuronal_cytosol*J1Sub1Mod(k56, O2, g5686, SOD, g5687);  // modifiers: SOD
  // DA-GSH formation
  J57: DA_quinone + GSH => DA_GSH; Neuronal_cytosol*J2Sub(k57, DA_quinone, g5710, GSH, g5762);
  // Neuromelanin synthesis from L-DOPA
  J100: L_Dopa + $O2_0 + $Cysteine => Neuromelanin + H2O2 + $CO2; Neuronal_cytosol*J3Sub(k100, L_Dopa, g10037, O2_0, g10051, Cysteine, g100115);
  // Neuromelanin synthesis from L-Tyr
  J101: $L_Tyr + $O2_0 + $Cysteine => Neuromelanin + H2O2 + $CO2; Neuronal_cytosol*J3Sub(k101, L_Tyr, g10136, O2_0, g10151, Cysteine, g101115);
  // Neuromelanin synthesis from DA quinone
  J102: DA_quinone + $O2_0 + $Cysteine => Neuromelanin + $CO2; Neuronal_cytosol*J3Sub(k102, DA_quinone, g10210, O2_0, g10251, Cysteine, g102115);
  // Neuromelanin Fe3+ sequestration
  J115: Fe3 + Neuromelanin => Neuromelanin_ntox_Fe3; Neuronal_cytosol*J2Sub(k115, Fe3, g11565, Neuromelanin, g115118);
  // Neuromelanin neurotoxin sequestration
  J116: Neuromelanin + $Neurotoxins => Neuromelanin_ntox_Fe3; Neuronal_cytosol*J2Sub(k116, Neuromelanin, g116118, Neurotoxins, g11642);

  // Unit definitions:
  unit volume = dimensionless;
  unit time = dimensionless;
  unit substance = dimensionless;
  unit area = metre^2;
end
