// SBML level 3 version 2

model MODEL1501210000()
  // Invergo2014 - Phototransduction cascade in mouse rod cells
  // This model is described in the article:
  // A comprehensive model of the phototransduction cascade in mouse rod cells.
  // Invergo BM, Dell'Orco D, Montanucci L, Koch KW, Bertranpetit J.
  // Mol Biosyst 2014 Jun; 10(6): 1481-1489
  // Abstract:
  // Vertebrate visual phototransduction is perhaps the most well-studied G-protein signaling pathway. A wealth of available biochemical and electrophysiological data has resulted in a rich history of mathematical modeling of the system. However, while the most comprehensive models have relied upon amphibian biochemical and electrophysiological data, modern research typically employs mammalian species, particularly mice, which exhibit significantly faster signaling dynamics. In this work, we present an adaptation of a previously published, comprehensive model of amphibian phototransduction that can produce quantitatively accurate simulations of the murine photoresponse. We demonstrate the ability of the model to predict responses to a wide range of stimuli and under a variety of mutant conditions. Finally, we employ the model to highlight a likely unknown mechanism related to the interaction between rhodopsin and rhodopsin kinase.
  // This model is hosted on BioModels Database and identified by: BIOMD0000000578.
  // To cite BioModels Database, please use: BioModels Database: An enhanced, curated and annotated resource for published quantitative kinetic models.
  // To the extent possible under law, all copyright and related or neighbouring rights to this encoded model have been dedicated to the public domain worldwide. Please refer to CC0 Public Domain Dedication for more information.
  // biomodels.db:MODEL1501210000
  // biomodels.db:BIOMD0000000578
  // isDescribedBy pubmed:24675755
  // isDerivedFrom pubmed:21843151
  // hasTaxon taxonomy:10090
  // occursIn FMA:67747
  // model units - substance: substance, time: second, volume: volume, area: area, length: metre, extent: substance

  // Compartments:
  compartment cytosol = 0.03916 volume;

  // Species:
  substanceOnly species Arr in cytosol = 1260760;
  substanceOnly species Arr_di in cytosol = 1123300;
  substanceOnly species Arr_tetra in cytosol = 891810;
  species Ca2_buff in cytosol = 19.2199;
  species $Ca2_free in cytosol = 0.25;
  substanceOnly species G_GTP in cytosol = 0;
  substanceOnly species Ga_GDP in cytosol = 0;
  substanceOnly species Ga_GTP in cytosol = 0;
  substanceOnly species Ga_GTP_PDE_a_Ga_GTP in cytosol = 0;
  substanceOnly species Ga_GTP_a_PDE_a_Ga_GTP in cytosol = 0;
  substanceOnly species Gbg in cytosol = 0;
  substanceOnly species Gt in cytosol = 8152500;
  substanceOnly species Ops in cytosol = 0;
  substanceOnly species Ops_G in cytosol = 0;
  substanceOnly species Ops_G_GTP in cytosol = 0;
  substanceOnly species Ops_Gt in cytosol = 0;
  substanceOnly species PDE in cytosol = 2000000;
  substanceOnly species PDE_Ga_GTP in cytosol = 0;
  substanceOnly species PDE_a_Ga_GTP in cytosol = 0;
  substanceOnly species R in cytosol = 98152500;
  substanceOnly species R0 in cytosol = 0;
  substanceOnly species R0_G in cytosol = 0;
  substanceOnly species R0_G_GTP in cytosol = 0;
  substanceOnly species R0_Gt in cytosol = 0;
  substanceOnly species R0_RKpre in cytosol = 0;
  substanceOnly species R1 in cytosol = 0;
  substanceOnly species R1_Arr in cytosol = 0;
  substanceOnly species R1_G in cytosol = 0;
  substanceOnly species R1_G_GTP in cytosol = 0;
  substanceOnly species R1_Gt in cytosol = 0;
  substanceOnly species R1_RKpost in cytosol = 0;
  substanceOnly species R1_RKpre in cytosol = 0;
  substanceOnly species R2 in cytosol = 0;
  substanceOnly species R2_Arr in cytosol = 0;
  substanceOnly species R2_G in cytosol = 0;
  substanceOnly species R2_G_GTP in cytosol = 0;
  substanceOnly species R2_Gt in cytosol = 0;
  substanceOnly species R2_RKpost in cytosol = 0;
  substanceOnly species R2_RKpre in cytosol = 0;
  substanceOnly species R3 in cytosol = 0;
  substanceOnly species R3_Arr in cytosol = 0;
  substanceOnly species R3_G in cytosol = 0;
  substanceOnly species R3_G_GTP in cytosol = 0;
  substanceOnly species R3_Gt in cytosol = 0;
  substanceOnly species R3_RKpost in cytosol = 0;
  substanceOnly species R3_RKpre in cytosol = 0;
  substanceOnly species R4 in cytosol = 0;
  substanceOnly species R4_Arr in cytosol = 0;
  substanceOnly species R4_G in cytosol = 0;
  substanceOnly species R4_G_GTP in cytosol = 0;
  substanceOnly species R4_Gt in cytosol = 0;
  substanceOnly species R4_RKpost in cytosol = 0;
  substanceOnly species R4_RKpre in cytosol = 0;
  substanceOnly species R5 in cytosol = 0;
  substanceOnly species R5_Arr in cytosol = 0;
  substanceOnly species R5_G in cytosol = 0;
  substanceOnly species R5_G_GTP in cytosol = 0;
  substanceOnly species R5_Gt in cytosol = 0;
  substanceOnly species R5_RKpost in cytosol = 0;
  substanceOnly species R5_RKpre in cytosol = 0;
  substanceOnly species R6 in cytosol = 0;
  substanceOnly species R6_Arr in cytosol = 0;
  substanceOnly species R6_G in cytosol = 0;
  substanceOnly species R6_G_GTP in cytosol = 0;
  substanceOnly species R6_Gt in cytosol = 0;
  substanceOnly species R6_RKpost in cytosol = 0;
  substanceOnly species R6_RKpre in cytosol = 0;
  substanceOnly species RGS in cytosol = 100000;
  substanceOnly species RGS_Ga_GTP_a_PDE_a_Ga_GTP in cytosol = 0;
  substanceOnly species RGS_PDE_a_Ga_GTP in cytosol = 0;
  substanceOnly species RK in cytosol = 580;
  substanceOnly species R_Gt in cytosol = 1847500;
  substanceOnly species RecR_Ca in cytosol = 510930;
  substanceOnly species RecR_Ca_RK in cytosol = 199420;
  substanceOnly species RecT in cytosol = 9289650;
  species cGMP in cytosol = 6.4944;

  // Parameters:
  Rtot = 100000000;
  PDEtot = 2000000;
  Gtot = 10000000;
  RGStot = 100000;
  ArrTot = 7074600;
  flashBG = 0;
  flash0Dur = 0.001;
  flash0Mag = 0;
  flashDel = 0;
  flashDur = 0.001;
  flashMag = 0;
  otherstimulus = 0;
  kRK1_0 = 0.1724;
  omega = 2.5;
  kRK2 = 250;
  kRK3_ATP = 4000;
  kRK4 = 250;
  kArr = 9.9147e-6;
  kA2 = 0.026;
  m_Arr = 9.5475e-6;
  kA3 = 1.1651;
  kA4 = 2.9965e-7;
  kA5 = 0.424;
  kOps = 6.1172e-13;
  kRrecyc = 0.0007;
  omega_G = 0.6;
  kG1_0 = 0.001;
  kG2 = 2200;
  kG3 = 8500;
  kG4_GDP = 400;
  kG5_GTP = 3500;
  kG6 = 8500;
  kG7 = 200;
  kGrecyc = 2;
  kGshutoff = 0.05;
  kP1 = 0.05497;
  kP1_rev = 0;
  kP2 = 940.7;
  kP3 = 1.4983e-9;
  kP4 = 21.088;
  kPDEshutoff = 0.1;
  kRGS1 = 4.8182e-5;
  kRGS2 = 98;
  kRec1 = 0.011;
  kRec2 = 0.05;
  kRec3 = 0.00041081;
  kRec4 = 0.610084;
  Vcyto = 0.03916;
  Kc1 = 0.171;
  Kc2 = 0.059;
  m1 = 3;
  m2 = 1.5;
  alfamax = 60;
  betadark = 3.19;
  betasub = 0.0021826;
  fCa = 0.12;
  Jdark = 14.87;
  F = 96485.34;
  cGMPdark = 6.4944;
  ncg = 3.8;
  gammaCa = 981.3558;
  Ca2dark = 0.25;
  Ca2_0 = 0.023;
  k1 = 9.37059;
  k2 = 46.412;
  eT = 400;
  ktherm = 0.0238;

  // Assignment rules:
  background := flashBG;
  premag := flash0Mag/flash0Dur;
  mag := flashMag/flashDur;
  predur := flash0Dur;
  dur := flashDur;
  del := flashDel;
  preflash := piecewise(premag, time <= predur, 0);
  testflash := piecewise(mag, (time >= del) && (time <= del + dur), 0);
  stimulus := background + preflash + testflash + otherstimulus;
  numConcFactor := 1/(6.022e5*Vcyto);
  kRK1_1 := kRK1_0*exp(-omega);
  kRK1_2 := kRK1_0*exp(-omega*2);
  kRK1_3 := kRK1_0*exp(-omega*3);
  kRK1_4 := kRK1_0*exp(-omega*4);
  kRK1_5 := kRK1_0*exp(-omega*5);
  kRK1_6 := 0;
  kA1_1 := kArr;
  kA1_2 := kArr + 1*m_Arr;
  kA1_3 := kArr + 2*m_Arr;
  kA1_4 := kArr + 3*m_Arr;
  kA1_5 := kArr + 3*m_Arr;
  kA1_6 := kArr + 3*m_Arr;
  kGpre1 := kG1_0*1.6;
  kGpre2 := kG2*315;
  kG1ops := kG1_0*1.9;
  kG2ops := kG2*3;
  kG1_1 := kG1_0*exp(-omega_G);
  kG1_2 := kG1_0*exp(-omega_G*2);
  kG1_3 := kG1_0*exp(-omega_G*3);
  kG1_4 := kG1_0*exp(-omega_G*4);
  kG1_5 := kG1_0*exp(-omega_G*5);
  kG1_6 := kG1_0*exp(-omega_G*6);
  E := PDE_a_Ga_GTP + 2*Ga_GTP_a_PDE_a_Ga_GTP + Ga_GTP_PDE_a_Ga_GTP;
  Ca2_frac := (Ca2_free - Ca2_0)/(Ca2dark - Ca2_0);
  J := 2/(2 + fCa)*(cGMP/cGMPdark)^ncg*Jdark + fCa/(fCa + 2)*Ca2_frac*Jdark;
  deltaJ := Jdark - J;

  // Rate rules:
  Ca2_free' = -v_r33 - v_r34 + v_r35 - 2*v_r30*numConcFactor;

  // Reactions:
  // Photoactivation of unphosphorylated R
  v_r1: R => R0; stimulus*R/Rtot;
  // Photoactivation of pre-coupled R-Gt
  v_rstprec: R_Gt => R0_Gt; stimulus*R_Gt/Rtot;
  // Binding of R0 and RK. The association rate constant is assumed to decrease exponentially with increasing phosphorylations.
  v_r2_0: R0 + RK -> R0_RKpre; kRK1_0*RK*R0 - kRK2*R0_RKpre;
  // Binding of R1 and RK. The association rate constant is assumed to decrease exponentially with increasing phosphorylations.
  v_r2_1: R1 + RK -> R1_RKpre; kRK1_1*RK*R1 - kRK2*R1_RKpre;
  // Binding of R2 and RK. The association rate constant is assumed to decrease exponentially with increasing phosphorylations.
  v_r2_2: R2 + RK -> R2_RKpre; kRK1_2*RK*R2 - kRK2*R2_RKpre;
  // Binding of R3 and RK. The association rate constant is assumed to decrease exponentially with increasing phosphorylations.
  v_r2_3: R3 + RK -> R3_RKpre; kRK1_3*RK*R3 - kRK2*R3_RKpre;
  // Binding of R4 and RK. The association rate constant is assumed to decrease exponentially with increasing phosphorylations.
  v_r2_4: R4 + RK -> R4_RKpre; kRK1_4*RK*R4 - kRK2*R4_RKpre;
  // Binding of R5 and RK. The association rate constant is assumed to decrease exponentially with increasing phosphorylations.
  v_r2_5: R5 + RK -> R5_RKpre; kRK1_5*RK*R5 - kRK2*R5_RKpre;
  // Binding of R6 and RK. The association rate constant is assumed to decrease exponentially with increasing phosphorylations.
  v_r2_6: R6 + RK -> R6_RKpre; kRK1_6*RK*R6 - kRK2*R6_RKpre;
  // Phosphorylation of R0 to give R1
  v_r3_0: R0_RKpre => R1_RKpost; kRK3_ATP*R0_RKpre;
  // Phosphorylation of R1 to give R2
  v_r3_1: R1_RKpre => R2_RKpost; kRK3_ATP*R1_RKpre;
  // Phosphorylation of R2 to give R3
  v_r3_2: R2_RKpre => R3_RKpost; kRK3_ATP*R2_RKpre;
  // Phosphorylation of R3 to give R4
  v_r3_3: R3_RKpre => R4_RKpost; kRK3_ATP*R3_RKpre;
  // Phosphorylation of R4 to give R5
  v_r3_4: R4_RKpre => R5_RKpost; kRK3_ATP*R4_RKpre;
  // Phosphorylation of R5 to give R6
  v_r3_5: R5_RKpre => R6_RKpost; kRK3_ATP*R5_RKpre;
  // Dissociation of the R1-RK complex
  v_r4_1: R1_RKpost => R1 + RK; kRK4*R1_RKpost;
  // Dissociation of the R2-RK complex
  v_r4_2: R2_RKpost => R2 + RK; kRK4*R2_RKpost;
  // Dissociation of the R3-RK complex
  v_r4_3: R3_RKpost => R3 + RK; kRK4*R3_RKpost;
  // Dissociation of the R4-RK complex
  v_r4_4: R4_RKpost => R4 + RK; kRK4*R4_RKpost;
  // Dissociation of the R5-RK complex
  v_r4_5: R5_RKpost => R5 + RK; kRK4*R5_RKpost;
  // Dissociation of the R6-RK complex
  v_r4_6: R6_RKpost => R6 + RK; kRK4*R6_RKpost;
  // Binding of R1 and Arr. The association rate constant increases linearly with the first four phosphorylations.
  v_r5_1: Arr + R1 -> R1_Arr; kA1_1*Arr*R1 - kA2*R1_Arr;
  // Binding of R2 and Arr. The association rate constant increases linearly with the first four phosphorylations.
  v_r5_2: Arr + R2 -> R2_Arr; kA1_2*Arr*R2 - kA2*R2_Arr;
  // Binding of R3 and Arr. The association rate constant increases linearly with the first four phosphorylations.
  v_r5_3: Arr + R3 -> R3_Arr; kA1_3*Arr*R3 - kA2*R3_Arr;
  // Binding of R4 and Arr. The association rate constant increases linearly with the first four phosphorylations.
  v_r5_4: Arr + R4 -> R4_Arr; kA1_4*Arr*R4 - kA2*R4_Arr;
  // Binding of R5 and Arr. The association rate constant increases linearly with the first four phosphorylations.
  v_r5_5: Arr + R5 -> R5_Arr; kA1_5*Arr*R5 - kA2*R5_Arr;
  // Binding of R6 and Arr. The association rate constant increases linearly with the first four phosphorylations.
  v_r5_6: Arr + R6 -> R6_Arr; kA1_6*Arr*R6 - kA2*R6_Arr;
  // Arr-mediated inactivation of R1.
  v_r6_1: R1_Arr => Arr + Ops; kA3*R1_Arr;
  // Arr-mediated inactivation of R2.
  v_r6_2: R2_Arr => Arr + Ops; kA3*R2_Arr;
  // Arr-mediated inactivation of R3.
  v_r6_3: R3_Arr => Arr + Ops; kA3*R3_Arr;
  // Arr-mediated inactivation of R4.
  v_r6_4: R4_Arr => Arr + Ops; kA3*R4_Arr;
  // Arr-mediated inactivation of R5.
  v_r6_5: R5_Arr => Arr + Ops; kA3*R5_Arr;
  // Arr-mediated inactivation of R6.
  v_r6_6: R6_Arr => Arr + Ops; kA3*R6_Arr;
  // Thermal decay of catalytic active form of R0 to give Ops.
  v_r7_0: R0 => Ops; ktherm*R0;
  // Thermal decay of catalytic active form of R1 to give Ops.
  v_r7_1: R1 => Ops; ktherm*R1;
  // Thermal decay of catalytic active form of R2 to give Ops.
  v_r7_2: R2 => Ops; ktherm*R2;
  // Thermal decay of catalytic active form of R3 to give Ops.
  v_r7_3: R3 => Ops; ktherm*R3;
  // Thermal decay of catalytic active form of R4 to give Ops.
  v_r7_4: R4 => Ops; ktherm*R4;
  // Thermal decay of catalytic active form of R5 to give Ops.
  v_r7_5: R5 => Ops; ktherm*R5;
  // Thermal decay of catalytic active form of R6 to give Ops.
  v_r7_6: R6 => Ops; ktherm*R6;
  // Spontaneous Ops activity.
  v_r8: Gt + Ops -> Ops_Gt; kG1ops*Ops*Gt - kG2ops*Ops_Gt;
  // GDP dissociation from the Ops-Gt complex.
  v_r9: Ops_Gt -> Ops_G; kOps*Ops_Gt - kG4_GDP*Ops_G;
  // GTP binding to the Ops-Gt complex.
  v_r10: Ops_G => Ops_G_GTP; kG5_GTP*Ops_G;
  // Dissociation of the Ops-G_GTP complex
  v_r11: Ops_G_GTP => G_GTP + Ops; kG6*Ops_G_GTP;
  // Chromophore regeneration by 11-cis retinal binding to Ops.
  v_r12: Ops => R; kRrecyc*Ops;
  // Pre-coupling of inactive R to Gt
  v_GtRpre: Gt + R -> R_Gt; kGpre1*Gt*R - kGpre2*R_Gt;
  // Binding of R0 and Gt. The association rate constant is assumed to decrease exponentially with increasing phosphorylations.
  v_r13_0: Gt + R0 -> R0_Gt; kG1_0*Gt*R0 - kG2*R0_Gt;
  // Binding of R1 and Gt. The association rate constant is assumed to decrease exponentially with increasing phosphorylations.
  v_r13_1: Gt + R1 -> R1_Gt; kG1_1*Gt*R1 - kG2*R1_Gt;
  // Binding of R2 and Gt. The association rate constant is assumed to decrease exponentially with increasing phosphorylations.
  v_r13_2: Gt + R2 -> R2_Gt; kG1_2*Gt*R2 - kG2*R2_Gt;
  // Binding of R3 and Gt. The association rate constant is assumed to decrease exponentially with increasing phosphorylations.
  v_r13_3: Gt + R3 -> R3_Gt; kG1_3*Gt*R3 - kG2*R3_Gt;
  // Binding of R4 and Gt. The association rate constant is assumed to decrease exponentially with increasing phosphorylations.
  v_r13_4: Gt + R4 -> R4_Gt; kG1_4*Gt*R4 - kG2*R4_Gt;
  // Binding of R5 and Gt. The association rate constant is assumed to decrease exponentially with increasing phosphorylations.
  v_r13_5: Gt + R5 -> R5_Gt; kG1_5*Gt*R5 - kG2*R5_Gt;
  // Binding of R6 and Gt. The association rate constant is assumed to decrease exponentially with increasing phosphorylations.
  v_r13_6: Gt + R6 -> R6_Gt; kG1_6*Gt*R6 - kG2*R6_Gt;
  // GDP dissociation from the R0-Gt complex.
  v_r14_0: R0_Gt -> R0_G; kG3*R0_Gt - kG4_GDP*R0_G;
  // GDP dissociation from the R1-Gt complex.
  v_r14_1: R1_Gt -> R1_G; kG3*R1_Gt - kG4_GDP*R1_G;
  // GDP dissociation from the R2-Gt complex.
  v_r14_2: R2_Gt -> R2_G; kG3*R2_Gt - kG4_GDP*R2_G;
  // GDP dissociation from the R3-Gt complex.
  v_r14_3: R3_Gt -> R3_G; kG3*R3_Gt - kG4_GDP*R3_G;
  // GDP dissociation from the R4-Gt complex.
  v_r14_4: R4_Gt -> R4_G; kG3*R4_Gt - kG4_GDP*R4_G;
  // GDP dissociation from the R5-Gt complex.
  v_r14_5: R5_Gt -> R5_G; kG3*R5_Gt - kG4_GDP*R5_G;
  // GDP dissociation from the R6-Gt complex.
  v_r14_6: R6_Gt -> R6_G; kG3*R6_Gt - kG4_GDP*R6_G;
  // GTP binding to the R0-Gt complex.
  v_r15_0: R0_G => R0_G_GTP; kG5_GTP*R0_G;
  // GTP binding to the R1-Gt complex.
  v_r15_1: R1_G => R1_G_GTP; kG5_GTP*R1_G;
  // GTP binding to the R2-Gt complex.
  v_r15_2: R2_G => R2_G_GTP; kG5_GTP*R2_G;
  // GTP binding to the R3-Gt complex.
  v_r15_3: R3_G => R3_G_GTP; kG5_GTP*R3_G;
  // GTP binding to the R4-Gt complex.
  v_r15_4: R4_G => R4_G_GTP; kG5_GTP*R4_G;
  // GTP binding to the R5-Gt complex.
  v_r15_5: R5_G => R5_G_GTP; kG5_GTP*R5_G;
  // GTP binding to the R6-Gt complex.
  v_r15_6: R6_G => R6_G_GTP; kG5_GTP*R6_G;
  // Dissociation of the R0-G_GTP complex.
  v_r16_0: R0_G_GTP => G_GTP + R0; kG6*R0_G_GTP;
  // Dissociation of the R1-G_GTP complex.
  v_r16_1: R1_G_GTP => G_GTP + R1; kG6*R1_G_GTP;
  // Dissociation of the R2-G_GTP complex.
  v_r16_2: R2_G_GTP => G_GTP + R2; kG6*R2_G_GTP;
  // Dissociation of the R3-G_GTP complex.
  v_r16_3: R3_G_GTP => G_GTP + R3; kG6*R3_G_GTP;
  // Dissociation of the R4-G_GTP complex.
  v_r16_4: R4_G_GTP => G_GTP + R4; kG6*R4_G_GTP;
  // Dissociation of the R5-G_GTP complex.
  v_r16_5: R5_G_GTP => G_GTP + R5; kG6*R5_G_GTP;
  // Dissociation of the R6-G_GTP complex.
  v_r16_6: R6_G_GTP => G_GTP + R6; kG6*R6_G_GTP;
  // Dissociation of trimeric Gt into α and βγ subunits.
  v_r17: G_GTP => Ga_GTP + Gbg; kG7*G_GTP;
  // Binding of G_α_GTP to one PDE inactive subunit.
  v_r18: Ga_GTP + PDE -> PDE_Ga_GTP; kP1*PDE*Ga_GTP - kP1_rev*PDE_Ga_GTP;
  // Activation of the PDE-G_α_GTP complex.
  v_r19: PDE_Ga_GTP => PDE_a_Ga_GTP; kP2*PDE_Ga_GTP;
  // Binding of G_α_GTP to singly active PDE.
  v_r20: Ga_GTP + PDE_a_Ga_GTP => Ga_GTP_PDE_a_Ga_GTP; kP3*PDE_a_Ga_GTP*Ga_GTP;
  // Activation of the second G_α_GTP-bound PDE subunit.
  v_r21: Ga_GTP_PDE_a_Ga_GTP => Ga_GTP_a_PDE_a_Ga_GTP; kP4*Ga_GTP_PDE_a_Ga_GTP;
  // Binding of RGS9-1 complex to a doubly-active PDE tetramer.
  v_r22: Ga_GTP_a_PDE_a_Ga_GTP + RGS => RGS_Ga_GTP_a_PDE_a_Ga_GTP; kRGS1*RGS*Ga_GTP_a_PDE_a_Ga_GTP;
  // RGS9-1-mediated deactivation of one of two PDE active subunits.
  v_r23: RGS_Ga_GTP_a_PDE_a_Ga_GTP => Ga_GDP + PDE_a_Ga_GTP + RGS; kRGS2*RGS_Ga_GTP_a_PDE_a_Ga_GTP;
  // Binding of RGS9-1 complex to a singly-active PDE tetramer.
  v_r24: PDE_a_Ga_GTP + RGS => RGS_PDE_a_Ga_GTP; kRGS1*RGS*PDE_a_Ga_GTP;
  // RGS9-1-mediated deactivation of a singly active PDE.
  v_r25: RGS_PDE_a_Ga_GTP => Ga_GDP + PDE + RGS; kRGS2*RGS_PDE_a_Ga_GTP;
  // Inactivation of the PDE*-G_α_GTP complex by G_α_GTP's inate GTPase activity.
  v_r26: PDE_a_Ga_GTP => Ga_GDP + PDE; kPDEshutoff*PDE_a_Ga_GTP;
  // Inactivation of one of the two active PDE subunits by G_α_GTP's inate GTPase activity.
  v_r27: Ga_GTP_a_PDE_a_Ga_GTP => Ga_GDP + PDE_a_Ga_GTP; kPDEshutoff*Ga_GTP_a_PDE_a_Ga_GTP;
  // G_α_GTP auto-catalytic GTPase activity
  v_r28: Ga_GTP => Ga_GDP; kGshutoff*Ga_GTP;
  // Reconstitution of Gt heterotrimer from inactive subunits
  v_r29: Ga_GDP + Gbg => Gt; kGrecyc*Gbg*Ga_GDP;
  // Ca2+-induced Rec conformation change
  v_r30: RecT + $Ca2_free -> RecR_Ca; kRec1*RecT*Ca2_free - kRec2*RecR_Ca;
  // Binding of RK to Ca2+-bound Rec
  v_r31: RK + RecR_Ca -> RecR_Ca_RK; kRec3*RecR_Ca*RK - kRec4*RecR_Ca_RK;
  // Arr homo-dimerization
  v_r_diarr: 2 Arr -> Arr_di; kA4*Arr*Arr - kA5*Arr_di;
  // Arr homo-tetramerization
  v_r_tetraarr: 2 Arr_di -> Arr_tetra; kA4*Arr_di*Arr_di - kA5*Arr_tetra;
  // Ca2+ association and dissociation from intracellular buffers with total concentration eT.
  v_r33: $Ca2_free -> Ca2_buff; k1*(eT - Ca2_buff)*Ca2_free - k2*Ca2_buff;
  // Intracellular Ca2+ efflux via the Na+/Ca2+-K+ exchanger.
  v_r34: $Ca2_free => ; gammaCa*(Ca2_free - Ca2_0);
  // Extracellular Ca2+ influx via the cGMP-gated cation channels.
  v_r35: => $Ca2_free; 1e6*fCa*Jdark/((2 + fCa)*F*Vcyto)*(cGMP/cGMPdark)^ncg;  // modifiers: cGMP
  // cGMP synthesis by guanylate cyclases.
  v_r36: => cGMP; alfamax/(1 + (Ca2_free/Kc1)^m1) + alfamax/(1 + (Ca2_free/Kc2)^m2);  // modifiers: Ca2_free
  // cGMP hydrolysis by PDE.
  v_r37: cGMP => ; (betadark + betasub*E)*cGMP;  // modifiers: Ga_GTP_PDE_a_Ga_GTP, Ga_GTP_a_PDE_a_Ga_GTP, PDE_a_Ga_GTP

  // Unit definitions:
  unit volume = litre;
  unit substance = mole;
  unit area = metre^2;
end
