// SBML level 3 version 2

model MODEL1507210000()
  // Sengupta2015 - Knowledge base model of human energy pool network (HEPNet)
  // This model is described in the article:
  // HEPNet: A Knowledge Base Model of Human Energy Pool Network for Predicting the Energy Availability Status of an Individual.
  // Sengupta A, Grover M, Chakraborty A, Saxena S.
  // PLoS ONE 2015; 10(6): e0127918
  // Abstract:
  // HEPNet is an electronic representation of metabolic reactions occurring within human cellular organization focusing on inflow and outflow of the energy currency ATP, GTP and other energy associated moieties. The backbone of HEPNet consists of primary bio-molecules such as carbohydrates, proteins and fats which ultimately constitute the chief source for the synthesis and obliteration of energy currencies in a cell. A series of biochemical pathways and reactions constituting the catabolism and anabolism of various metabolites are portrayed through cellular compartmentalization. The depicted pathways function synchronously toward an overarching goal of producing ATP and other energy associated moieties to bring into play a variety of cellular functions. HEPNet is manually curated with raw data from experiments and is also connected to KEGG and Reactome databases. This model has been validated by simulating it with physiological states like fasting, starvation, exercise and disease conditions like glycaemia, uremia and dihydrolipoamide dehydrogenase deficiency (DLDD). The results clearly indicate that ATP is the master regulator under different metabolic conditions and physiological states. The results also highlight that energy currencies play a minor role. However, the moiety creatine phosphate has a unique character, since it is a ready-made source of phosphoryl groups for the rapid synthesis of ATP from ADP. HEPNet provides a framework for further expanding the network diverse age groups of both the sexes, followed by the understanding of energetics in more complex metabolic pathways that are related to human disorders.
  // This model is hosted on BioModels Database and identified by: BIOMD0000000579.
  // To cite BioModels Database, please use: BioModels Database: An enhanced, curated and annotated resource for published quantitative kinetic models.
  // To the extent possible under law, all copyright and related or neighbouring rights to this encoded model have been dedicated to the public domain worldwide. Please refer to CC0 Public Domain Dedication for more information.
  // biomodels.db:MODEL1507210000
  // biomodels.db:BIOMD0000000579
  // isDescribedBy pubmed:26053019
  // hasTaxon taxonomy:9606
  // isVersionOf GO:0006091
  // hasProperty mamo:MAMO_0000046
  // model units - substance: substance, time: time, volume: volume, area: area, length: length, extent: substance

  // Compartments:
  compartment default = 1 volume;
  compartment mitochondria = 1 volume;
  compartment mit_inner_membrane = 1 volume;
  compartment IMS = 1 volume;
  compartment mit_outer_membrane = 1 volume;

  // Species:
  species cis_Aconitate in mitochondria = 13; cis_Aconitate is "cis-Aconitate";  // isVersionOf kegg.compound:C00417 CHEBI:32805
  species car_mat in mitochondria = 43;
  species Xylulose5P in default = 0.43;  // isVersionOf kegg.compound:C03291 CHEBI:16593
  species Unbranched_alpha_1_4_polymer in default = 0; Unbranched_alpha_1_4_polymer is "Unbranched alpha(1,4)polymer";
  species UREA in mitochondria = 6500;  // isVersionOf kegg.compound:C00086 CHEBI:16199
  species s308 in default = 0; s308 is "UDP-galactose1phosphate uridylyl transferase";  // isVersionOf ec-code:2.7.7.12; isVersionOf kegg.orthology:K00965; isVersionOf hsa:2592; isVersionOf uniprot:P07902
  species UDP_Glucose in default = 155; UDP_Glucose is "UDP-Glucose";  // isVersionOf kegg.compound:C00029 CHEBI:18066
  species UDP_glucose4epimerase in default = 0;  // isVersionOf kegg.orthology:K01784; isVersionOf ec-code:5.1.3.2; isVersionOf hsa:2582; isVersionOf uniprot:Q14376
  species UDP_Glucose_Phosphorylase in default = 0;  // isVersionOf ec-code:2.7.7.9; isVersionOf kegg.orthology:K00963; isVersionOf hsa:7360; isVersionOf uniprot:Q16851
  species UDP in default = 41;  // isVersionOf kegg.compound:C00015 CHEBI:17659
  species Triokinase in default = 0;  // isVersionOf ec-code:2.7.1.28
  species Triglyceride in default = 43.2;  // isVersionOf kegg.compound:C00422 CHEBI:17855
  species Trehalose in default = 0.056;  // isVersionOf kegg.compound:C01083 CHEBI:16551
  species Trehalase in default = 0;  // isVersionOf kegg.orthology:K01194; isVersionOf hsa:11181; isVersionOf ec-code:3.2.1.28; isVersionOf uniprot:O43280
  species Transketolase in default = 0;  // isVersionOf ec-code:2.2.1.1; isVersionOf kegg.orthology:K00615; isVersionOf hsa:7086; isVersionOf uniprot:P29401
  species Transaldolase in default = 0;  // isVersionOf ec-code:2.2.1.2; isVersionOf kegg.orthology:K00616; isVersionOf hsa:6888; isVersionOf uniprot:P37837
  species Thiolase in mitochondria = 0;  // isVersionOf ec-code:2.3.1.9; isVersionOf kegg.orthology:K00626; isVersionOf hsa:38; isVersionOf hsa:39
  species TPP in mitochondria = 0.0032;  // isVersionOf kegg.compound:C00068 CHEBI:9532
  species Sucrose in default = 1.8;  // isVersionOf kegg.compound:C00089 CHEBI:17992
  species Sucrase in default = 0;  // isVersionOf kegg.orthology:K01203; isVersionOf hsa:6476; isVersionOf ec-code:3.2.1.10; isVersionOf uniprot:P14410
  species Succinate_dehydrogenase in mitochondria = 0;  // isVersionOf ec-code:1.3.5.1; isVersionOf kegg.orthology:K00234; isVersionOf kegg.orthology:K00235; isVersionOf hsa:6390
  species Succinate in mitochondria = 0;  // isVersionOf kegg.compound:C00042 CHEBI:15741
  species Sedoheptulase7P in default = 0.89;  // isVersionOf kegg.compound:C05382 CHEBI:15721
  species S_CoA_synthase in mitochondria = 0;  // isVersionOf uniprot:Q9P2R7; isVersionOf uniprot:P53597; isVersionOf ec-code:6.2.1.5; isVersionOf hsa:8803
  species S_CoA in mitochondria = 20;  // isVersionOf kegg.compound:C00091 CHEBI:15380
  species Ribose5P in default = 13.2;  // isVersionOf kegg.compound:C00117 CHEBI:17797
  species QH2 in mit_inner_membrane = 7.4;  // isVersionOf ec-code:1.6.5.3; isVersionOf kegg.reaction:R02163; isVersionOf uniprot:O75251; isVersionOf hsa:374291
  species Q in mit_inner_membrane = 0;
  species Pyruvate in default = 64;  // isVersionOf kegg.compound:C00022 CHEBI:32816
  species Pi_default in default = 379.1;
  species Pi_mitochondria in mitochondria = 379.1;
  species Phosphopentose_isomerase in default = 0;  // isVersionOf ec-code:5.3.1.6; isVersionOf ggo:101148377; isVersionOf kegg.orthology:K01807; isVersionOf kegg.reaction:R01056
  species Phosphohexo_isomerase in default = 0;  // isVersionOf ec-code:5.3.1.9; isVersionOf kegg.orthology:K01810; isVersionOf hsa:2821; isVersionOf kegg.reaction:R00771
  species Phosphogluco_mutase in default = 0;  // isVersionOf ec-code:5.4.2.2; isVersionOf kegg.orthology:K01835; isVersionOf hsa:5236; isVersionOf uniprot:P36871
  species PYRUVATE_KINASE in default = 0;  // isVersionOf ec-code:2.7.1.40; isVersionOf uniprot:P30613; isVersionOf kegg.orthology:K00873; isVersionOf hsa:5315
  species PYRUVATE_DEHYDROGENASE in mitochondria = 0;  // isVersionOf ec-code:1.2.4.1; isVersionOf kegg.orthology:K00161; isVersionOf kegg.orthology:K00162; isPartOf hsa:5161
  species PYRUVATE_CARBOXYLASE in default = 0;  // isVersionOf ec-code:6.4.1.1; isVersionOf kegg.orthology:K01958; isVersionOf hsa:5091; isVersionOf uniprot:P11498
  species PPi_default in default = 1.8;  // isVersionOf kegg.compound:C00013 CHEBI:29888
  species PPi_mitochondria in mitochondria = 1.8;  // isVersionOf kegg.compound:C00013 CHEBI:29888
  species PHOSPHO_TRIOSE_ISOMERASE in default = 0;  // isVersionOf pop:POPTR_724697; isVersionOf ec-code:5.3.1.1; isVersionOf uniprot:P60174
  species PGA_MUTASE in default = 0;  // isVersionOf uniprot:P15259; isVersionOf uniprot:P18669; isVersionOf ec-code:5.4.2.11; isVersionOf kegg.orthology:K01834
  species PGA_KINASE in default = 0;  // isVersionOf ec-code:2.7.2.3; isVersionOf kegg.orthology:K00927; isVersionOf hsa:5230; isVersionOf hsa:5232
  species PEP_CARBOXYKINASE in default = 0;  // isVersionOf ec-code:4.1.1.32; isVersionOf kegg.orthology:K01596; isVersionOf hsa:5106; isVersionOf hsa:5105
  species PEP in default = 17.4;  // isVersionOf kegg.compound:C00074 CHEBI:18021
  species Ornithine in mitochondria = 89;  // isVersionOf kegg.compound:C00077 CHEBI:15729
  species OXALOACETATE in default = 61;  // isVersionOf kegg.compound:C00036 CHEBI:30744
  species OAA in mitochondria = 61;  // isVersionOf kegg.compound:C00036 CHEBI:30744
  species NAPDH in default = 51;  // isVersionOf kegg.compound:C00005 CHEBI:16474
  species NADPH in default = 51;
  species NADP in default = 0; NADP is "NADP+";  // isVersionOf kegg.compound:C00006 CHEBI:18009
  species NADH_default in default = 22;  // isVersionOf kegg.compound:C00004 CHEBI:16908
  species s351 in mitochondria = 22; s351 is "NADH";  // isVersionOf kegg.compound:C00004 CHEBI:16908
  species s381 in mitochondria = 22; s381 is "NADH";  // isVersionOf kegg.compound:C00004 CHEBI:16908
  species NAD_default in default = 24; NAD_default is "NAD+";  // isVersionOf kegg.compound:C00003 CHEBI:15846
  species NAD_mitochondria in mitochondria = 24; NAD_mitochondria is "NAD+";  // isVersionOf kegg.compound:C00003 CHEBI:15846
  species Mg2_default in default = 850; Mg2_default is "Mg2+";  // isVersionOf kegg.compound:C00305 CHEBI:18420
  species Mg2_mitochondria in mitochondria = 850; Mg2_mitochondria is "Mg2+";  // isVersionOf kegg.compound:C00305 CHEBI:18420
  species Malate_dehydrogenase in mitochondria = 0;  // isVersionOf uniprot:P40926; isVersionOf ec-code:1.1.1.37; isVersionOf kegg.orthology:K00024; isVersionOf kegg.orthology:K00025
  species Malate in mitochondria = 3.2;  // isVersionOf kegg.compound:C00711 CHEBI:6650
  species Limit_Dextrin in default = 0;  // isVersionOf kegg.compound:C02049 CHEBI:28912
  species Lactose in default = 1.45;  // isVersionOf kegg.compound:C01970 CHEBI:36218
  species Lactonase in default = 0;  // isVersionOf ec-code:3.1.1.17; isVersionOf kegg.orthology:K01053; isVersionOf hsa:9104; isVersionOf uniprot:Q15493
  species Lactate in default = 740;  // isVersionOf kegg.compound:C00186 CHEBI:422
  species LIPOATE in mitochondria = 0.077;
  species Isocitrate_dehydrogenase in mitochondria = 0;  // isVersionOf ec-code:1.1.1.41; isVersionOf uniprot:O75874; isVersionOf kegg.orthology:K00030; isVersionOf hsa:3421
  species Isocitrate in mitochondria = 6;  // isVersionOf kegg.compound:C00311 CHEBI:30887
  species Hexokinase in default = 0;  // isVersionOf ec-code:2.7.1.1; isVersionOf uniprot:P52789; isVersionOf uniprot:P19367; isVersionOf kegg.orthology:K00844
  species HMGCoA in mitochondria = 0.25;  // isVersionOf kegg.compound:C00356 CHEBI:15467
  species HMG_CoA_Synthase in mitochondria = 0; HMG_CoA_Synthase is "HMG-CoA Synthase";  // isVersionOf ec-code:2.3.3.10; isVersionOf kegg.orthology:K01641; isVersionOf hsa:3157; isVersionOf hsa:3158
  species HCO3_NH4 in mitochondria = 24900; HCO3_NH4 is "HCO3-+ NH4+";  // isVersionOf kegg.compound:C00288 CHEBI:17544; isVersionOf kegg.compound:C01342 CHEBI:28938
  species H2O_default in default = 55000000;  // isVersionOf kegg.compound:C00001 CHEBI:15377
  species H2O_mitochondria in mitochondria = 55000000;  // isVersionOf kegg.compound:C00001 CHEBI:15377
  species H20 in default = 55000000;  // isVersionOf kegg.compound:C00001 CHEBI:15377
  species H_default in default = 0; H_default is "H+";  // isVersionOf kegg.compound:C00080 CHEBI:15378
  species H_mitochondria in mitochondria = 0; H_mitochondria is "H+";  // isVersionOf kegg.compound:C00080 CHEBI:15378
  species Glygogen_Phosphorylase in default = 0;  // hsa:5836; hsa:5837; hsa:5834; isVersionOf ec-code:2.4.1.1
  species Glycosyl_4_6_Transferase in default = 0; Glycosyl_4_6_Transferase is "Glycosyl-4,6-Transferase";  // isVersionOf ec-code:2.4.1.24
  species Glycosyl_transferase in default = 0;  // isVersionOf ec-code:2.4.1.102; isVersionOf hsa:2650; isVersionOf kegg.orthology:K00727; isVersionOf uniprot:Q02742
  species Glycogen_phosphorylase in default = 0;  // isVersionOf ec-code:2.4.1.1; isVersionOf kegg.orthology:K16153; isVersionOf hsa:5836; isVersionOf hsa:5837
  species Glycogen_Synthase in default = 0;  // isVersionOf ec-code:2.4.1.11; isVersionOf kegg.orthology:K00693; isVersionOf hsa:2997; isVersionOf kegg.compound:C03185
  species Glycogen_Primer in default = 0;
  species Glycogen in default = 43.3;  // isVersionOf kegg.compound:C00182 CHEBI:28087
  species Glycerol3P in default = 30;  // isVersionOf kegg.compound:C00093 CHEBI:15978
  species Glyceraldehyde in default = 1476;  // isVersionOf kegg.compound:C00577 CHEBI:17378
  species Glutamine_mitochondria in mitochondria = 586;  // isVersionOf kegg.compound:C00064 CHEBI:18050
  species Glutamine_default in default = 586;  // isVersionOf kegg.compound:C00064 CHEBI:18050
  species Glutaminase in mitochondria = 0;  // isVersionOf ec-code:3.5.1.35
  species Glutamate_mitochondria in mitochondria = 7.9;  // isVersionOf kegg.compound:C00025 CHEBI:16015
  species Glutamate_default in default = 7.9;  // isVersionOf kegg.compound:C00025 CHEBI:16015
  species Glucose in default = 4440;  // isVersionOf kegg.compound:C00031 CHEBI:4167
  species Galactose1P in default = 31;  // isVersionOf kegg.compound:C00446 CHEBI:17973
  species Galactose in default = 88.3;  // isVersionOf kegg.compound:C00124 CHEBI:4139
  species Galactokinase in default = 0;  // isVersionOf ec-code:2.7.1.6; isVersionOf kegg.orthology:K00849; isVersionOf hsa:2584; isVersionOf hsa:2585
  species GTP in default = 56;  // isVersionOf kegg.compound:C00044 CHEBI:15996
  species GDP_default in default = 15;  // isVersionOf kegg.compound:C00035 CHEBI:17552
  species GDP_mitochondria in mitochondria = 15;  // isVersionOf kegg.compound:C00035 CHEBI:17552
  species GA3P in default = 4.8;  // isVersionOf kegg.compound:C00118 CHEBI:29052
  species G6PDehydrogenase in default = 0;  // isVersionOf uniprot:P11413; isVersionOf kegg.orthology:K00036; isVersionOf ec-code:1.1.1.49; isVersionOf hsa:2539
  species G6P in default = 29.1;  // isVersionOf kegg.compound:C00092 CHEBI:4170
  species G3P_DEHYDROGENASE in default = 0;  // isVersionOf ec-code:1.2.1.12; isVersionOf hsa:2597; isVersionOf kegg.orthology:K00134; isVersionOf uniprot:O14556
  species G1P in default = 5;  // isVersionOf kegg.compound:C00103 CHEBI:29042
  species G_6_P_Phosphatase in default = 0; G_6_P_Phosphatase is "G-6-P Phosphatase";  // isVersionOf ec-code:3.1.3.9; isVersionOf kegg.orthology:K01084; isVersionOf hsa:57818; isVersionOf uniprot:P35575
  species Fumarate in mitochondria = 1.5;  // isVersionOf kegg.compound:C00122 CHEBI:18012
  species Fumarase in mitochondria = 0;  // isVersionOf ec-code:4.2.1.2; isVersionOf bmy:Bm1_47480; isVersionOf uniprot:P07954
  species Fructose in default = 31;  // isVersionOf kegg.compound:C00085 CHEBI:15946
  species Fructokinase in default = 0;  // isVersionOf kegg.orthology:K00850; isVersionOf hsa:5213; isVersionOf ec-code:2.7.1.11; isVersionOf uniprot:P08237
  species FeS_mitochondria in mitochondria = 0;  // isVersionOf uniprot:P07332; isVersionOf kegg.orthology:K07527; isVersionOf hsa:2242; isVersionOf ec-code:2.7.10.2
  species FeS_mit_inner_membrane in mit_inner_membrane = 0;  // isVersionOf ec-code:2.7.10.2; isVersionOf uniprot:P07332; isVersionOf hsa:2242; isVersionOf kegg.orthology:K07527
  species FMN in mit_inner_membrane = 0.0075;  // isVersionOf kegg.compound:C00061 CHEBI:17621
  species FADH2 in mitochondria = 0;  // isVersionOf kegg.compound:C01352 CHEBI:17877
  species FAD in mitochondria = 0.075;  // isVersionOf kegg.compound:C00016 CHEBI:16238
  species FA in default = 0;  // isVersionOf kegg.compound:C00061 CHEBI:17621
  species F6P in default = 10.2;  // isVersionOf kegg.compound:C00085 CHEBI:15946
  species F1P in default = 0.17;  // isVersionOf kegg.compound:C01094 CHEBI:18105
  species F1_6P in default = 1.2; F1_6P is "F1,6P";  // isVersionOf kegg.compound:C00354 CHEBI:16905
  species F1_6BISPHOSPHATASE in default = 0; F1_6BISPHOSPHATASE is "F1,6BISPHOSPHATASE";  // isVersionOf kegg.orthology:K02446; isVersionOf kegg.orthology:K03841; isVersionOf kegg.orthology:K04041; isVersionOf hsa:2203
  species Erythrose4P in default = 1770;  // isVersionOf kegg.compound:C00279 CHEBI:48153
  species Epimerase in default = 0;  // isVersionOf ec-code:5.1.3.2; isVersionOf kegg.orthology:K01784; isVersionOf hsa:2582; isVersionOf kegg.reaction:R00291
  species Enoyl_CoA_hydratase in mitochondria = 0; Enoyl_CoA_hydratase is "Enoyl-CoA hydratase";  // isVersionOf ec-code:4.2.1.17; isVersionOf kegg.orthology:K07511; isVersionOf hsa:1892; isVersionOf uniprot:P30084
  species ENOLASE in default = 0;  // isVersionOf ec-code:4.2.1.11; isVersionOf kegg.orthology:K01689; isVersionOf hsa:2027; isVersionOf uniprot:P13929
  species DHAP in default = 15.6;  // isVersionOf kegg.compound:C00111 CHEBI:16108
  species D_Ribulose5P in default = 1.58; D_Ribulose5P is "D-Ribulose5P";  // isVersionOf kegg.compound:C00199 CHEBI:17363
  species D_Beta_Hydroxybutyrate in mitochondria = 36; D_Beta_Hydroxybutyrate is "D-Beta-Hydroxybutyrate";  // isVersionOf kegg.compound:C05984 CHEBI:1148
  species s330 in mitochondria = 0; s330 is "D Betahydroxybutyrate dehydrogenase";  // isVersionOf ec-code:1.1.1.30; isVersionOf kegg.orthology:K00019; isVersionOf hsa:56898; isVersionOf uniprot:Q9BUT1
  species Cyb in mit_inner_membrane = 0;
  species Cya_a3 in mit_inner_membrane = 0; Cya_a3 is "Cya-a3";  // isVersionOf ec-code:4.6.1.1; isVersionOf kegg.orthology:K01768; isVersionOf hsa:109; isVersionOf uniprot:O60266
  species CyC2 in mit_inner_membrane = 0;
  species CyC in mit_inner_membrane = 0;  // isVersionOf uniprot:Q8ND76; isVersionOf hsa:219771
  species CoA_SH_default in default = 20; CoA_SH_default is "CoA-SH";  // isVersionOf kegg.compound:C00010 CHEBI:15346
  species CoA_SH_mitochondria in mitochondria = 20; CoA_SH_mitochondria is "CoA-SH";  // isVersionOf kegg.compound:C00010 CHEBI:15346
  species Co_Ash in mitochondria = 20; Co_Ash is "Co-Ash";  // isVersionOf kegg.compound:C00010 CHEBI:15346
  species Citrullyl_AMP_intermediate in mitochondria = 0;
  species Citrulline in mitochondria = 38;  // isVersionOf kegg.compound:C00327 CHEBI:16349
  species Citrate_Synthase in mitochondria = 0;  // isVersionOf kegg.orthology:K01647; isVersionOf hsa:1431; isVersionOf ec-code:2.3.3.1; isVersionOf uniprot:P53396
  species Citrate in mitochondria = 190;  // isVersionOf kegg.compound:C00158 CHEBI:30769
  species Carnitine_cyt in default = 43;  // isVersionOf kegg.compound:C00318 CHEBI:16347
  species Carbamoyl_phosphate_synthetase_I in mitochondria = 0;  // isVersionOf uniprot:P31327; isVersionOf ec-code:6.3.5.5; isVersionOf hsa:790
  species Carbamoyl_phosphate in mitochondria = 0;  // isVersionOf kegg.compound:C00169 CHEBI:17672
  species CO2_default in default = 21600;  // isVersionOf kegg.compound:C00011 CHEBI:16526
  species CO2_mitochondria in mitochondria = 21600;  // isVersionOf kegg.compound:C00011 CHEBI:16526
  species CAC in mit_inner_membrane = 0;  // isVersionOf kegg.compound:C01470 CHEBI:15335
  species C8Acyl_CoA in mitochondria = 0; C8Acyl_CoA is "C8Acyl-CoA";  // isVersionOf kegg.compound:C00040 CHEBI:17984
  species C8_L_3_hydroxyacyl_CoA in mitochondria = 0; C8_L_3_hydroxyacyl_CoA is "C8 L-3-hydroxyacyl-CoA";  // isVersionOf kegg.compound:C00640 CHEBI:15455
  species C8_Ketoacyl_CoA in mitochondria = 0; C8_Ketoacyl_CoA is "C8 Ketoacyl-CoA";
  species C8_2_trans_enoyl_CoA in mitochondria = 0; C8_2_trans_enoyl_CoA is "C8 2-trans-enoyl-CoA";  // isVersionOf kegg.compound:C03221 CHEBI:15471
  species C6Acyl_CoA in mitochondria = 0; C6Acyl_CoA is "C6Acyl-CoA";  // isVersionOf kegg.compound:C00040 CHEBI:17984
  species C6_L_3_hydroxyacyl_CoA in mitochondria = 0; C6_L_3_hydroxyacyl_CoA is "C6 L-3-hydroxyacyl-CoA";  // isVersionOf kegg.compound:C00640 CHEBI:15455
  species C6_Ketoacyl_CoA in mitochondria = 0; C6_Ketoacyl_CoA is "C6 Ketoacyl-CoA";
  species C6_2_trans_enoyl_CoA in mitochondria = 0; C6_2_trans_enoyl_CoA is "C6 2-trans-enoyl-CoA";  // isVersionOf kegg.compound:C03221 CHEBI:15471
  species C4Acyl_CoA in mitochondria = 0; C4Acyl_CoA is "C4Acyl-CoA";  // isVersionOf kegg.compound:C00040 CHEBI:17984
  species C4_L_3_hydroxyacyl_CoA in mitochondria = 0; C4_L_3_hydroxyacyl_CoA is "C4 L-3-hydroxyacyl-CoA";  // isVersionOf kegg.compound:C00640 CHEBI:15455
  species C4_Ketoacyl_CoA in mitochondria = 0; C4_Ketoacyl_CoA is "C4 Ketoacyl-CoA";
  species C4_2_trans_enoyl_CoA in mitochondria = 0; C4_2_trans_enoyl_CoA is "C4 2-trans-enoyl-CoA";  // isVersionOf kegg.compound:C00658 CHEBI:50998
  species C22car_ims_IMS in IMS = 0;
  species C22car_ims_mitochondria in mitochondria = 0;
  species C22Acyl_CoA in mitochondria = 0; C22Acyl_CoA is "C22Acyl-CoA";  // isVersionOf kegg.compound:C00040 CHEBI:17984
  species C22_L_3_hydroxyacyl_CoA in mitochondria = 0; C22_L_3_hydroxyacyl_CoA is "C22 L-3-hydroxyacyl-CoA";  // isVersionOf kegg.compound:C00640 CHEBI:15455
  species C22_Ketoacyl_CoA in mitochondria = 0; C22_Ketoacyl_CoA is "C22 Ketoacyl-CoA";
  species C22_AcylCoA_cyt in default = 0;
  species C22_2_trans_enoyl_CoA in mitochondria = 0; C22_2_trans_enoyl_CoA is "C22 2-trans-enoyl-CoA";  // isVersionOf kegg.compound:C03221 CHEBI:15471
  species C20car_ims_IMS in IMS = 0;
  species C20car_ims_mitochondria in mitochondria = 0;
  species C20Acyl_CoA in mitochondria = 0; C20Acyl_CoA is "C20Acyl-CoA";  // isVersionOf kegg.compound:C00040 CHEBI:17984
  species C20_L_3_hydroxyacyl_CoA in mitochondria = 0; C20_L_3_hydroxyacyl_CoA is "C20 L-3-hydroxyacyl-CoA";  // isVersionOf kegg.compound:C00640 CHEBI:15455
  species C20_Ketoacyl_CoA in mitochondria = 0; C20_Ketoacyl_CoA is "C20 Ketoacyl-CoA";
  species C20_AcylCoA_cyt in default = 0;
  species C20_2_trans_enoyl_CoA in mitochondria = 0; C20_2_trans_enoyl_CoA is "C20 2-trans-enoyl-CoA";  // isVersionOf kegg.compound:C03221 CHEBI:15471
  species C18car_ims_IMS in IMS = 0;
  species C18car_ims_mitochondria in mitochondria = 0;
  species C18Acyl_CoA in mitochondria = 0; C18Acyl_CoA is "C18Acyl-CoA";  // isVersionOf kegg.compound:C00040 CHEBI:17984
  species C18_L_3_hydroxyacyl_CoA in mitochondria = 0; C18_L_3_hydroxyacyl_CoA is "C18 L-3-hydroxyacyl-CoA";  // isVersionOf kegg.compound:C00640 CHEBI:15455
  species C18_Ketoacyl_CoA in mitochondria = 0; C18_Ketoacyl_CoA is "C18 Ketoacyl-CoA";
  species C18_AcylCoA_cyt in default = 0;
  species C18_2_trans_enoyl_CoA in mitochondria = 0; C18_2_trans_enoyl_CoA is "C18 2-trans-enoyl-CoA";  // isVersionOf kegg.compound:C03221 CHEBI:15471
  species C16car_ims_IMS in IMS = 0;
  species C16car_ims_mitochondria in mitochondria = 0;
  species C16Acyl_CoA in mitochondria = 0; C16Acyl_CoA is "C16Acyl-CoA";  // isVersionOf kegg.compound:C00040 CHEBI:17984
  species C16_L_3_hydroxyacyl_CoA in mitochondria = 0; C16_L_3_hydroxyacyl_CoA is "C16 L-3-hydroxyacyl-CoA";  // isVersionOf kegg.compound:C00640 CHEBI:15455
  species C16_Ketoacyl_CoA in mitochondria = 0; C16_Ketoacyl_CoA is "C16 Ketoacyl-CoA";
  species C16_AcylCoA_cyt in default = 0;
  species C16_2_trans_enoyl_CoA in mitochondria = 0; C16_2_trans_enoyl_CoA is "C16 2-trans-enoyl-CoA";  // isVersionOf kegg.compound:C03221 CHEBI:15471
  species C14car_ims_IMS in IMS = 0;
  species C14car_ims_mitochondria in mitochondria = 0;
  species C14Acyl_CoA in mitochondria = 0; C14Acyl_CoA is "C14Acyl-CoA";  // isVersionOf kegg.compound:C00040 CHEBI:17984
  species C14_L_3_hydroxyacyl_CoA in mitochondria = 0; C14_L_3_hydroxyacyl_CoA is "C14 L-3-hydroxyacyl-CoA";  // isVersionOf kegg.compound:C00640 CHEBI:15455
  species C14_Ketoacyl_CoA in mitochondria = 0; C14_Ketoacyl_CoA is "C14 Ketoacyl-CoA";
  species C14_AcylCoA_cyt in default = 0;
  species C14_2_trans_enoyl_CoA in mitochondria = 0; C14_2_trans_enoyl_CoA is "C14 2-trans-enoyl-CoA";  // isVersionOf kegg.compound:C03221 CHEBI:15471
  species C12Acyl_CoA in mitochondria = 0; C12Acyl_CoA is "C12Acyl-CoA";  // isVersionOf kegg.compound:C00040 CHEBI:17984
  species C12_L_3_hydroxyacyl_CoA in mitochondria = 0; C12_L_3_hydroxyacyl_CoA is "C12 L-3-hydroxyacyl-CoA";  // isVersionOf kegg.compound:C00640 CHEBI:15455
  species C12_Ketoacyl_CoA in mitochondria = 0; C12_Ketoacyl_CoA is "C12 Ketoacyl-CoA";
  species C12_2_trans_enoyl_CoA in mitochondria = 0; C12_2_trans_enoyl_CoA is "C12 2-trans-enoyl-CoA";  // isVersionOf kegg.compound:C03221 CHEBI:15471
  species C10Acyl_CoA in mitochondria = 0; C10Acyl_CoA is "C10Acyl-CoA";  // isVersionOf kegg.compound:C00040 CHEBI:17984
  species C10_L_3_hydroxyacyl_CoA in mitochondria = 0; C10_L_3_hydroxyacyl_CoA is "C10 L-3-hydroxyacyl-CoA";  // isVersionOf kegg.compound:C00640 CHEBI:15455
  species C10_Ketoacyl_CoA in mitochondria = 0; C10_Ketoacyl_CoA is "C10 Ketoacyl-CoA";
  species C10_2_trans_enoyl_CoA in mitochondria = 0; C10_2_trans_enoyl_CoA is "C10 2-trans-enoyl-CoA";  // isVersionOf kegg.compound:C03221 CHEBI:15471
  species s366 in mitochondria = 0; s366 is "Beta-hydroxyacyl-CoA dehydrogenase";  // isVersionOf ec-code:1.1.1.211
  species Beta_KetoacylCoA_dehydrogenase in mitochondria = 0; Beta_KetoacylCoA_dehydrogenase is "Beta-KetoacylCoA dehydrogenase";  // isVersionOf ec-code:1.1.1.211
  species Aspartate_aminotransferase in mitochondria = 0;  // isVersionOf uniprot:P00505; isVersionOf ec-code:2.6.1.1; isVersionOf kegg.orthology:K00811; isVersionOf hsa:2806
  species Aspartate in mitochondria = 0;  // isVersionOf kegg.compound:C00049 CHEBI:17053
  species Arginosuccinate in mitochondria = 0.0032;  // isVersionOf kegg.compound:C03406 CHEBI:15682
  species Arginine in mitochondria = 99;  // isVersionOf kegg.compound:C00062 CHEBI:16467
  species Amino_acids in default = 0;
  species Alpha1_6_Glycosidase in default = 0; Alpha1_6_Glycosidase is "Alpha1,6-Glycosidase";  // isVersionOf ec-code:3.2.1.33; isVersionOf kegg.reaction:R02109; isVersionOf kegg.reaction:R06158; isVersionOf kegg.orthology:K01196
  species Alpha_KG_dehydrgenase_complex in mitochondria = 0; Alpha_KG_dehydrgenase_complex is "Alpha-KG dehydrgenase complex";  // isVersionOf ec-code:1.2.4.2; isVersionOf hsa:4967
  species Alpha_KG_mitochondria in mitochondria = 0; Alpha_KG_mitochondria is "Alpha-KG";  // isVersionOf kegg.compound:C00026 CHEBI:30915
  species Alpha_keto_acid in default = 0;  // isVersionOf kegg.compound:C00026 CHEBI:30915
  species Alpha_KG_default in default = 8.9;  // isVersionOf kegg.compound:C00026 CHEBI:30915
  species Aldolase in default = 0;  // isVersionOf hsa:6888; isVersionOf ec-code:2.2.1.2; isVersionOf uniprot:P37837; isVersionOf kegg.orthology:K00616
  species Alanine in default = 333;  // isVersionOf kegg.compound:C00041 CHEBI:16977
  species Acyl_CoA_dehydrogenase in mitochondria = 0; Acyl_CoA_dehydrogenase is "Acyl-CoA dehydrogenase";  // isVersionOf ec-code:1.1.1.35; isVersionOf kegg.orthology:K00022; isVersionOf hsa:3033; isVersionOf uniprot:Q16836
  species Aconitase in mitochondria = 0;  // isVersionOf ec-code:4.2.1.3; isVersionOf kegg.orthology:K01681; isVersionOf hsa:50; isVersionOf hsa:48
  species AcetylCoA in mitochondria = 0;  // isVersionOf kegg.compound:C00024 CHEBI:15351
  species Acetone in mitochondria = 30;  // isVersionOf kegg.compound:C00207 CHEBI:15347
  species AcetoacetylCoA in mitochondria = 0;  // isVersionOf kegg.compound:C00332 CHEBI:15345
  species Acetoacetate_Decarboxylase in mitochondria = 0;  // isVersionOf ec-code:4.1.1.4; isVersionOf kegg.orthology:K01574
  species Acetoacetate in mitochondria = 21;  // isVersionOf kegg.compound:C00164 CHEBI:15344
  species ATP_default in default = 1390;  // isVersionOf kegg.compound:C00002 CHEBI:15422
  species ATP_mitochondria in mitochondria = 1390;  // isVersionOf kegg.compound:C00002 CHEBI:15422
  species AMP in mitochondria = 51;  // isVersionOf kegg.compound:C00020 CHEBI:16027
  species ADP_default in default = 160;  // isVersionOf kegg.compound:C00008 CHEBI:16761
  species ADP_mitochondria in mitochondria = 160;  // isVersionOf kegg.compound:C00008 CHEBI:16761
  species A_CoA in mitochondria = 0;  // isVersionOf kegg.compound:C00008 CHEBI:16761
  species _6PGluconate_dehydrogenase in default = 0;  // isVersionOf ec-code:1.1.1.44; isVersionOf kegg.orthology:K00033; isVersionOf hsa:5226; isVersionOf uniprot:P52209
  species _6PGluconate in default = 2720;  // isVersionOf kegg.compound:C00345 CHEBI:48928
  species _6PGDL in default = 0.00762;
  species _3_PGA in default = 47.2; _3_PGA is "3-PGA";
  species _2e in mit_inner_membrane = 0;  // isVersionOf hsa:6704; isVersionOf uniprot:P22531
  species _2NADH in default = 44;  // isVersionOf kegg.compound:C00004 CHEBI:16908
  species _2NAD in default = 48; _2NAD is "2NAD+";  // isVersionOf kegg.compound:C00003 CHEBI:15846
  species _2H_mitochondria in mitochondria = 0; _2H_mitochondria is "2H+";  // isVersionOf kegg.compound:C00080 CHEBI:15378
  species _2H_IMS in IMS = 0; _2H_IMS is "2H+";  // isVersionOf kegg.compound:C00080 CHEBI:15378
  species _2ATP in mitochondria = 2780;  // isVersionOf kegg.compound:C00002 CHEBI:15422
  species _2ADP in mitochondria = 320;
  species _2_PGA in default = 14; _2_PGA is "2-PGA";  // isVersionOf kegg.compound:C16658
  species _1_2O2 in mitochondria = 3480; _1_2O2 is "1/2O2";  // isVersionOf kegg.compound:C00007 CHEBI:15379
  species _1_3_BiPGA in default = 0.4; _1_3_BiPGA is "1,3-BiPGA";
  species Creatine_phosphate in mitochondria = 33;
  species Creatine in mit_outer_membrane = 36.7;
  species Creatine_Kinase in IMS = 0;  // isVersionOf ec-code:2.7.3.2 uniprot:P12277

  // Reactions:
  re99: Pyruvate => Alanine; Pyruvate*re99_k1;
    re99_k1 = 1 substance;
  re7: Glutamine_mitochondria => HCO3_NH4; Glutamine_mitochondria*re7_k1;
    re7_k1 = 1 substance;
  re8: Glutamate_mitochondria => HCO3_NH4; Glutamate_mitochondria*re8_k1;
    re8_k1 = 1 substance;
  re14: Arginine => Ornithine; Arginine*re14_k1;
    re14_k1 = 1 substance;
  re37: F1_6P -> GA3P; F1_6P*re37_k1;
    re37_k1 = 1 substance;
  re11: Citrulline + ATP_mitochondria => Citrullyl_AMP_intermediate + ADP_mitochondria; Citrulline*ATP_mitochondria*re11_k1;
    re11_k1 = 1 substance;
  re12: Citrullyl_AMP_intermediate + Aspartate + ATP_mitochondria => Arginosuccinate + AMP + PPi_mitochondria; Citrullyl_AMP_intermediate*Aspartate*ATP_mitochondria*re12_k1;
    re12_k1 = 1 substance;
  re81: Glyceraldehyde => Glycerol3P; Glyceraldehyde*re81_k1;
    re81_k1 = 1 substance;
  re85: Lactate + NADH_default => Glucose + NAD_default; Lactate*NADH_default*re85_k1;
    re85_k1 = 1 substance;
  re27: F6P + ATP_default => F1_6P + ADP_default; F6P*ATP_default*re27_k1;
    re27_k1 = 1 substance;
  re36: _3_PGA + ATP_default => _1_3_BiPGA + ADP_default; _3_PGA*ATP_default*re36_k1;
    re36_k1 = 1 substance;
  re40: GA3P + Pi_default + NAD_default => _1_3_BiPGA + NADH_default + H_default; GA3P*Pi_default*NAD_default*re40_k1;
    re40_k1 = 1 substance;
  re38: F1_6P -> DHAP; F1_6P*re38_k1;
    re38_k1 = 1 substance;
  re49: UDP_Glucose => Glycogen_Primer; UDP_Glucose*re49_k1;
    re49_k1 = 1 substance;
  re68: CyC => Cya_a3; CyC*re68_k1;
    re68_k1 = 1 substance;
  re70: _1_2O2 => Cya_a3; _1_2O2*re70_k1;
    re70_k1 = 1 substance;
  re71: H2O_mitochondria => Cya_a3; H2O_mitochondria*re71_k1;
    re71_k1 = 1 substance;
  re76: _2H_mitochondria => Cya_a3; _2H_mitochondria*re76_k1;
    re76_k1 = 1 substance;
  re63: FeS_mitochondria => _2e; FeS_mitochondria*re63_k1;
    re63_k1 = 1 substance;
  re75: _2H_mitochondria => _2e; _2H_mitochondria*re75_k1;
    re75_k1 = 1 substance;
  re67: CyC2 => CyC; CyC2*re67_k1;
    re67_k1 = 1 substance;
  re65: QH2 => CyC2; QH2*re65_k1;
    re65_k1 = 1 substance;
  re61: QH2 => Cyb; QH2*re61_k1;
    re61_k1 = 1 substance;
  re69: _2H_mitochondria => Q; _2H_mitochondria*re69_k1;
    re69_k1 = 1 substance;
  re59: FeS_mit_inner_membrane + FADH2 => Q + FAD; FeS_mit_inner_membrane*FADH2*re59_k1;
    re59_k1 = 1 substance;
  re77: s381 => FMN; s381*re77_k1;
    re77_k1 = 1 substance;
  re82: Glycerol3P + FA => Triglyceride; Glycerol3P*FA*re82_k1;
    re82_k1 = 1 substance;
  re86: Pyruvate => Lactate; Pyruvate*re86_k1;
    re86_k1 = 1 substance;
  re90: Lactose => Galactose + Glucose; Lactose*re90_k1;
    re90_k1 = 1 substance;
  re93: HMGCoA => Acetoacetate + A_CoA; HMGCoA*re93_k1;
    re93_k1 = 1 substance;
  re1: Glutamine_default => Glutamine_mitochondria; Glutamine_default*re1_k2;
    re1_k1 = 1 substance; re1_k2 = 1 substance;
  re10: Citrulline => Citrulline; Citrulline*re10_k1;
    re10_k1 = 1 substance;
  re9: Ornithine + Carbamoyl_phosphate => Citrulline + Pi_mitochondria; Ornithine*Carbamoyl_phosphate*re9_k1;
    re9_k1 = 1 substance;
  re24: Arginosuccinate => Arginine + Fumarate; Arginosuccinate*re24_k1;
    re24_k1 = 1 substance;
  re13: Arginine + H2O_mitochondria => Arginine + UREA; Arginine*H2O_mitochondria*re13_k1;
    re13_k1 = 1 substance;
  re150: C22_Ketoacyl_CoA => A_CoA; C22_Ketoacyl_CoA*re150_k1;
    re150_k1 = 1 substance;
  re151: C20_Ketoacyl_CoA => A_CoA; C20_Ketoacyl_CoA*re151_k1;
    re151_k1 = 1 substance;
  re152: C6_Ketoacyl_CoA => A_CoA; C6_Ketoacyl_CoA*re152_k1;
    re152_k1 = 1 substance;
  re153: C18_Ketoacyl_CoA => A_CoA; C18_Ketoacyl_CoA*re153_k1;
    re153_k1 = 1 substance;
  re154: C8_Ketoacyl_CoA => A_CoA; C8_Ketoacyl_CoA*re154_k1;
    re154_k1 = 1 substance;
  re155: C10_Ketoacyl_CoA => A_CoA; C10_Ketoacyl_CoA*re155_k1;
    re155_k1 = 1 substance;
  re156: C16_Ketoacyl_CoA => A_CoA; C16_Ketoacyl_CoA*re156_k1;
    re156_k1 = 1 substance;
  re157: C14_Ketoacyl_CoA => A_CoA; C14_Ketoacyl_CoA*re157_k1;
    re157_k1 = 1 substance;
  re158: C12_Ketoacyl_CoA => A_CoA; C12_Ketoacyl_CoA*re158_k1;
    re158_k1 = 1 substance;
  re100: FADH2 => FADH2; FADH2*re100_k1;
    re100_k1 = 1 substance;
  re78: FMN => NAD_mitochondria; FMN*re78_k1;
    re78_k1 = 1 substance;
  re104: NAD_mitochondria => NAD_mitochondria; NAD_mitochondria*re104_k1;
    re104_k1 = 1 substance;
  re105: NAD_mitochondria => NAD_mitochondria; NAD_mitochondria*re105_k1;
    re105_k1 = 1 substance;
  re106: NAD_mitochondria => NAD_mitochondria; NAD_mitochondria*re106_k1;
    re106_k1 = 1 substance;
  re108: NAD_mitochondria => NAD_mitochondria; NAD_mitochondria*re108_k1;
    re108_k1 = 1 substance;
  re107: FAD => FAD; FAD*re107_k1;
    re107_k1 = 1 substance;
  re62: Cyb => FeS_mitochondria; Cyb*re62_k1;
    re62_k1 = 1 substance;
  re58: FMN => FeS_mit_inner_membrane; FMN*re58_k1;
    re58_k1 = 1 substance;
  re66: FeS_mit_inner_membrane => FeS_mit_inner_membrane; FeS_mit_inner_membrane*re66_k1;
    re66_k1 = 1 substance;
  re5: Alanine + Alpha_KG_default => Glutamate_default + Alpha_keto_acid; Alanine*Alpha_KG_default*re5_k1;
    re5_k1 = 1 substance;
  re2: Amino_acids + Alpha_keto_acid => Glutamate_default + Alpha_KG_default; Amino_acids*Alpha_keto_acid*re2_k1;
    re2_k1 = 1 substance;
  re101: s351 => s381; s351*re101_k1;
    re101_k1 = 1 substance;
  re102: s351 => s381; s351*re102_k1;
    re102_k1 = 1 substance;
  re103: s351 => s381; s351*re103_k1;
    re103_k1 = 1 substance;
  re109: s351 => s381; s351*re109_k1;
    re109_k1 = 1 substance;
  re60: Q => QH2; Q*re60_k1;
    re60_k1 = 1 substance;
  re64: _2e => QH2; _2e*re64_k1;
    re64_k1 = 1 substance;
  re72: FMN => _2H_IMS; FMN*re72_k1;
    re72_k1 = 1 substance;
  re73: QH2 => _2H_IMS; QH2*re73_k1;
    re73_k1 = 1 substance;
  re74: QH2 => _2H_IMS; QH2*re74_k1;
    re74_k1 = 1 substance;
  re89: Galactose1P + _2NAD => UDP_Glucose + _2NADH + H_default; re89_v1*Galactose1P/(re89_k1 + Galactose1P);  // modifiers: UDP_glucose4epimerase
    re89_v1 = 1 substance; re89_k1 = 0.069 substance;
  re25: Glucose + ATP_default => G6P + ADP_default; re25_v1*Glucose/(re25_k1 + Glucose);  // modifiers: Hexokinase
    re25_v1 = 1 substance; re25_k1 = 0.048 substance;
  re4: Glutamine_mitochondria => Glutamate_mitochondria; re4_v1*Glutamine_mitochondria/(re4_k1 + Glutamine_mitochondria);  // modifiers: Glutaminase
    re4_v1 = 1 substance; re4_k1 = 0.04 substance;
  re3: Glutamate_default + OAA => Glutamate_mitochondria + Aspartate; Glutamate_default*OAA*re3_k1;  // modifiers: Aspartate_aminotransferase
    re3_k1 = 1 substance;
  re20: Succinate + FAD -> Fumarate + FADH2; re20_v1*Succinate/(re20_k1 + Succinate);  // modifiers: Succinate_dehydrogenase
    re20_v1 = 1 substance; re20_k1 = 875 substance;
  re21: Fumarate + H2O_mitochondria -> Malate; re21_v1*Fumarate/(re21_k1 + Fumarate);  // modifiers: Fumarase
    re21_v1 = 1 substance; re21_k1 = 0.013 substance;
  re22: Malate + NAD_mitochondria -> OAA + s351 + H_mitochondria; re22_v1*Malate/(re22_k1 + Malate);  // modifiers: Malate_dehydrogenase
    re22_v1 = 1 substance; re22_k1 = 0.00038 substance;
  re33: F1_6P + H2O_default => F6P + Pi_default; re33_v1*F1_6P/(re33_k1 + F1_6P);  // modifiers: F1_6BISPHOSPHATASE
    re33_v1 = 1 substance; re33_k1 = 1.3 substance;
  re39: GA3P -> DHAP; re39_v1*GA3P/(re39_k1 + GA3P);  // modifiers: PHOSPHO_TRIOSE_ISOMERASE
    re39_v1 = 1 substance; re39_k1 = 13.6 substance;
  re6: HCO3_NH4 + _2ATP => Carbamoyl_phosphate + _2ADP; re6_v1*HCO3_NH4/(re6_k1 + HCO3_NH4);  // modifiers: Carbamoyl_phosphate_synthetase_I
    re6_v1 = 1 substance; re6_k1 = 13 substance;
  re29: _3_PGA -> _2_PGA; re29_v1*_3_PGA/(re29_k1 + _3_PGA);  // modifiers: PGA_MUTASE
    re29_v1 = 1 substance; re29_k1 = 0.1 substance;
  re31: PEP + ADP_default => Pyruvate + ATP_default; re31_v1*PEP/(re31_k1 + PEP);  // modifiers: PYRUVATE_KINASE
    re31_v1 = 1 substance; re31_k1 = 5.8 substance;
  re15: A_CoA + CO2_mitochondria + OAA + H2O_mitochondria => Citrate + CoA_SH_mitochondria; re15_v1*A_CoA/(re15_k1 + A_CoA);  // modifiers: Citrate_Synthase
    re15_v1 = 1 substance; re15_k1 = 0.11 substance;
  re23: Isocitrate + NAD_mitochondria => Alpha_KG_mitochondria + CO2_mitochondria + s351 + H_mitochondria; re23_v1*Isocitrate/(re23_k1 + Isocitrate);  // modifiers: Isocitrate_dehydrogenase
    re23_v1 = 1 substance; re23_k1 = 73 substance;
  re18: Alpha_KG_mitochondria + CoA_SH_mitochondria + NAD_mitochondria => S_CoA + CO2_mitochondria + s351 + H_mitochondria; re18_v1*Alpha_KG_mitochondria/(re18_k1 + Alpha_KG_mitochondria);  // modifiers: Alpha_KG_dehydrgenase_complex
    re18_v1 = 1 substance; re18_k1 = 490 substance;
  re19: S_CoA + GDP_mitochondria -> Succinate + ATP_mitochondria + CoA_SH_mitochondria; re19_v1*S_CoA/(re19_k1 + S_CoA);  // modifiers: S_CoA_synthase
    re19_v1 = 1 substance; re19_k1 = 0.09 substance;
  re32: G6P + H20 => Glucose + Pi_default; re32_v1*G6P/(re32_k1 + G6P);  // modifiers: G_6_P_Phosphatase
    re32_v1 = 1 substance; re32_k1 = 2 substance;
  re26: G6P -> F6P; re26_v1*G6P/(re26_k1 + G6P);  // modifiers: Phosphohexo_isomerase
    re26_v1 = 1 substance; re26_k1 = 0.000213 substance;
  re41: _1_3_BiPGA + NADH_default + H_default => GA3P + Pi_default + NAD_default; re41_v1*_1_3_BiPGA/(re41_k1 + _1_3_BiPGA);  // modifiers: G3P_DEHYDROGENASE
    re41_v1 = 1 substance; re41_k1 = 33 substance;
  re28: _1_3_BiPGA + ADP_default => _3_PGA + ATP_default; re28_v1*_1_3_BiPGA/(re28_k1 + _1_3_BiPGA);  // modifiers: PGA_KINASE, Mg2_default
    re28_v1 = 1 substance; re28_k1 = 300 substance;
  re30: _2_PGA => PEP; re30_v1*_2_PGA/(re30_k1 + _2_PGA);  // modifiers: ENOLASE
    re30_v1 = 1 substance; re30_k1 = 300 substance;
  re35: OXALOACETATE + GDP_default => PEP + GTP; re35_v1*OXALOACETATE/(re35_k1 + OXALOACETATE);  // modifiers: PEP_CARBOXYKINASE
    re35_v1 = 1 substance; re35_k1 = 791 substance;
  re34: Pyruvate + ATP_default => OXALOACETATE + ADP_default; re34_v1*Pyruvate/(re34_k1 + Pyruvate);  // modifiers: PYRUVATE_CARBOXYLASE
    re34_v1 = 1 substance; re34_k1 = 0.11 substance;
  re42: Pyruvate + TPP + Co_Ash + NAD_mitochondria + FAD + LIPOATE => A_CoA + s351 + H_mitochondria; re42_v1*Pyruvate/(re42_k1 + Pyruvate);  // modifiers: PYRUVATE_DEHYDROGENASE, Mg2_mitochondria
    re42_v1 = 1 substance; re42_k1 = 40 substance;
  re164: C22car_ims_IMS => C22car_ims_mitochondria; C22car_ims_IMS*re164_k1;  // modifiers: CAC
    re164_k1 = 1 substance;
  re168: C14car_ims_IMS => C14car_ims_mitochondria; C14car_ims_IMS*re168_k1;  // modifiers: CAC
    re168_k1 = 1 substance;
  re167: C16car_ims_IMS => C16car_ims_mitochondria; C16car_ims_IMS*re167_k1;  // modifiers: CAC
    re167_k1 = 1 substance;
  re166: C18car_ims_IMS => C18car_ims_mitochondria; C18car_ims_IMS*re166_k1;  // modifiers: CAC
    re166_k1 = 1 substance;
  re165: C20car_ims_IMS => C20car_ims_mitochondria; C20car_ims_IMS*re165_k1;  // modifiers: CAC
    re165_k1 = 1 substance;
  re159: C22_AcylCoA_cyt + Carnitine_cyt => C22car_ims_IMS + CoA_SH_default; C22_AcylCoA_cyt*Carnitine_cyt*re159_k1;  // modifiers: Creatine
    re159_k1 = 1 substance;
  re160: C20_AcylCoA_cyt + Carnitine_cyt => C20car_ims_IMS + CoA_SH_default; C20_AcylCoA_cyt*Carnitine_cyt*re160_k1;  // modifiers: Creatine
    re160_k1 = 1 substance;
  re161: C18_AcylCoA_cyt + Carnitine_cyt => C18car_ims_IMS + CoA_SH_default; C18_AcylCoA_cyt*Carnitine_cyt*re161_k1;  // modifiers: Creatine
    re161_k1 = 1 substance;
  re162: C16_AcylCoA_cyt + Carnitine_cyt => C16car_ims_IMS + CoA_SH_default; C16_AcylCoA_cyt*Carnitine_cyt*re162_k1;  // modifiers: Creatine
    re162_k1 = 1 substance;
  re163: C14_AcylCoA_cyt + Carnitine_cyt => C14car_ims_IMS + CoA_SH_default; C14_AcylCoA_cyt*Carnitine_cyt*re163_k1;  // modifiers: Creatine
    re163_k1 = 1 substance;
  re169: C22car_ims_mitochondria => C22Acyl_CoA + car_mat; C22car_ims_mitochondria*re169_k1;  // modifiers: Creatine_phosphate
    re169_k1 = 1 substance;
  re170: C20car_ims_mitochondria => C20Acyl_CoA + car_mat; C20car_ims_mitochondria*re170_k1;  // modifiers: Creatine_phosphate
    re170_k1 = 1 substance;
  re171: C18car_ims_mitochondria => C18Acyl_CoA + car_mat; C18car_ims_mitochondria*re171_k1;  // modifiers: Creatine_phosphate
    re171_k1 = 1 substance;
  re172: C16car_ims_mitochondria => C16Acyl_CoA + car_mat; C16car_ims_mitochondria*re172_k1;  // modifiers: Creatine_phosphate
    re172_k1 = 1 substance;
  re173: C14car_ims_mitochondria => C14Acyl_CoA + car_mat; C14car_ims_mitochondria*re173_k1;  // modifiers: Creatine_phosphate
    re173_k1 = 1 substance;
  re43: G6P + NADP => _6PGDL + NADPH; re43_v1*G6P/(re43_k1 + G6P);  // modifiers: G6PDehydrogenase, Mg2_default
    re43_v1 = 1 substance; re43_k1 = 0.04 substance;
  re44: _6PGDL + H2O_default => _6PGluconate; re44_v1*_6PGDL/(re44_k1 + _6PGDL);  // modifiers: Lactonase, Mg2_default
    re44_v1 = 1 substance; re44_k1 = 18.2 substance;
  re45: _6PGluconate + NADP => D_Ribulose5P + NAPDH + H_default + CO2_default; re45_v1*_6PGluconate/(re45_k1 + _6PGluconate);  // modifiers: _6PGluconate_dehydrogenase
    re45_v1 = 1 substance; re45_k1 = 0.157 substance;
  re46: D_Ribulose5P -> Ribose5P; re46_v1*D_Ribulose5P/(re46_k1 + D_Ribulose5P);  // modifiers: Phosphopentose_isomerase
    re46_v1 = 1 substance; re46_k1 = 13.6 substance;
  re47: Ribose5P -> Xylulose5P; re47_v1*Ribose5P/(re47_k1 + Ribose5P);  // modifiers: Epimerase
    re47_v1 = 1 substance; re47_k1 = 140 substance;
  re48: G1P + UDP => UDP_Glucose + PPi_default; re48_v1*G1P/(re48_k1 + G1P);  // modifiers: UDP_Glucose_Phosphorylase
    re48_v1 = 1 substance; re48_k1 = 0.066 substance;
  re53: GA3P + Sedoheptulase7P => F6P + Erythrose4P; re53_v1*GA3P/(re53_k1 + GA3P);  // modifiers: Transaldolase
    re53_v1 = 1 substance; re53_k1 = 0.13 substance;
  re54: G6P => G1P; re54_v1*G6P/(re54_k1 + G6P);  // modifiers: Phosphogluco_mutase
    re54_v1 = 1 substance; re54_k1 = 0.045 substance;
  re55: Glycogen => G1P + Limit_Dextrin; re55_v1*Glycogen/(re55_k1 + Glycogen);  // modifiers: Glycogen_phosphorylase
    re55_v1 = 1 substance; re55_k1 = 0.1 substance;
  re56: Limit_Dextrin => Unbranched_alpha_1_4_polymer + Glucose; re56_v1*Limit_Dextrin/(re56_k1 + Limit_Dextrin);  // modifiers: Alpha1_6_Glycosidase
    re56_v1 = 1 substance; re56_k1 = 0.08 substance;
  re57: Unbranched_alpha_1_4_polymer + ATP_default => G1P + ADP_default; re57_v1*Unbranched_alpha_1_4_polymer/(re57_k1 + Unbranched_alpha_1_4_polymer);  // modifiers: Glygogen_Phosphorylase
    re57_v1 = 1 substance; re57_k1 = 0.1 substance;
  re80: Sucrose + H2O_default => Glucose + Fructose; re80_v1*Sucrose/(re80_k1 + Sucrose);  // modifiers: Sucrase
    re80_v1 = 1 substance; re80_k1 = 10 substance;
  re79: Fructose + ATP_default => F1P + ADP_default; re79_v1*Fructose/(re79_k1 + Fructose);  // modifiers: Fructokinase
    re79_v1 = 1 substance; re79_k1 = 0.58 substance;
  re83: F1P => DHAP + Glyceraldehyde; re83_v1*F1P/(re83_k1 + F1P);  // modifiers: Aldolase
    re83_v1 = 1 substance; re83_k1 = 1.7 substance;
  re84: Glyceraldehyde + ATP_default => GA3P + ADP_default; re84_v1*Glyceraldehyde/(re84_k1 + Glyceraldehyde);  // modifiers: Triokinase
    re84_v1 = 1 substance; re84_k1 = 0.31 substance;
  re87: Trehalose + H2O_default => Glucose; re87_v1*Trehalose/(re87_k1 + Trehalose);  // modifiers: Trehalase
    re87_v1 = 1 substance; re87_k1 = 1.37 substance;
  re88: Galactose + ATP_default => Galactose1P + ADP_default; re88_v1*Galactose/(re88_k1 + Galactose);  // modifiers: Galactokinase, Mg2_default
    re88_v1 = 1 substance; re88_k1 = 970 substance;
  re91: UDP_Glucose => G1P; re91_v1*UDP_Glucose/(re91_k1 + UDP_Glucose);  // modifiers: s308
    re91_v1 = 1 substance; re91_k1 = 0.13 substance;
  re92: AcetoacetylCoA + AcetylCoA + H2O_mitochondria => HMGCoA + CoA_SH_mitochondria; re92_v1*AcetoacetylCoA/(re92_k1 + AcetoacetylCoA);  // modifiers: HMG_CoA_Synthase
    re92_v1 = 1 substance; re92_k1 = 294 substance;
  re94: Acetoacetate => Acetone + CO2_mitochondria; re94_v1*Acetoacetate/(re94_k1 + Acetoacetate);  // modifiers: Acetoacetate_Decarboxylase
    re94_v1 = 1 substance; re94_k1 = 1.28 substance;
  re95: Acetoacetate + s351 + H_mitochondria -> D_Beta_Hydroxybutyrate + NAD_mitochondria; re95_v1*Acetoacetate/(re95_k1 + Acetoacetate);  // modifiers: s330
    re95_v1 = 1 substance; re95_k1 = 12.6 substance;
  re98: Acetoacetate + S_CoA => AcetoacetylCoA + Succinate; re98_v1*Acetoacetate/(re98_k1 + Acetoacetate);  // modifiers: Beta_KetoacylCoA_dehydrogenase
    re98_v1 = 1 substance; re98_k1 = 18.7 substance;
  re50: Glycogen_Primer => Glycogen; re50_v1*Glycogen_Primer/(re50_k1 + Glycogen_Primer);  // modifiers: Glycogen_Synthase, Glycosyl_transferase, Glycosyl_4_6_Transferase
    re50_v1 = 1 substance; re50_k1 = 0.08 substance;
  re52: Xylulose5P + Erythrose4P => F6P + GA3P; re52_v1*Xylulose5P/(re52_k1 + Xylulose5P);  // modifiers: Transketolase
    re52_v1 = 1 substance; re52_k1 = 0.19 substance;
  re51: Xylulose5P + Ribose5P => GA3P + Sedoheptulase7P; re51_v1*Xylulose5P/(re51_k1 + Xylulose5P);  // modifiers: Transketolase
    re51_v1 = 1 substance; re51_k1 = 0.19 substance;
  re16: Citrate -> cis_Aconitate + H2O_mitochondria; re16_v1*Citrate/(re16_k1 + Citrate);  // modifiers: Aconitase
    re16_v1 = 1 substance; re16_k1 = 2900 substance;
  re17: cis_Aconitate + H2O_mitochondria -> Isocitrate; re17_v1*cis_Aconitate/(re17_k1 + cis_Aconitate);  // modifiers: Aconitase
    re17_v1 = 1 substance; re17_k1 = 2900 substance;
  re113: C22_Ketoacyl_CoA + CoA_SH_mitochondria => C20Acyl_CoA; re113_v1*C22_Ketoacyl_CoA/(re113_k1 + C22_Ketoacyl_CoA);  // modifiers: Thiolase
    re113_v1 = 1 substance; re113_k1 = 16 substance;
  re116: C20_Ketoacyl_CoA + CoA_SH_mitochondria => C18Acyl_CoA; re116_v1*C20_Ketoacyl_CoA/(re116_k1 + C20_Ketoacyl_CoA);  // modifiers: Thiolase
    re116_v1 = 1 substance; re116_k1 = 16 substance;
  re120: C18_Ketoacyl_CoA + CoA_SH_mitochondria => C16Acyl_CoA; re120_v1*C18_Ketoacyl_CoA/(re120_k1 + C18_Ketoacyl_CoA);  // modifiers: Thiolase
    re120_v1 = 1 substance; re120_k1 = 16 substance;
  re123: C16_Ketoacyl_CoA + CoA_SH_mitochondria => C14Acyl_CoA; re123_v1*C16_Ketoacyl_CoA/(re123_k1 + C16_Ketoacyl_CoA);  // modifiers: Thiolase
    re123_v1 = 1 substance; re123_k1 = 16 substance;
  re128: C14_Ketoacyl_CoA + CoA_SH_mitochondria => C12Acyl_CoA; re128_v1*C14_Ketoacyl_CoA/(re128_k1 + C14_Ketoacyl_CoA);  // modifiers: Thiolase
    re128_v1 = 1 substance; re128_k1 = 34.5 substance;
  re131: C12_Ketoacyl_CoA + CoA_SH_mitochondria => C10Acyl_CoA; re131_v1*C12_Ketoacyl_CoA/(re131_k1 + C12_Ketoacyl_CoA);  // modifiers: Thiolase
    re131_v1 = 1 substance; re131_k1 = 16 substance;
  re135: C10_Ketoacyl_CoA + CoA_SH_mitochondria => C8Acyl_CoA; re135_v1*C10_Ketoacyl_CoA/(re135_k1 + C10_Ketoacyl_CoA);  // modifiers: Thiolase
    re135_v1 = 1 substance; re135_k1 = 16 substance;
  re138: C8_Ketoacyl_CoA + CoA_SH_mitochondria => C6Acyl_CoA; v2*C8_Ketoacyl_CoA/(re138_k2 + C8_Ketoacyl_CoA);  // modifiers: Thiolase
    re138_v1 = 1 substance; re138_k1 = 16 substance; v2 = 1 substance; re138_k2 = 16 substance;
  re144: C6_Ketoacyl_CoA + CoA_SH_mitochondria => C4Acyl_CoA; re144_v1*C6_Ketoacyl_CoA/(re144_k1 + C6_Ketoacyl_CoA);  // modifiers: Thiolase
    re144_v1 = 1 substance; re144_k1 = 16 substance;
  re97: A_CoA => AcetoacetylCoA + CoA_SH_mitochondria; re97_v1*A_CoA/(re97_k1 + A_CoA);  // modifiers: Thiolase
    re97_v1 = 1 substance; re97_k1 = 16 substance;
  re96: AcetoacetylCoA + CoA_SH_mitochondria => A_CoA; re96_v1*AcetoacetylCoA/(re96_k1 + AcetoacetylCoA);  // modifiers: Thiolase
    re96_v1 = 1 substance; re96_k1 = 100 substance;
  re147: C4_Ketoacyl_CoA + CoA_SH_mitochondria => A_CoA; re147_v1*C4_Ketoacyl_CoA/(re147_k1 + C4_Ketoacyl_CoA);  // modifiers: Thiolase
    re147_v1 = 1 substance; re147_k1 = 16 substance;
  re110: C22Acyl_CoA + FAD => C22_2_trans_enoyl_CoA + FADH2; re110_v1*C22Acyl_CoA/(re110_k1 + C22Acyl_CoA);  // modifiers: Acyl_CoA_dehydrogenase
    re110_v1 = 1 substance; re110_k1 = 3 substance;
  re117: C20Acyl_CoA + FAD => C20_2_trans_enoyl_CoA + FADH2; re117_v1*C20Acyl_CoA/(re117_k1 + C20Acyl_CoA);  // modifiers: Acyl_CoA_dehydrogenase
    re117_v1 = 1 substance; re117_k1 = 3 substance;
  re125: C18Acyl_CoA + FAD => C18_2_trans_enoyl_CoA + FADH2; re125_v1*C18Acyl_CoA/(re125_k1 + C18Acyl_CoA);  // modifiers: Acyl_CoA_dehydrogenase
    re125_v1 = 1 substance; re125_k1 = 3 substance;
  re124: C16Acyl_CoA + FAD => C16_2_trans_enoyl_CoA + FADH2; re124_v1*C16Acyl_CoA/(re124_k1 + C16Acyl_CoA);  // modifiers: Acyl_CoA_dehydrogenase
    re124_v1 = 1 substance; re124_k1 = 3 substance;
  re141: C14Acyl_CoA + FAD => C14_2_trans_enoyl_CoA + FADH2; re141_v1*C14Acyl_CoA/(re141_k1 + C14Acyl_CoA);  // modifiers: Acyl_CoA_dehydrogenase
    re141_v1 = 1 substance; re141_k1 = 3 substance;
  re132: C12Acyl_CoA + FAD => C12_2_trans_enoyl_CoA + FADH2; re132_v1*C12Acyl_CoA/(re132_k1 + C12Acyl_CoA);  // modifiers: Acyl_CoA_dehydrogenase
    re132_v1 = 1 substance; re132_k1 = 3 substance;
  re140: C10Acyl_CoA + FAD => C10_2_trans_enoyl_CoA + FADH2; re140_v1*C10Acyl_CoA/(re140_k1 + C10Acyl_CoA);  // modifiers: Acyl_CoA_dehydrogenase
    re140_v1 = 1 substance; re140_k1 = 3 substance;
  re139: C8Acyl_CoA + FAD => C8_2_trans_enoyl_CoA + FADH2; re139_v1*C8Acyl_CoA/(re139_k1 + C8Acyl_CoA);  // modifiers: Acyl_CoA_dehydrogenase
    re139_v1 = 1 substance; re139_k1 = 3 substance;
  re149: C6Acyl_CoA + FAD => C6_2_trans_enoyl_CoA + FADH2; re149_v1*C6Acyl_CoA/(re149_k1 + C6Acyl_CoA);  // modifiers: Acyl_CoA_dehydrogenase
    re149_v1 = 1 substance; re149_k1 = 3 substance;
  re148: C4Acyl_CoA + FAD => C4_2_trans_enoyl_CoA + FADH2; re148_v1*C4Acyl_CoA/(re148_k1 + C4Acyl_CoA);  // modifiers: Acyl_CoA_dehydrogenase
    re148_v1 = 1 substance; re148_k1 = 3 substance;
  re111: C22_2_trans_enoyl_CoA + H2O_mitochondria => C22_L_3_hydroxyacyl_CoA; re111_v1*C22_2_trans_enoyl_CoA/(re111_k1 + C22_2_trans_enoyl_CoA);  // modifiers: Enoyl_CoA_hydratase
    re111_v1 = 1 substance; re111_k1 = 100 substance;
  re114: C20_2_trans_enoyl_CoA + H2O_mitochondria => C20_L_3_hydroxyacyl_CoA; re114_v1*C20_2_trans_enoyl_CoA/(re114_k1 + C20_2_trans_enoyl_CoA);  // modifiers: Enoyl_CoA_hydratase
    re114_v1 = 1 substance; re114_k1 = 100 substance;
  re118: C18_2_trans_enoyl_CoA + H2O_mitochondria => C18_L_3_hydroxyacyl_CoA; re118_v1*C18_2_trans_enoyl_CoA/(re118_k1 + C18_2_trans_enoyl_CoA);  // modifiers: Enoyl_CoA_hydratase
    re118_v1 = 1 substance; re118_k1 = 100 substance;
  re121: C16_2_trans_enoyl_CoA + H2O_mitochondria => C16_L_3_hydroxyacyl_CoA; re121_v1*C16_2_trans_enoyl_CoA/(re121_k1 + C16_2_trans_enoyl_CoA);  // modifiers: Enoyl_CoA_hydratase
    re121_v1 = 1 substance; re121_k1 = 100 substance;
  re126: C14_2_trans_enoyl_CoA + H2O_mitochondria => C14_L_3_hydroxyacyl_CoA; re126_v1*C14_2_trans_enoyl_CoA/(re126_k1 + C14_2_trans_enoyl_CoA);  // modifiers: Enoyl_CoA_hydratase
    re126_v1 = 1 substance; re126_k1 = 100 substance;
  re129: C12_2_trans_enoyl_CoA + H2O_mitochondria => C12_L_3_hydroxyacyl_CoA; re129_v1*C12_2_trans_enoyl_CoA/(re129_k1 + C12_2_trans_enoyl_CoA);  // modifiers: Enoyl_CoA_hydratase
    re129_v1 = 1 substance; re129_k1 = 100 substance;
  re133: C10_2_trans_enoyl_CoA + H2O_mitochondria => C10_L_3_hydroxyacyl_CoA; re133_v1*C10_2_trans_enoyl_CoA/(re133_k1 + C10_2_trans_enoyl_CoA);  // modifiers: Enoyl_CoA_hydratase
    re133_v1 = 1 substance; re133_k1 = 100 substance;
  re136: C8_2_trans_enoyl_CoA + H2O_mitochondria => C8_L_3_hydroxyacyl_CoA; re136_v1*C8_2_trans_enoyl_CoA/(re136_k1 + C8_2_trans_enoyl_CoA);  // modifiers: Enoyl_CoA_hydratase
    re136_v1 = 1 substance; re136_k1 = 100 substance;
  re142: C6_2_trans_enoyl_CoA + H2O_mitochondria => C6_L_3_hydroxyacyl_CoA; re142_v1*C6_2_trans_enoyl_CoA/(re142_k1 + C6_2_trans_enoyl_CoA);  // modifiers: Enoyl_CoA_hydratase
    re142_v1 = 1 substance; re142_k1 = 100 substance;
  re145: C4_2_trans_enoyl_CoA + H2O_mitochondria => C4_L_3_hydroxyacyl_CoA; re145_v1*C4_2_trans_enoyl_CoA/(re145_k1 + C4_2_trans_enoyl_CoA);  // modifiers: Enoyl_CoA_hydratase
    re145_v1 = 1 substance; re145_k1 = 100 substance;
  re112: C22_L_3_hydroxyacyl_CoA + NAD_mitochondria => C22_Ketoacyl_CoA + s351 + H_mitochondria; re112_v1*C22_L_3_hydroxyacyl_CoA/(re112_k1 + C22_L_3_hydroxyacyl_CoA);  // modifiers: s366
    re112_v1 = 1 substance; re112_k1 = 34.5 substance;
  re115: C20_L_3_hydroxyacyl_CoA + NAD_mitochondria => C20_Ketoacyl_CoA + s351 + H_mitochondria; re115_v1*C20_L_3_hydroxyacyl_CoA/(re115_k1 + C20_L_3_hydroxyacyl_CoA);  // modifiers: s366
    re115_v1 = 1 substance; re115_k1 = 34.5 substance;
  re119: C18_L_3_hydroxyacyl_CoA + NAD_mitochondria => C18_Ketoacyl_CoA + s351 + H_mitochondria; re119_v1*C18_L_3_hydroxyacyl_CoA/(re119_k1 + C18_L_3_hydroxyacyl_CoA);  // modifiers: s366
    re119_v1 = 1 substance; re119_k1 = 34.5 substance;
  re122: C16_L_3_hydroxyacyl_CoA + NAD_mitochondria => C16_Ketoacyl_CoA + s351 + H_mitochondria; re122_v1*C16_L_3_hydroxyacyl_CoA/(re122_k1 + C16_L_3_hydroxyacyl_CoA);  // modifiers: s366
    re122_v1 = 1 substance; re122_k1 = 34.5 substance;
  re127: C14_L_3_hydroxyacyl_CoA + NAD_mitochondria => C14_Ketoacyl_CoA + s351 + H_mitochondria; re127_v1*C14_L_3_hydroxyacyl_CoA/(re127_k1 + C14_L_3_hydroxyacyl_CoA);  // modifiers: s366
    re127_v1 = 1 substance; re127_k1 = 34.5 substance;
  re130: C12_L_3_hydroxyacyl_CoA + NAD_mitochondria => C12_Ketoacyl_CoA + s351 + H_mitochondria; re130_v1*C12_L_3_hydroxyacyl_CoA/(re130_k1 + C12_L_3_hydroxyacyl_CoA);  // modifiers: s366
    re130_v1 = 1 substance; re130_k1 = 34.5 substance;
  re134: C10_L_3_hydroxyacyl_CoA + NAD_mitochondria => C10_Ketoacyl_CoA + s351 + H_mitochondria; re134_v1*C10_L_3_hydroxyacyl_CoA/(re134_k1 + C10_L_3_hydroxyacyl_CoA);  // modifiers: s366
    re134_v1 = 1 substance; re134_k1 = 34.5 substance;
  re137: C8_L_3_hydroxyacyl_CoA + NAD_mitochondria => C8_Ketoacyl_CoA + s351 + H_mitochondria; re137_v1*C8_L_3_hydroxyacyl_CoA/(re137_k1 + C8_L_3_hydroxyacyl_CoA);  // modifiers: s366
    re137_v1 = 1 substance; re137_k1 = 34.5 substance;
  re143: C6_L_3_hydroxyacyl_CoA + NAD_mitochondria => C6_Ketoacyl_CoA + s351 + H_mitochondria; re143_v1*C6_L_3_hydroxyacyl_CoA/(re143_k1 + C6_L_3_hydroxyacyl_CoA);  // modifiers: s366
    re143_v1 = 1 substance; re143_k1 = 34.5 substance;
  re146: C4_L_3_hydroxyacyl_CoA + NAD_mitochondria => C4_Ketoacyl_CoA + s351 + H_mitochondria; re146_v1*C4_L_3_hydroxyacyl_CoA/(re146_k1 + C4_L_3_hydroxyacyl_CoA);  // modifiers: s366
    re146_v1 = 1 substance; re146_k1 = 34.5 substance;
  re175: Creatine_phosphate + ATP_mitochondria => Creatine; re175_v1*Creatine_phosphate/(re175_k1 + Creatine_phosphate);  // modifiers: Creatine_Kinase
    re175_v1 = 1 substance; re175_k1 = 1.16 substance;
  re182: Creatine => Creatine_phosphate + AMP; re182_v1*Creatine/(re182_k1 + Creatine);
    re182_v1 = 1 substance; re182_k1 = 9.6 substance;

  // Unit definitions:
  unit substance = mole;
  unit volume = litre;
  unit area = metre^2;
  unit length = metre;
  unit time = second;
end
