// SBML level 2 version 4
// This model was downloaded from BioModels Database
// http://www.ebi.ac.uk/biomodels/

model MODEL1509230011()
  // Sluka2016 - Acetaminophen metabolism
  // Liver metabolism of Acetaminophen: Acetaminophen (APAP) is metabolized in the liver in both Phase I and Phase II reactions. Phase II reactions convert APAP to APAP-glucuronide and APAP-sulfate. Phase I reactions involve Cytochrome P450 mediated (mostly Cyp450-2E1 and -1A2) conversion of APAP to N-acetyle-p-quinoneimine (NAPQI), which goes on to react with cellular nucleophiles such as glutathione (GSH). At high doses of APAP significant GSH depletion in hepatocyte occurs resulting in cell necrosis and and in extreme cases death.
  // This model is described in the article:
  // A Liver-Centric Multiscale Modeling Framework for Xenobiotics.
  // Sluka JP, Fu X, Swat M, Belmonte JM, Cosmanescu A, Clendenon SG, Wambaugh JF, Glazier JA.
  // PLoS ONE 2016; 11(9): e0162428
  // Abstract:
  // We describe a multi-scale, liver-centric in silico modeling framework for acetaminophen pharmacology and metabolism. We focus on a computational model to characterize whole body uptake and clearance, liver transport and phase I and phase II metabolism. We do this by incorporating sub-models that span three scales; Physiologically Based Pharmacokinetic (PBPK) modeling of acetaminophen uptake and distribution at the whole body level, cell and blood flow modeling at the tissue/organ level and metabolism at the sub-cellular level. We have used standard modeling modalities at each of the three scales. In particular, we have used the Systems Biology Markup Language (SBML) to create both the whole-body and sub-cellular scales. Our modeling approach allows us to run the individual sub-models separately and allows us to easily exchange models at a particular scale without the need to extensively rework the sub-models at other scales. In addition, the use of SBML greatly facilitates the inclusion of biological annotations directly in the model code. The model was calibrated using human in vivo data for acetaminophen and its sulfate and glucuronate metabolites. We then carried out extensive parameter sensitivity studies including the pairwise interaction of parameters. We also simulated population variation of exposure and sensitivity to acetaminophen. Our modeling framework can be extended to the prediction of liver toxicity following acetaminophen overdose, or used as a general purpose pharmacokinetic model for xenobiotics.
  // This model is hosted on BioModels Database and identified by: BIOMD0000000624.
  // To cite BioModels Database, please use: BioModels Database: An enhanced, curated and annotated resource for published quantitative kinetic models.
  // To the extent possible under law, all copyright and related or neighbouring rights to this encoded model have been dedicated to the public domain worldwide. Please refer to CC0 Public Domain Dedication for more information.
  // biomodels.db:MODEL1509230011
  // biomodels.db:BIOMD0000000624
  // isDescribedBy pubmed:27636091
  // hasTaxon taxonomy:9606
  // isVersionOf GO:0042739
  // hasProperty efo:0004228

  // Compartments:
  // A single liver hepatocyte (parenchymal) cell.
  // FMA:68646 Cell
  // FMA:14515 Hepatocyte
  // GO:0005623 Cell
  compartment compartment = 1 litre; compartment is "Hepatocyte";  // FMA:68646; FMA:14515; BTO:0000575

  // Species:
  // Generic precursor to GSH.
  species $X1 in compartment = 0;
  // Acetaminophen (N-acetyl-p-aminophenol APAP).
  // Formula: C8H9NO2
  // Mol. mass: 151.163 g/mol
  // InChIKey: RZVAJINKPMORJF-UHFFFAOYSA-N
  // Also known as: Paracetamol, 4-Acetamidophenol, Tylenol, APAP, Acetaminofen, Panadol, Datril, 4'-Hydroxyacetanilide, Algotropyl
  // CHEBI:46195
  species APAP in compartment = 0.1;  // CHEBI:46195
  // N-Acetyl paraquinone imine (NAPQI)
  // Also known as: N-acetyl-4-benzoquinoneimine, Acetimidoquinone, N-Acetylbenzoquinoneimine, N-Acetyl-P-benzoquinoneimine, N-Acetyl-p-benzoquinone imine, N-acetyl-1,4-benzoquinone imine
  // A CypP450 oxidation product of Acetaminophen.
  // Molecular Formula: C8H7NO2
  // Molecular Weight: 149.14668
  // InChIKey: URNSECGXFRDEDC-UHFFFAOYSA-N
  // CHEBI:29132
  species NAPQI in compartment = 0;  // CHEBI:29132
  // Glutathione (GSH), reduced.
  // gamma-L-Glutamyl-L-Cysteinyl-Glycine.
  // Molecular formula: C10H17N3O6S
  // Molar mass: 307.32 g/mol
  species GSH in compartment = 10;  // CHEBI:16856
  // N-Acetyl paraquinone imine - Glutathione Conjugate (NAPQIGSH)
  // Product of the reaction of NAPQI and glutathion.
  // Also known as:3-(glutathion-S-yl)acetaminophen, AA-Glutathion, AA-Gsh, Acetaminophen glutathion, Glutathione-S-acetaminophen conjugate, 3-Gsh-acetaminophen, 64889-81-2
  // Molecular Formula: C18H24N4O8S
  // Molecular Weight: 456.47016
  // InChIKey: VFNAXGMNFCUWCI-RYUDHWBXSA-N
  // CHEBI:32639
  species NAPQIGSH in compartment = 0;  // CHEBI:32639
  // Acetaminophen glucuronide
  // 4-acetamidophenyl beta-D-glucopyranosiduronic acid
  // Metabolic product of liver metabolism of Acetaminophen (APAP). Typically about 50% of an APAP dose ends up as the glucuronide.
  // Molecular Formula: C14H17NO8
  // Molecular Weight: 327.28668 grams/mol
  // InChIKey: IPROLSVTVHAQLE-BYNIDDHOSA-N
  // CHEBI:32636
  species APAPconj_Glu in compartment = 0;  // CHEBI:32636
  // Acetaminophen sulfate
  // 4-acetamidophenyl beta-D-glucopyranosiduronic acid
  // Metabolic product of liver metabolism of Acetaminophen (APAP). Typically about 25% of an APAP dose ends up as the sulfate.
  // Also known as: Paracetamol Sulfate, N-Acetyl-4-aminophenol sulfate, N-(4-(Sulfooxy)phenyl)acetamide, Acetamide, N-(4-(sulfooxy)phenyl)-
  // Molecular Formula: C8H9NO5S
  // Molecular Weight: 231.22576
  // InChIKey: IGTYILLPRJOVFY-UHFFFAOYSA-N
  // CHEBI:32635
  species APAPconj_Sul in compartment = 0;  // CHEBI:32635

  // Parameters:
  Vmax_2E1_APAP = 2e-5 flux;
  Km_2E1_APAP = 1.29 millimolar;
  // Second order rate constant for the reaction of NAPQI with GSH.
  // Initial value = 0.1/mol/sec
  kNapqiGsh = 0.1 second_order_rate_constant;
  // First order rate constant for formation of GSH from unspecified precursors. Units 1/time.
  kGsh = 0.0001 first_order_rate_constant;
  // Maximum concentration of GSH within the cell.
  GSHmax = 10 millimolar;
  Vmax_PhaseIIEnzGlu_APAP = 0.001 flux;
  Km_PhaseIIEnzGlu_APAP = 1 millimolar;
  Vmax_PhaseIIEnzSul_APAP = 0.000175 flux;
  Km_PhaseIIEnzSul_APAP = 0.2 millimolar;

  // Reactions:
  // J0: APAP -> NAPQI
  // Metabolic conversion of APAP to NAPQI by oxidation via Cyp450's such 1A2 and 2E1.
  // Phase I metabolism.
  // MESH.2013:D050216 Metabolic Detoxication, Phase I
  // isDescribedBy PubMed:19219744 Acetaminophen bioactivation by human cytochrome P450 enzymes and animal microsomes. (2009)
  // isDescribedBy PubMed:6424115 N-acetyl-p-benzoquinone imine: a cytochrome P-450-mediated oxidation product of acetaminophen. (1984)
  // isPartOf GO:0045333 cellular respiration
  // is GO:0044237 cellular metabolic process, biological_process
  // is GO:0071704 organic substance metabolic process
  J0: APAP => NAPQI; Vmax_2E1_APAP*APAP/(Km_2E1_APAP + APAP);  // isDescribedBy pubmed:19219744; GO:0044237; isPartOf GO:0045333; isDescribedBy pubmed:6424115
  // J1: GSH + NAPQI -> NAPQIGSH
  // Reaction of (scavenging of) NAPQI by cellular GSH.
  // is PW:0000373 glutathione conjugation pathway
  J1: GSH + NAPQI => NAPQIGSH; kNapqiGsh*NAPQI*GSH*compartment*compartment;
  // J2: X1 -> GSH
  // Synthesis of GSH, including via reduction of oxidized GSH (GSSG).
  // is GO:0004363 glutathione synthase activity
  J2: $X1 => GSH; kGsh*(GSHmax - GSH)*compartment;  // GO:0004363
  // J3: APAP -> APAPconj_Glu
  // Conjugation of APAP with Glucuronic Acid.
  // Phase II metabolism.
  // is GO:0052697 xenobiotic glucuronidation
  J3: APAP => APAPconj_Glu; Vmax_PhaseIIEnzGlu_APAP*APAP/(Km_PhaseIIEnzGlu_APAP + APAP);  // GO:0052697
  // J4: APAP -> APAPconj_Sul
  // Conjugation of APAP with Sulfate.
  // Phase II metabolism.
  // is GO:0051923 sulfations (phase II metabolism)
  J4: APAP => APAPconj_Sul; Vmax_PhaseIIEnzSul_APAP*APAP/(Km_PhaseIIEnzSul_APAP + APAP);  // GO:0051923

  // Unit definitions:
  unit substance = 1e-3 mole; substance is "millimole";
  unit time = second; time is "second";
  unit first_order_rate_constant = 1 / second;
  unit second_order_rate_constant = 1 / (1e-3 mole * second);
  unit flux = 1e-3 mole / second;
  unit millimolar = 1e-3 mole / litre;
end
