// SBML level 2 version 4
// This model was downloaded from BioModels Database
// http://www.ebi.ac.uk/biomodels/
// dcterms:bibliographicCitation: http://identifiers.org/pubmed/23631506

function ODE_pIme1_1_1__1(Ime1, Rim11, dpime_1, pIme1, pime_1)
  pime_1*Ime1*Rim11 - dpime_1*pIme1;
end
ODE_pIme1_1_1__1 is "ODE pIme1_1_1 [1]";

function ODE_pUme6_1_1__1(Rim11, pUme6, pume_6, uume_6)
  (1 - pUme6)*pume_6*Rim11 - uume_6*pUme6;
end
ODE_pUme6_1_1__1 is "ODE pUme6_1_1 [1]";

function ODE_Ime2_1_1_1__1(Ime2, c_2, c_3, dime_2, pIme1, pUme6, sime_2, sprimeime_2)
  sime_2*pUme6*pIme1 + sprimeime_2*Ime2^5/(c_2^5 + Ime2^5) - dime_2*Ime2/(c_3 + Ime2);
end
ODE_Ime2_1_1_1__1 is "ODE Ime2_1_1_1 [1]";

function ODE_pSok2_1_1__1(Ime1, csok_2, pSok2, psok_2, usok_2)
  csok_2/(csok_2 + Ime1)*(1 - pSok2)*psok_2 - usok_2*pSok2;
end
ODE_pSok2_1_1__1 is "ODE pSok2_1_1 [1]";

function ODE_Ime1_1_1__1(Ime1, Ime2, Rim11, c_1, cime_1, dime_1, dprimeime_1, pSok2, pime_1, sime_1)
  cime_1/(cime_1 + pSok2)*sime_1 - (pime_1*Ime1*Rim11 + dime_1*Ime1 + dprimeime_1*Ime2*(Ime1/(c_1 + Ime1)));
end
ODE_Ime1_1_1__1 is "ODE Ime1_1_1 [1]";

function ODE_Rim11_1_1(Rim11, prim_11, urim_11)
  urim_11*(1 - Rim11) - prim_11*Rim11;
end

model Ray2013___Meiotic_initiation_in_S__cerevisiae()
  // Ray2013 - Meiotic initiation in S. cerevisiae
  // A mathematical representation of early meiotic events, particularly feedback mechanisms at the system level and phosphorylation of signalling molecules for regulating protein activities, is described here
  // This model is described in the article:
  // Dynamic modeling of yeast meiotic initiation.
  // Ray D, Su Y, Ye P.
  // BMC Syst Biol. 2013 May 1;7:37
  // Abstract:
  // BACKGROUND: Meiosis is the sexual reproduction process common to eukaryotes. The diploid yeast Saccharomyces cerevisiae undergoes meiosis in sporulation medium to form four haploid spores. Initiation of the process is tightly controlled by intricate networks of positive and negative feedback loops. Intriguingly, expression of early meiotic proteins occurs within a narrow time window. Further, sporulation efficiency is strikingly different for yeast strains with distinct mutations or genetic backgrounds. To investigate signal transduction pathways that regulate transient protein expression and sporulation efficiency, we develop a mathematical model using ordinary differential equations. The model describes early meiotic events, particularly feedback mechanisms at the system level and phosphorylation of signaling molecules for regulating protein activities.
  // RESULTS: The mathematical model is capable of simulating the orderly and transient dynamics of meiotic proteins including Ime1, the master regulator of meiotic initiation, and Ime2, a kinase encoded by an early gene. The model is validated by quantitative sporulation phenotypes of single-gene knockouts. Thus, we can use the model to make novel predictions on the cooperation between proteins in the signaling pathway. Virtual perturbations on feedback loops suggest that both positive and negative feedback loops are required to terminate expression of early meiotic proteins. Bifurcation analyses on feedback loops indicate that multiple feedback loops are coordinated to modulate sporulation efficiency. In particular, positive auto-regulation of Ime2 produces a bistable system with a normal meiotic state and a more efficient meiotic state.
  // CONCLUSIONS: By systematically scanning through feedback loops in the mathematical model, we demonstrate that, in yeast, the decisions to terminate protein expression and to sporulate at different efficiencies stem from feedback signals toward the master regulator Ime1 and the early meiotic protein Ime2. We argue that the architecture of meiotic initiation pathway generates a robust mechanism that assures a rapid and complete transition into meiosis. This type of systems-level regulation is a commonly used mechanism controlling developmental programs in yeast and other organisms. Our mathematical model uncovers key regulations that can be manipulated to enhance sporulation efficiency, an important first step in the development of new strategies for producing gametes with high quality and quantity.
  // This model is hosted on BioModels Database and identified by: BIOMD0000000626 .
  // To cite BioModels Database, please use: BioModels Database: An enhanced, curated and annotated resource for published quantitative kinetic models .
  // To the extent possible under law, all copyright and related or neighbouring rights to this encoded model have been dedicated to the public domain worldwide. Please refer to CC0 Public Domain Dedication for more information.
  // biomodels.db:MODEL1303060000
  // biomodels.db:BIOMD0000000626
  // isDescribedBy pubmed:23631506
  // isVersionOf GO:0040020 GO:0051321
  // hasTaxon taxonomy:4932
  // isDescribedBy ECO:0000362

  // Compartments:
  compartment V = 1; V is "Cell";  // FMA:68646; isVersionOf GO:0005623

  // Species:
  // Serine/threonine-protein kinase RIM11
  species Rim11 in V = 0;  // isVersionOf uniprot:P38615
  // Phosphorylated Transcriptional regulatory protein UME6
  species pUme6 in V = 0;  // isVersionOf uniprot:P39001
  // phosphorylated Protein SOK2
  species pSok2 in V = 1;  // isVersionOf uniprot:P53438
  // Meiosis-inducing protein 1
  species Ime1 in V = 0;  // isVersionOf uniprot:P21190
  // phosphorylated Meiosis-inducing protein 1
  species pIme1 in V = 0;  // isVersionOf uniprot:P21190
  // Meiosis induction protein kinase IME2/SME1
  species Ime2 in V = 0;  // isVersionOf uniprot:P32581

  // Reactions:
  // Rim11 Dephosphorylation
  rim11_1: -> Rim11; V*ODE_Rim11_1_1(Rim11, prim_11, urim_11); rim11_1 is "Rim11 Dephosphorylation";  // GO:0006470
    prim_11 = 0.01; urim_11 = 0.1;
  // Ume6 Phosphorylation
  pume6_1: -> pUme6; V*ODE_pUme6_1_1__1(Rim11, pUme6, pume_6, uume_6); pume6_1 is "Ume6 Phosphorylation";  // modifiers: Rim11
    pume_6 = 0.3; uume_6 = 0.01;
  // Production of phosphorylated Sok2
  sok2_1: -> pSok2; V*ODE_pSok2_1_1__1(Ime1, csok_2, pSok2, psok_2, usok_2); sok2_1 is "Production of Phosphorylated Sok2";  // modifiers: Ime1
    csok_2 = 0.05; psok_2 = 0.7; usok_2 = 1;
  // Ime1 Protein Production
  ime1_1: => Ime1; V*ODE_Ime1_1_1__1(Ime1, Ime2, Rim11, c_1, cime_1, dime_1, dprimeime_1, pSok2, ime1_1_pime_1, sime_1); ime1_1 is "Ime1 Protein Production";  // modifiers: pSok2, Rim11, Ime2
    c_1 = 0.01; cime_1 = 0.01; dime_1 = 1; dprimeime_1 = 1; ime1_1_pime_1 = 2; sime_1 = 10;
  // Phosphorylation of Ime1
  pime1_1: => pIme1; V*ODE_pIme1_1_1__1(Ime1, Rim11, dpime_1, pIme1, pime1_1_pime_1); pime1_1 is "Phosphorylation of Ime1";  // modifiers: Ime1, Rim11
    dpime_1 = 1; pime1_1_pime_1 = 2;
  // Ime2 Protein Production
  ime2_1: -> Ime2; V*ODE_Ime2_1_1_1__1(Ime2, c_2, c_3, dime_2, pIme1, pUme6, sime_2, sprimeime_2); ime2_1 is "Ime2 Protein Production";  // modifiers: pUme6, pIme1
    c_2 = 1.4; c_3 = 2; dime_2 = 8; sime_2 = 10; sprimeime_2 = 3;

  // Unit definitions:
  unit time = 3600 second;
end
