// SBML level 2 version 4
// This model was downloaded from BioModels Database
// http://www.ebi.ac.uk/biomodels/
// dcterms:bibliographicCitation: http://identifiers.org/doi/10.1039/C6MD00680A

model Haffez2017_RAR_interaction_with_synthetic_analogues()
  // Haffez2017 - RAR interaction with synthetic analogues
  // This model is described in the article:
  // The molecular basis of the interactions between synthetic retinoic acid analogues and the retinoic acid receptors
  // Hesham Haffez, David R. Chisholm, Roy Valentine, Ehmke Pohl, Christopher Redfern and Andrew Whiting
  // MedChemComm
  // Abstract:
  // All-trans-retinoic acid (ATRA) and its synthetic analogues EC23 and EC19 direct cellular differentiation by interacting as ligands for the retinoic acid receptor (RARÎ±, Î² and Î³) family of nuclear receptor proteins. To date, a number of crystal structures of natural and synthetic ligands complexed to their target proteins have been solved, providing molecular level snap-shots of ligand binding. However, a deeper understanding of receptor and ligand flexibility and conformational freedom is required to develop stable and effective ATRA analogues for clinical use. Therefore, we have used molecular modelling techniques to define RAR interactions with ATRA and two synthetic analogues, EC19 and EC23, and compared their predicted biochemical activities to experimental measurements of relative ligand affinity and recruitment of coactivator proteins. A comprehensive molecular docking approach that explored the conformational space of the ligands indicated that ATRA is able to bind the three RAR proteins in a number of conformations with one extended structure being favoured. In contrast the biologically-distinct isomer, 9-cis-retinoic acid (9CRA), showed significantly less conformational flexibility in the RAR binding pockets. These findings were used to inform docking studies of the synthetic retinoids EC23 and EC19, and their respective methyl esters. EC23 was found to be an excellent mimic for ATRA, and occupied similar binding modes to ATRA in all three target RAR proteins. In comparison, EC19 exhibited an alternative binding mode which reduces the strength of key polar interactions in RARÎ±/Î³ but is well-suited to the larger RARÎ² binding pocket. In contrast, docking of the corresponding esters revealed the loss of key polar interactions which may explain the much reduced biological activity. Our computational results were complemented using an in vitro binding assay based on FRET measurements, which showed that EC23 was a strongly binding, pan-agonist of the RARs, while EC19 exhibited specificity for RARÎ², as predicted by the docking studies. These findings can account for the distinct behaviour of EC23 and EC19 in cellular differentiation assays, and additionally, the methods described herein can be further applied to the understanding of the molecular basis for the selectivity of different retinoids to RARÎ±, Î² and Î³.
  // This model is hosted on BioModels Database and identified by: BIOMD0000000629.
  // To cite BioModels Database, please use: BioModels Database: An enhanced, curated and annotated resource for published quantitative kinetic models.
  // To the extent possible under law, all copyright and related or neighbouring rights to this encoded model have been dedicated to the public domain worldwide. Please refer to CC0 Public Domain Dedication for more information.
  // hasProperty GO:0048384
  // hasTaxon taxonomy:131567
  // biomodels.db:MODEL1702240000
  // biomodels.db:BIOMD0000000629
  // isDescribedBy doi:10.1039/C6MD00680A
  // isPartOf GO:0048384

  // Compartments:
  compartment RAR_retinoids = 1; RAR_retinoids is "Cell";  // hasProperty GO:0005623

  // Species:
  // Ligand is either natural retinoid (ATRA), or synthetic retinoid as EC19, EC23,...
  species L in RAR_retinoids = 0.0005; L is "Ligand";  // CHEBI:15367
  // Ligand-Receptor represents the intermediate complex formation between ligand and retinoic acid receptor in μmol
  // The formation of this complex is controlled by k1/k2 ratio which represents the ligand binding affinity.
  // The higher k1/k2 ratio, the better binding interaction of ligand to its cognate receptor
  species LR in RAR_retinoids = 0; LR is "Ligand-Receptor";  // hasPart CHEBI:15367 uniprot:P10276
  // Examples of receptors; Retinoic acid receptor (RAR)-alpha,-beta and -gamma.
  // The principle is the same and the concentrations used here are for RAR-alpha
  species R in RAR_retinoids = 0.0035; R is "Receptor";  // isVersionOf uniprot:P10276
  // Examples for co-activators:
  // steroid receptor co-activator-1 (SRC-1), co-activator-X (COACT-X) and CREB binding protein (CBP) (also known as P-300)
  species CA in RAR_retinoids = 30; CA is "CoActivator";  // hasVersion CHEBI:42492 CHEBI:16670
  // Ligand-Receptor-CoActivator represents the final complex formation between ligand, retinoic acid receptor and co-activator in μmol
  // The formation of this complex is controlled by k3/k4 ratio which represents the ligand- receptor complex binding to co-activator and measured practically as EC50.
  // The higher k3/k4 ratio, the better binding interaction of the intermediate complex to its co-activator.
  species LRCA in RAR_retinoids = 0; LRCA is "Ligand-Receptor-CoActivator";  // hasPart CHEBI:15367 uniprot:P10276

  // Reactions:
  LR_complx: L + R -> LR; RAR_retinoids*(LR_complx_k1*L*R - LR_complx_k2*LR); LR_complx is "Ligand-Receptor complex formation";  // isVersionOf GO:0016922
    LR_complx_k1 = 0.6; LR_complx_k2 = 0.1;
  LRCA_complx: LR + CA -> LRCA; RAR_retinoids*(LRCA_complx_k1*LR*CA - LRCA_complx_k2*LRCA); LRCA_complx is "Ligand-Receptor-CoActivator complex formation";  // hasPart GO:0016922
    LRCA_complx_k1 = 0.014; LRCA_complx_k2 = 0.2;

  // Unit definitions:
  unit time = 60 second;
  unit substance = 1e-6 mole;
end
