// SBML level 2 version 4
// This model was downloaded from BioModels Database
// http://www.ebi.ac.uk/biomodels/
// dcterms:bibliographicCitation: http://identifiers.org/pubmed/22004735
// dcterms:bibliographicCitation: http://identifiers.org/pubmed/15208304
// dcterms:bibliographicCitation: http://identifiers.org/pubmed/16339882
// dcterms:bibliographicCitation: http://identifiers.org/pubmed/6193754
// dcterms:bibliographicCitation: http://identifiers.org/pubmed/1906642
// dcterms:bibliographicCitation: http://identifiers.org/pubmed/3667621
// dcterms:bibliographicCitation: http://identifiers.org/pubmed/16690877
// dcterms:bibliographicCitation: http://identifiers.org/doi/10.1371/journal.pcbi.0020120

function Constant_flux__irreversible_0(v)
  v;
end
Constant_flux__irreversible_0 is "Constant flux (irreversible)";

function Function_for_reaction_2_0(hill_cooperativity, parameter_8, plasmin, species_3)
  parameter_8*plasmin^hill_cooperativity*species_3;
end

model Venkatraman2011___PLS_UPA_behaviour_in_the_presence_of_substrate_competition_1_1_1()
  // Venkatraman2011 - PLS-UPA behaviour in the presence of substrate competition_1_1_1_1
  // Venkatraman2011 - PLS-UPA behaviour in the presence of substrate competition
  // The posibility of ultrasensitivity and bistable activation of PLS (Plasmin) and UPA (Urokinase-type plasminogen activator) in the presence of substrate competition is explained here using a mathematical model.
  // This model is described in the article:
  // Steady states and dynamics of urokinase-mediated plasmin activation in silico and in vitro.
  // Venkatraman L, Li H, Dewey CF Jr, White JK, Bhowmick SS, Yu H, Tucker-Kellogg L.
  // Biophys. J. 2011 Oct; 101(8): 1825-1834
  // Abstract:
  // Plasmin (PLS) and urokinase-type plasminogen activator (UPA) are ubiquitous proteases that regulate the extracellular environment. Although they are secreted in inactive forms, they can activate each other through proteolytic cleavage. This mutual interplay creates the potential for complex dynamics, which we investigated using mathematical modeling and in vitro experiments. We constructed ordinary differential equations to model the conversion of precursor plasminogen into active PLS, and precursor urokinase (scUPA) into active urokinase (tcUPA). Although neither PLS nor UPA exhibits allosteric cooperativity, modeling showed that cooperativity occurred at the system level because of substrate competition. Computational simulations and bifurcation analysis predicted that the system would be bistable over a range of parameters for cooperativity and positive feedback. Cell-free experiments with recombinant proteins tested key predictions of the model. PLS activation in response to scUPA stimulus was found to be cooperative in vitro. Finally, bistability was demonstrated in vitro by the presence of two significantly different steady-state levels of PLS activation for the same levels of stimulus. We conclude that ultrasensitive, bistable activation of UPA-PLS is possible in the presence of substrate competition. An ultrasensitive threshold for activation of PLS and UPA would have ramifications for normal and disease processes, including angiogenesis, metastasis, wound healing, and fibrosis.
  // The cooperativity parameter "ci" was missing in the original model. The parameter "ci" has been added to the added.
  // This model is hosted on BioModels Database and identified by: BIOMD0000000630.
  // To cite BioModels Database, please use: BioModels Database: An enhanced, curated and annotated resource for published quantitative kinetic models.
  // To the extent possible under law, all copyright and related or neighbouring rights to this encoded model have been dedicated to the public domain worldwide. Please refer to CC0 Public Domain Dedication for more information.
  // hasProperty mamo:MAMO_0000046
  // biomodels.db:MODEL1303130001
  // biomodels.db:BIOMD0000000630
  // isDescribedBy pubmed:22004735
  // hasTaxon taxonomy:131567
  // hasProperty GO:0031639 GO:0007596 mamo:MAMO_0000046

  // Compartments:
  compartment extra_cellular_matrix = 1;  // isVersionOf GO:0005576

  // Species:
  species plasminogen in extra_cellular_matrix = 0.01;  // isVersionOf uniprot:P00747
  species plasmin in extra_cellular_matrix = 0;  // isVersionOf uniprot:P00747
  species species_3 in extra_cellular_matrix = 0.002; species_3 is "single intact chain urokinase-type plasminogen activator";  // isVersionOf uniprot:P00749
  species species_4 in extra_cellular_matrix = 0; species_4 is "two-chain urokinase-type plasminogen activator";  // isVersionOf uniprot:P00749
  species $x in extra_cellular_matrix = 0;  // isVersionOf pubchem.compound:10370340
  species $x_plasmin in extra_cellular_matrix = 0; x_plasmin is "x-plasmin";  // hasPart uniprot:P00747 pubchem.compound:10370340

  // Parameters:
  degradation_constant_1 = 0.084;  // isDescribedBy pubmed:16339882 pubmed:15208304
  degradation_constant_2 = 0.032;  // isDescribedBy pubmed:1906642 pubmed:6193754
  hill_cooperativity = 2;

  // Reactions:
  cleavage_of_plasminogen: species_3 + plasminogen => plasmin + species_3; extra_cellular_matrix*cleavage_of_plasminogen_k1*species_3*plasminogen;  // isDescribedBy pubmed:3667621
    cleavage_of_plasminogen_k1 = 0.035;
  reaction_2: plasmin + species_3 => species_4 + plasmin; extra_cellular_matrix*Function_for_reaction_2_0(hill_cooperativity, parameter_8, plasmin, species_3); reaction_2 is "activation of urokinase-type plasminogen activator";  // isDescribedBy pubmed:3667621
    parameter_8 = 40;
  activation_of_plasmin: species_4 + plasminogen => plasmin + species_4; extra_cellular_matrix*activation_of_plasmin_k1*species_4*plasminogen;  // isDescribedBy pubmed:3667621
    activation_of_plasmin_k1 = 0.9;
  reaction_4: species_3 => ; extra_cellular_matrix*degradation_constant_1*species_3; reaction_4 is "degradation of single intact chain urokinase-type plasminogen activator";  // isDescribedBy pubmed:15208304 pubmed:16339882
  degradation_of_plasminogen: plasminogen => ; extra_cellular_matrix*degradation_constant_2*plasminogen;  // isDescribedBy pubmed:1906642 pubmed:6193754
  degradation_of_plasmin: plasmin => ; extra_cellular_matrix*degradation_constant_1*plasmin;  // isDescribedBy pubmed:15208304 pubmed:16339882
  reaction_7: species_4 => ; extra_cellular_matrix*degradation_constant_1*species_4; reaction_7 is "degradation of two-chain urokinase type plasminogen activator";  // isDescribedBy pubmed:15208304 pubmed:16339882
  reversible_plasmin_bonding_x: plasmin + $x -> $x_plasmin; extra_cellular_matrix*(reversible_plasmin_bonding_x_k1*plasmin*x - k2*x_plasmin);  // isDescribedBy pubmed:16690877
    reversible_plasmin_bonding_x_k1 = 0; k2 = 0.016;
  catalytic_reaction_of_x_plasmin: $x_plasmin => plasmin; extra_cellular_matrix*catalytic_reaction_of_x_plasmin_k1*x_plasmin; catalytic_reaction_of_x_plasmin is "catalytic reaction of x-plasmin";
    catalytic_reaction_of_x_plasmin_k1 = 0.02;
  degradation_of_x: $x => ; extra_cellular_matrix*degradation_constant_2*x;  // isDescribedBy pubmed:1906642 pubmed:6193754
  degradation_of_x_plasmin: $x_plasmin => ; extra_cellular_matrix*degradation_constant_2*x_plasmin; degradation_of_x_plasmin is "degradation of x-plasmin";  // isDescribedBy pubmed:6193754 pubmed:1906642
  reaction_12: => species_3; extra_cellular_matrix*Constant_flux__irreversible_0(reaction_12_v); reaction_12 is "synthesis of single intact chain urokinase-type plasminogen activator";  // isDescribedBy pubmed:16339882 doi:10.1371/journal.pcbi.0020120
    reaction_12_v = 0.0032;
  synthesis_of_plasminogen: => plasminogen; extra_cellular_matrix*Constant_flux__irreversible_0(synthesis_of_plasminogen_v);  // isDescribedBy pubmed:16339882 doi:10.1371/journal.pcbi.0020120
    synthesis_of_plasminogen_v = 0.01;
  synthesis_of_x: => $x; extra_cellular_matrix*Constant_flux__irreversible_0(synthesis_of_x_v);
    synthesis_of_x_v = 0.01;

  // Unit definitions:
  unit substance = 1e-6 mole;
end
