// SBML level 3 version 2

model MODEL1502200000()
  // Nair2015 - Interaction between neuromodulators via GPCRs - Effect on cAMP/PKA signaling (D1 Neuron)
  // This model is described in the article:
  // Sensing Positive versus Negative Reward Signals through Adenylyl Cyclase-Coupled GPCRs in Direct and Indirect Pathway Striatal Medium Spiny Neurons.
  // Nair AG, Gutierrez-Arenas O, Eriksson O, Vincent P, Hellgren Kotaleski J.
  // J. Neurosci. 2015 Oct; 35(41): 14017-14030
  // Abstract:
  // Transient changes in striatal dopamine (DA) concentration are considered to encode a reward prediction error (RPE) in reinforcement learning tasks. Often, a phasic DA change occurs concomitantly with a dip in striatal acetylcholine (ACh), whereas other neuromodulators, such as adenosine (Adn), change slowly. There are abundant adenylyl cyclase (AC) coupled GPCRs for these neuromodulators in striatal medium spiny neurons (MSNs), which play important roles in plasticity. However, little is known about the interaction between these neuromodulators via GPCRs. The interaction between these transient neuromodulator changes and the effect on cAMP/PKA signaling via Golf- and Gi/o-coupled GPCR are studied here using quantitative kinetic modeling. The simulations suggest that, under basal conditions, cAMP/PKA signaling could be significantly inhibited in D1R+ MSNs via ACh/M4R/Gi/o and an ACh dip is required to gate a subset of D1R/Golf-dependent PKA activation. Furthermore, the interaction between ACh dip and DA peak, via D1R and M4R, is synergistic. In a similar fashion, PKA signaling in D2+ MSNs is under basal inhibition via D2R/Gi/o and a DA dip leads to a PKA increase by disinhibiting A2aR/Golf, but D2+ MSNs could also respond to the DA peak via other intracellular pathways. This study highlights the similarity between the two types of MSNs in terms of high basal AC inhibition by Gi/o and the importance of interactions between Gi/o and Golf signaling, but at the same time predicts differences between them with regard to the sign of RPE responsible for PKA activation.Dopamine transients are considered to carry reward-related signal in reinforcement learning. An increase in dopamine concentration is associated with an unexpected reward or salient stimuli, whereas a decrease is produced by omission of an expected reward. Often dopamine transients are accompanied by other neuromodulatory signals, such as acetylcholine and adenosine. We highlight the importance of interaction between acetylcholine, dopamine, and adenosine signals via adenylyl-cyclase coupled GPCRs in shaping the dopamine-dependent cAMP/PKA signaling in striatal neurons. Specifically, a dopamine peak and an acetylcholine dip must interact, via D1 and M4 receptor, and a dopamine dip must interact with adenosine tone, via D2 and A2a receptor, in direct and indirect pathway neurons, respectively, to have any significant downstream PKA activation.
  // This model is hosted on BioModels Database and identified by: BIOMD0000000635.
  // To cite BioModels Database, please use: BioModels Database: An enhanced, curated and annotated resource for published quantitative kinetic models.
  // To the extent possible under law, all copyright and related or neighbouring rights to this encoded model have been dedicated to the public domain worldwide. Please refer to CC0 Public Domain Dedication for more information.
  // biomodels.db:MODEL1502200000
  // biomodels.db:BIOMD0000000635
  // isDescribedBy pubmed:26468202
  // hasProperty GO:0004016 GO:0004930 GO:0007212 GO:0090494 mamo:MAMO_0000046
  // hasTaxon taxonomy:10090
  // model units - substance: substance, time: second, volume: volume, area: area, length: metre, extent: substance

  // Compartments:
  compartment Spine = 1e-15 volume;  // hasProperty GO:0044309

  // Species:
  species GaiGTP in Spine = 2.356247;  // hasPart CHEBI:15996 uniprot:B2RSH2
  species GaolfGDP in Spine = 0.005147448;  // hasPart CHEBI:17552 uniprot:Q8CGK7
  // The Gs protein is thought to be homologous to the Golf protein complex. Beta1 is listed because no information was provided on the specific beta subunit used.
  species Gbgolf in Spine = 107.8754;  // isHomologTo uniprot:P62874
  species GaolfGTP in Spine = 1.139404;  // hasPart CHEBI:15996 uniprot:Q8CGK7
  // The Golf is made up of the alpha, beta, and gamma subunits. The beta and gamma subunits of the Gs protein are used because Gs is homologous to the Golf protein, and Gbolf anf Ggolf could not be found.
  species D1RDAGolf in Spine = 3.701886;  // hasPart CHEBI:18243 uniprot:Q61616 uniprot:P62874 uniprot:Q8CGK7
  // The Golf is made up of the alpha, beta, and gamma subunits. The beta and gamma subunits of the Gs protein are used because Gs is homologous to the Golf protein, and Gbolf and Ggolf could not be found.
  species Golf in Spine = 1102.528;  // hasPart uniprot:P62874 uniprot:Q8CGK7 uniprot:P63213
  // The Golf is made up of the alpha, beta, and gamma subunits. The beta and gamma subunits of the Gs protein are used because Gs is homologous to the Golf protein, and Gbolf and Ggolf could not be found.
  species D1RGolf in Spine = 785.8947;  // hasPart uniprot:Q61616 uniprot:P62874 uniprot:Q8CGK7 uniprot:P63213
  species D1RDA in Spine = 16.10009;  // hasPart CHEBI:18243 uniprot:Q61616
  species D1R in Spine = 1194.303;  // uniprot:Q61616
  species cAMP in Spine = 91.64676;  // CHEBI:17489
  species $Ca in Spine = 60;  // CHEBI:29108
  species AC5 in Spine = 0.5074936;  // uniprot:P84309
  species AC5GaolfGTP in Spine = 0.397626;  // hasPart CHEBI:15996 uniprot:P84309 uniprot:Q8CGK7
  species CaM in Spine = 7686.158;  // uniprot:P62204
  species CaMCa2 in Spine = 316.7761;  // hasPart CHEBI:29108 uniprot:P62204
  species CaMCa4 in Spine = 2.47081;  // hasPart CHEBI:29108 uniprot:P62204
  species PDE4 in Spine = 1531.993;  // uniprot:Q01063
  species PKA in Spine = 1100.85;  // hasPart uniprot:P05132 uniprot:P68181 uniprot:Q9DBC7 uniprot:P12849
  species PKAcAMP2 in Spine = 26.23123;  // hasPart CHEBI:17489 uniprot:P05132 uniprot:P68181 uniprot:Q9DBC7
  species PKAcAMP4 in Spine = 0.8317864;  // hasPart CHEBI:17489 uniprot:P05132 uniprot:P68181 uniprot:Q9DBC7
  species PKAreg in Spine = 72.08693;  // hasPart uniprot:Q9DBC7 uniprot:P12849
  species PKAc in Spine = 11.53866;  // hasPart uniprot:P05132 uniprot:P68181
  // Protein phosphatase 2B is also known as calcineurin.
  species PP2B in Spine = 5.404757;  // isPartOf interpro:IPR006186; hasPart uniprot:P63328 uniprot:P48453 uniprot:P48455 uniprot:Q63810
  // Assuming PP2Bc refers to entire catalytic part and not just the gamma catalytic subunit.
  species PP2Bc in Spine = 194.5025;  // hasPart uniprot:P63328 uniprot:P48453 uniprot:P48455
  species PP2BCaM in Spine = 1380.872;  // isPartOf interpro:IPR006186; hasPart uniprot:P62204 uniprot:P63328 uniprot:P48453 uniprot:P48455
  species PP2BCaMCa2 in Spine = 419.1964;  // isPartOf interpro:IPR006186; hasPart CHEBI:29108 uniprot:P62204 uniprot:P63328 uniprot:P48453
  species DARPP32 in Spine = 37271.65;  // uniprot:Q60829
  // D32 appears to be a shortened name for DARPP32 and is used instead of writing it out.
  species PKAc_D32 in Spine = 7.167748; PKAc_D32 is "PKAc*D32";  // hasPart uniprot:P05132 uniprot:P68181 uniprot:Q60829
  // This appears to be a phosphorylated verison of D32, which is the shortened name for DARPP32 used in this model.
  species D32p34 in Spine = 0.6789785;  // isVersionOf uniprot:Q60829
  // This was assumed to be a modified version of PP2A. The three subunits of PP2A (alpha isoforms) are included.
  species B72PP2A in Spine = 860.232;  // isPartOf interpro:IPR006186; hasPart uniprot:Q76MZ3 uniprot:Q6P1F6 uniprot:P63330
  species PKAc_B56PP2A in Spine = 16.40972; PKAc_B56PP2A is "PKAc*B56PP2A";  // isPartOf interpro:IPR006186; hasPart uniprot:P05132 uniprot:P68181 uniprot:Q76MZ3 uniprot:Q6P1F6
  // The B56 and p are assumed to be modifications of PP2A. hasPart is used instead of isVersionOf, since PP2A consists of multiple subunits.
  species B56PP2Ap in Spine = 410.2429;  // hasPart uniprot:Q76MZ3 uniprot:Q6P1F6 uniprot:P63330
  species CDK5 in Spine = 233.4964;  // uniprot:P49615
  // PP1 consists of one catalytic and one regulatory subunit. The alpha catalytic subunit and regulatory subunit A were used here.
  species PP1 in Spine = 1493.106;  // isPartOf interpro:IPR006186; hasPart uniprot:P62137 uniprot:Q9ERT9
  species CDK5_D32 in Spine = 1566.504; CDK5_D32 is "CDK5*D32";  // hasPart uniprot:P49615 uniprot:Q60829
  species D32p75 in Spine = 8659.681;  // isVersionOf uniprot:Q60829
  species PKAcD32p75 in Spine = 36.97081;  // hasPart uniprot:P05132 uniprot:P68181 uniprot:Q60829
  species B72PPA2Ca in Spine = 51.61392;  // hasPart CHEBI:29108 uniprot:Q76MZ3 uniprot:Q6P1F6 uniprot:P63330
  species B56PP2Ap_D32p75 in Spine = 296.0477; B56PP2Ap_D32p75 is "B56PP2Ap*D32p75";  // hasPart uniprot:Q76MZ3 uniprot:Q6P1F6 uniprot:P63330 uniprot:Q60829
  species B72PP2A_D32p75 in Spine = 805.3335; B72PP2A_D32p75 is "B72PP2A*D32p75";  // hasPart uniprot:Q76MZ3 uniprot:Q6P1F6 uniprot:P63330 uniprot:Q60829
  species B72PP2ACa_D32p75 in Spine = 44.69601; B72PP2ACa_D32p75 is "B72PP2ACa*D32p75";  // hasPart CHEBI:29108 uniprot:Q76MZ3 uniprot:Q6P1F6 uniprot:P63330
  species PP1D32p34 in Spine = 506.8936;  // hasPart uniprot:P62137 uniprot:Q9ERT9 uniprot:Q60829
  species PP2Bc_D32p34 in Spine = 0.02401146; PP2Bc_D32p34 is "PP2Bc*D32p34";  // hasPart uniprot:P63328 uniprot:P48453 uniprot:P48455 uniprot:Q60829
  species B72PP2A_D32p34 in Spine = 224.6458; B72PP2A_D32p34 is "B72PP2A*D32p34";  // hasPart uniprot:Q76MZ3 uniprot:Q6P1F6 uniprot:P63330 uniprot:Q60829
  species $DA in Spine;  // CHEBI:18243
  species $AMP in Spine = 0;  // CHEBI:16027
  species AC5Ca in Spine = 0.03383572;  // hasPart CHEBI:29108 uniprot:P84309
  species AC5CaGaolfGTP in Spine = 0.02652774;  // hasPart CHEBI:29108 CHEBI:15996 uniprot:P84309 uniprot:Q8CGK7
  species AC5GaiGTP in Spine = 1.707853;  // hasPart CHEBI:15996 uniprot:P84309 uniprot:B2RSH2
  species AC5CaGaiGTP in Spine = 0.1138883;  // hasPart CHEBI:29108 CHEBI:15996 uniprot:P84309 uniprot:B2RSH2
  species B56PP2A in Spine = 711.0756;  // hasPart uniprot:Q76MZ3 uniprot:Q6P1F6 uniprot:P63330
  species B56PP2A_D32p75 in Spine = 566.2241; B56PP2A_D32p75 is "B56PP2A*D32p75";  // hasPart uniprot:Q76MZ3 uniprot:Q6P1F6 uniprot:P63330 uniprot:Q60829
  species B72PP2ACa_D32p34 in Spine = 13.47875; B72PP2ACa_D32p34 is "B72PP2ACa*D32p34";  // hasPart CHEBI:29108 uniprot:Q76MZ3 uniprot:Q6P1F6 uniprot:P63330
  species PDE4_cAMP in Spine = 468.0072; PDE4_cAMP is "PDE4*cAMP";  // hasPart CHEBI:17489 uniprot:Q01063
  species AC5GaolfGTPGaiGTP in Spine = 0.0004391357;  // hasPart CHEBI:15996 uniprot:P84309 uniprot:Q8CGK7 uniprot:B2RSH2
  species AC5CaGaolfGTPGaiGTP in Spine = 2.928116e-5;  // hasPart CHEBI:29108 CHEBI:15996 uniprot:P84309 uniprot:Q8CGK7
  species M4R in Spine = 1529.7;  // uniprot:P32211
  species M4RACh in Spine = 25.65012;  // hasPart CHEBI:15355 uniprot:P32211
  species M4RGi in Spine = 214.7227;  // hasPart uniprot:P32211 uniprot:B2RSH2 uniprot:P62874 uniprot:P63213
  // The Gi protein consists of three subunits: alpha, beta, and gamma. Alpha-1, beta-1, and gamma-2 were used because they are lowest numbers found on uniprot, although many different versions of the subunits exist.
  species Gi in Spine = 1095.196;  // hasPart uniprot:B2RSH2 uniprot:P62874 uniprot:P63213
  species M4RAChGi in Spine = 229.9273;  // hasPart CHEBI:15355 uniprot:P32211 uniprot:B2RSH2 uniprot:P62874
  species Gbgi in Spine = 460.1544;  // hasPart uniprot:P62874 uniprot:P63213
  species GaiGDP in Spine = 0.2998045;  // hasPart CHEBI:17552 uniprot:B2RSH2
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  species $ACh in Spine;  // CHEBI:15355
  // PDE10c appears to be a modification of PDE10 and does not appear to be a different subunit or molecule. Thus, both are written as a version of PDE10a.
  species PDE10c in Spine = 0.2304454;  // isVersionOf uniprot:Q8CA95
  // PDE10c appears to be a modification of PDE10 and does not appear to be a different subunit or molecule. Thus, both are written as a version of PDE10a.
  species PDE10 in Spine = 246.9314;  // isVersionOf uniprot:Q8CA95
  // PDE10c appears to be a modification of PDE10 and does not appear to be a different subunit or molecule. Thus, both are written as a version of PDE10a.
  species PDE10_cAMP in Spine = 452.6093; PDE10_cAMP is "PDE10*cAMP";  // hasPart CHEBI:17489 uniprot:Q8CA95
  // PDE10c appears to be a modification of PDE10 and does not appear to be a different subunit or molecule. Thus, both are written as a version of PDE10a.
  species PDE10c_cAMP in Spine = 0.2287954; PDE10c_cAMP is "PDE10c*cAMP";  // hasPart CHEBI:17489 uniprot:Q8CA95
  species $ATP in Spine = 5000000;  // CHEBI:15422
  species AC5GaolfGTPGaiGTP_ATP in Spine = 0.1098258; AC5GaolfGTPGaiGTP_ATP is "AC5GaolfGTPGaiGTP*ATP";  // hasPart CHEBI:15996 CHEBI:15422 uniprot:P84309 uniprot:Q8CGK7
  species AC5GaiGTP_ATP in Spine = 427.0865; AC5GaiGTP_ATP is "AC5GaiGTP*ATP";  // hasPart CHEBI:15996 CHEBI:15422 uniprot:P84309 uniprot:B2RSH2
  species AC5GaolfGTP_ATP in Spine = 99.55226; AC5GaolfGTP_ATP is "AC5GaolfGTP*ATP";  // hasPart CHEBI:15996 CHEBI:15422 uniprot:P84309 uniprot:Q8CGK7
  species AC5_ATP in Spine = 126.888; AC5_ATP is "AC5*ATP";  // hasPart CHEBI:15422 uniprot:P84309
  species AC5CaGaolfGTP_ATP in Spine = 6.636798; AC5CaGaolfGTP_ATP is "AC5CaGaolfGTP*ATP";  // hasPart CHEBI:29108 CHEBI:15996 CHEBI:15422 uniprot:P84309
  species AC5CaGaiGTP_ATP in Spine = 28.4724; AC5CaGaiGTP_ATP is "AC5CaGaiGTP*ATP";  // hasPart CHEBI:29108 CHEBI:15996 CHEBI:15422 uniprot:P84309
  species AC5CaGaolfGTPGaiGTP_ATP in Spine = 0.007321715; AC5CaGaolfGTPGaiGTP_ATP is "AC5CaGaolfGTPGaiGTP*ATP";  // hasPart CHEBI:29108 CHEBI:15996 CHEBI:15422 uniprot:P84309
  species AC5Ca_ATP in Spine = 8.459194; AC5Ca_ATP is "AC5Ca*ATP";  // hasPart CHEBI:29108 CHEBI:15422 uniprot:P84309
  // AKAR3 is a FRET-based A-kinase activity reporter, or a biosensor, developed by Allen and Zhang (2006). It was applied in Castro et al (2013) to measure PKA dynamics. In this model it is used to measure PKA dynamics in the D1+MSN model. AKAR3p is assumed to be the phosphorylated version of AKAR3.
  species PP1_AKAR3p in Spine = 0; PP1_AKAR3p is "PP1*AKAR3p";  // hasPart uniprot:P62137 uniprot:Q9ERT9; isDescribedBy pubmed:16895723 pubmed:23551948
  // AKAR3 is a FRET-based A-kinase activity reporter, or a biosensor, developed by Allen and Zhang (2006). It was applied in Castro et al (2013) to measure PKA dynamics. In this model it is used to measure PKA dynamics in the D1+MSN model. AKAR3p is assumed to be the phosphorylated version of AKAR3.
  species PKAc_AKAR3 in Spine = 0; PKAc_AKAR3 is "PKAc*AKAR3";  // hasPart uniprot:P05132 uniprot:P68181; isDescribedBy pubmed:16895723 pubmed:23551948
  species $totalActivePKA in Spine;  // hasPart CHEBI:17489 uniprot:P05132 uniprot:P68181 uniprot:Q9DBC7

  // Parameters:
  krM4R_Gi = 90; krM4R_Gi is "krM4R*Gi";
  kfM4R_Gi = 0.012; kfM4R_Gi is "kfM4R*Gi";
  krPP2B_CaMCa2 = 3; krPP2B_CaMCa2 is "krPP2B*CaMCa2";
  kfPP2B_CaMCa2 = 1; kfPP2B_CaMCa2 is "kfPP2B*CaMCa2";
  krPP2BCaMCa2_2Ca = 10; krPP2BCaMCa2_2Ca is "krPP2BCaMCa2*2Ca";
  kfPP2BCaMCa2_2Ca = 0.1; kfPP2BCaMCa2_2Ca is "kfPP2BCaMCa2*2Ca";
  krPP2BCaM_2Ca = 0.91; krPP2BCaM_2Ca is "krPP2BCaM*2Ca";
  kfPP2BCaM_2Ca = 0.006; kfPP2BCaM_2Ca is "kfPP2BCaM*2Ca";
  kfPP1_D32p34 = 0.04; kfPP1_D32p34 is "kfPP1*D32p34";
  krPP1_D32p34 = 0.08; krPP1_D32p34 is "krPP1*D32p34";
  kfPP2B_CaMCa4 = 1; kfPP2B_CaMCa4 is "kfPP2B*CaMCa4";
  krPP2B_CaMCa4 = 3; krPP2B_CaMCa4 is "krPP2B*CaMCa4";
  kfB72PP2A_Ca = 0.0001; kfB72PP2A_Ca is "kfB72PP2A*Ca";
  krB72PP2A_Ca = 0.1; krB72PP2A_Ca is "krB72PP2A*Ca";
  kfPP2B_CaM = 1; kfPP2B_CaM is "kfPP2B*CaM";
  krPP2B_CaM = 30; krPP2B_CaM is "krPP2B*CaM";
  kcatPKAc_D32 = 10; kcatPKAc_D32 is "kcatPKAc*D32";
  kGaolfGTPase = 30;
  kfPP2Bc_D32p34 = 0.002; kfPP2Bc_D32p34 is "kfPP2Bc*D32p34";
  krPP2Bc_D32p34 = 1; krPP2Bc_D32p34 is "krPP2Bc*D32p34";
  kfB56PP2A_D32p75 = 0.0008; kfB56PP2A_D32p75 is "kfB56PP2A*D32p75";
  krB56PP2A_D32p75 = 6.4; krB56PP2A_D32p75 is "krB56PP2A*D32p75";
  kfB56PP2Ap_D32p75 = 0.0015; kfB56PP2Ap_D32p75 is "kfB56PP2Ap*D32p75";
  krB56PP2Ap_D32p75 = 10; krB56PP2Ap_D32p75 is "krB56PP2Ap*D32p75";
  kcatB56PP2Ap_D32p75 = 8; kcatB56PP2Ap_D32p75 is "kcatB56PP2Ap*D32p75";
  kcatB56PP2A_D32p75 = 2.3; kcatB56PP2A_D32p75 is "kcatB56PP2A*D32p75";
  kcatB72PP2ACa_D32p75 = 5; kcatB72PP2ACa_D32p75 is "kcatB72PP2ACa*D32p75";
  kcatB72PP2A_D32p75 = 1; kcatB72PP2A_D32p75 is "kcatB72PP2A*D32p75";
  kfB72PP2A_D32p75 = 0.0008; kfB72PP2A_D32p75 is "kfB72PP2A*D32p75";
  krB72PP2A_D32p75 = 6.4; krB72PP2A_D32p75 is "krB72PP2A*D32p75";
  kfB72PP2ACa_D32p75 = 0.0015; kfB72PP2ACa_D32p75 is "kfB72PP2ACa*D32p75";
  krB72PP2ACa_D32p75 = 10; krB72PP2ACa_D32p75 is "krB72PP2ACa*D32p75";
  kcatPP2Bc_D32p34 = 10; kcatPP2Bc_D32p34 is "kcatPP2Bc*D32p34";
  kcatCDK5_D32 = 3; kcatCDK5_D32 is "kcatCDK5*D32";
  kactGi = 60;
  kGiGTPase = 30;
  kGiback = 100;
  kfM4RACh_Gi = 1.2; kfM4RACh_Gi is "kfM4RACh*Gi";
  krM4RACh_Gi = 90; krM4RACh_Gi is "krM4RACh*Gi";
  kfPKA_2cAMP = 0.00026; kfPKA_2cAMP is "kfPKA*2cAMP";
  krPKA_2cAMP = 1; krPKA_2cAMP is "krPKA*2cAMP";
  krPKAc_PKAr = 10; krPKAc_PKAr is "krPKAc*PKAr";
  kfPKAc_PKAr = 0.01; kfPKAc_PKAr is "kfPKAc*PKAr";
  kfPKA2cAMP_2cAMP = 0.000346; kfPKA2cAMP_2cAMP is "kfPKA2cAMP*2cAMP";
  krPKA2cAMP_2cAMP = 1; krPKA2cAMP_2cAMP is "krPKA2cAMP*2cAMP";
  kfCDK5_D32 = 0.0009; kfCDK5_D32 is "kfCDK5*D32";
  krCDK5_D32 = 2; krCDK5_D32 is "krCDK5*D32";
  kactGolf = 15;
  kcatPDE4_cAMP = 2; kcatPDE4_cAMP is "kcatPDE4*cAMP";
  kfPKAc_D32 = 0.0003; kfPKAc_D32 is "kfPKAc*D32";
  krPKAc_D32 = 8; krPKAc_D32 is "krPKAc*D32";
  kfPDE4_cAMP = 0.01; kfPDE4_cAMP is "kfPDE4*cAMP";
  krPDE4_cAMP = 1; krPDE4_cAMP is "krPDE4*cAMP";
  krPDE10_cAMP = 9; krPDE10_cAMP is "krPDE10*cAMP";
  kcatPDE10c_cAMP = 10; kcatPDE10c_cAMP is "kcatPDE10c*cAMP";
  kfPDE10_cAMP = 1e-6; kfPDE10_cAMP is "kfPDE10*cAMP";
  kfcAMP_PDE10 = 0.1; kfcAMP_PDE10 is "kfcAMP*PDE10";
  krcAMP_PDE10 = 2; krcAMP_PDE10 is "krcAMP*PDE10";
  kcatcAMP_PDE10 = 3; kcatcAMP_PDE10 is "kcatcAMP*PDE10";
  kcatAC5GaolfGTP_ATP = 20; kcatAC5GaolfGTP_ATP is "kcatAC5GaolfGTP*ATP";
  kicatAC5GaolfGTP_ATP = 0.084; kicatAC5GaolfGTP_ATP is "kicatAC5GaolfGTP*ATP";
  kcatAC5_ATP = 1; kcatAC5_ATP is "kcatAC5*ATP";
  kicatAC5_ATP = 0.0004; kicatAC5_ATP is "kicatAC5*ATP";
  kcatAC5GaiGTP_ATP = 0.25; kcatAC5GaiGTP_ATP is "kcatAC5GaiGTP*ATP";
  kicatAC5GaiGTP_ATP = 0.00105; kicatAC5GaiGTP_ATP is "kicatAC5GaiGTP*ATP";
  kcatAC5CaGaiGTP_ATP = 0.125; kcatAC5CaGaiGTP_ATP is "kcatAC5CaGaiGTP*ATP";
  kicatAC5CaGaiGTP_ATP = 2.8125e-5; kicatAC5CaGaiGTP_ATP is "kicatAC5CaGaiGTP*ATP";
  kcatAC5Ca_ATP = 0.5; kcatAC5Ca_ATP is "kcatAC5Ca*ATP";
  kicatAC5Ca_ATP = 0.00015; kicatAC5Ca_ATP is "kicatAC5Ca*ATP";
  kcatAC5CaGaolfGTP_ATP = 10; kcatAC5CaGaolfGTP_ATP is "kcatAC5CaGaolfGTP*ATP";
  kicatAC5CaGaolfGTP_ATP = 0.022; kicatAC5CaGaolfGTP_ATP is "kicatAC5CaGaolfGTP*ATP";
  kfM4R_ACh = 0.01; kfM4R_ACh is "kfM4R*ACh";
  kfM4RGi_ACh = 1; kfM4RGi_ACh is "kfM4RGi*ACh";
  krM4RGi_ACh = 90; krM4RGi_ACh is "krM4RGi*ACh";
  krM4R_ACh = 90; krM4R_ACh is "krM4R*ACh";
  kcatAC5GaolfGTPGaiGTP_ATP = 5; kcatAC5GaolfGTPGaiGTP_ATP is "kcatAC5GaolfGTPGaiGTP*ATP";
  kicatAC5GaolfGTPGaiGTP_ATP = 0.006; kicatAC5GaolfGTPGaiGTP_ATP is "kicatAC5GaolfGTPGaiGTP*ATP";
  kicatAC5CaGaolfGTPGaiGTP_ATP = 0.00175; kicatAC5CaGaolfGTPGaiGTP_ATP is "kicatAC5CaGaolfGTPGaiGTP*ATP";
  kcatAC5CaGaolfGTPGaiGTP_ATP = 2.5; kcatAC5CaGaolfGTPGaiGTP_ATP is "kcatAC5CaGaolfGTPGaiGTP*ATP";
  kfAC5_ATP = 0.0001; kfAC5_ATP is "kfAC5*ATP";
  kfAC5CaGaolfGTP_ATP = 0.00055; kfAC5CaGaolfGTP_ATP is "kfAC5CaGaolfGTP*ATP";
  kfAC5CaGaiGTP_ATP = 5.625e-5; kfAC5CaGaiGTP_ATP is "kfAC5CaGaiGTP*ATP";
  kfAC5CaGaolfGTPGaiGTP_ATP = 0.000175; kfAC5CaGaolfGTPGaiGTP_ATP is "kfAC5CaGaolfGTPGaiGTP*ATP";
  kfCaM_2Ca = 0.006; kfCaM_2Ca is "kfCaM*2Ca";
  kGolfback = 100;
  krCaM_2Ca = 9.1; krCaM_2Ca is "krCaM*2Ca";
  kdpB56PP2Ap = 0.008;
  krCaMCa2_2Ca = 1000; krCaMCa2_2Ca is "krCaMCa2*2Ca";
  krPKAc_D32p75 = 1; krPKAc_D32p75 is "krPKAc*D32p75";
  kfPKAc_B56PP2A = 0.001; kfPKAc_B56PP2A is "kfPKAc*B56PP2A";
  krPKAc_B56PP2A = 0.3; krPKAc_B56PP2A is "krPKAc*B56PP2A";
  kfCaMCa2_2Ca = 0.1; kfCaMCa2_2Ca is "kfCaMCa2*2Ca";
  kcatPKAc_B56PP2A = 0.2; kcatPKAc_B56PP2A is "kcatPKAc*B56PP2A";
  kfPKAc_D32p75 = 0.00037; kfPKAc_D32p75 is "kfPKAc*D32p75";
  kfAC5GaolfGTP_ATP = 0.00105; kfAC5GaolfGTP_ATP is "kfAC5GaolfGTP*ATP";
  kfAC5GaiGTP_ATP = 6.25e-5; kfAC5GaiGTP_ATP is "kfAC5GaiGTP*ATP";
  kfAC5GaolfGTPGaiGTP_ATP = 0.0003; kfAC5GaolfGTPGaiGTP_ATP is "kfAC5GaolfGTPGaiGTP*ATP";
  kfAC5Ca_ATP = 7.5e-5; kfAC5Ca_ATP is "kfAC5Ca*ATP";
  kfD1R_Golf = 0.003; kfD1R_Golf is "kfD1R*Golf";
  krD1R_Golf = 5; krD1R_Golf is "krD1R*Golf";
  kfD1RDA_Golf = 0.003; kfD1RDA_Golf is "kfD1RDA*Golf";
  krD1RDA_Golf = 5; krD1RDA_Golf is "krD1RDA*Golf";
  kfB72PP2A_D32p34 = 0.5; kfB72PP2A_D32p34 is "kfB72PP2A*D32p34";
  krB72PP2A_D32p34 = 1; krB72PP2A_D32p34 is "krB72PP2A*D32p34";
  krAC5X_ATP = 1; krAC5X_ATP is "krAC5X*ATP";
  kcatB72PP2A_D32p34 = 0.3; kcatB72PP2A_D32p34 is "kcatB72PP2A*D32p34";
  kfAC5XGaolfGTP = 0.2;
  kfAC5Ca = 0.001;
  kfAC5XGaiGTP = 50;
  kfAC5XNCGaiGTP = 0.01;
  kfAC5XNCGaolfGTP = 0.002;
  krAC5XGaolfGTP = 0.1;
  krAC5Ca = 0.9;
  krAC5XGaiGTP = 5;
  krAC5XNCGaiGTP = 0.01;
  krAC5XNCGaolfGTP = 0.01;
  krgso = 0.2;
  krgsi = 30;
  kcatPP1_AKAR3p = 1.2; kcatPP1_AKAR3p is "kcatPP1*AKAR3p";
  kfPP1_AKAR3p = 0; kfPP1_AKAR3p is "kfPP1*AKAR3p";
  krPP1_AKAR3p = 10; krPP1_AKAR3p is "krPP1*AKAR3p";
  kcatPKAc_AKAR3 = 3; kcatPKAc_AKAR3 is "kcatPKAc*AKAR3";
  kfPKAc_AKAR3 = 0; kfPKAc_AKAR3 is "kfPKAc*AKAR3";
  krPKAc_AKAR3 = 1; krPKAc_AKAR3 is "krPKAc*AKAR3";
  kfPDE10c_cAMP = 0.13; kfPDE10c_cAMP is "kfPDE10c*cAMP";
  krPDE10c_cAMP = 2; krPDE10c_cAMP is "krPDE10c*cAMP";
  kfD1R_DA = 0.005; kfD1R_DA is "kfD1R*DA";
  kfD1RGolf_DA = 0.005; kfD1RGolf_DA is "kfD1RGolf*DA";
  krD1R_DA = 5; krD1R_DA is "krD1R*DA";
  krD1RGolf_DA = 5; krD1RGolf_DA is "krD1RGolf*DA";
  DApeak_present = 0;
  DApeak_steepness = 100;
  DApeak_startTime = 2;
  DApeak_duration = 1;
  DAbasal = 10;
  DApeak_maximum = 1500;
  AChdip_present = 0;
  AChdip_steepness = 100;
  AChdip_startTime = 2;
  AChdip_duration = 0.4;
  AChbasal = 100;
  AChdip_minimum = 0.001;
  Initial_for_AChbasal = AChbasal;
  Initial_for_AChdip_duration = AChdip_duration;
  Initial_for_AChdip_maximum = AChdip_maximum;
  Initial_for_AChdip_minimum = AChdip_minimum;
  Initial_for_AChdip_present = AChdip_present;
  Initial_for_AChdip_startTime = AChdip_startTime;
  Initial_for_AChdip_steepness = AChdip_steepness;
  Initial_for_DAbasal = DAbasal;
  Initial_for_DApeak_duration = DApeak_duration;
  Initial_for_DApeak_maximum = DApeak_maximum;
  Initial_for_DApeak_minimum = DApeak_minimum;
  Initial_for_DApeak_present = DApeak_present;
  Initial_for_DApeak_startTime = DApeak_startTime;
  Initial_for_DApeak_steepness = DApeak_steepness;

  // Assignment rules:
  totalActivePKA := PKAreg - PKAcD32p75;
  DApeak := 1/(1 + exp(-Initial_for_DApeak_steepness*time + Initial_for_DApeak_steepness*Initial_for_DApeak_startTime)) - 1/(1 + exp(-Initial_for_DApeak_steepness*time + Initial_for_DApeak_steepness*(Initial_for_DApeak_startTime + Initial_for_DApeak_duration)));
  DApeak_minimum := Initial_for_DAbasal;
  DA := Initial_for_DAbasal + Initial_for_DApeak_present*(Initial_for_DApeak_maximum - Initial_for_DApeak_minimum)*DApeak;
  AChdip := 1 - 1/(1 + exp(-Initial_for_AChdip_steepness*time + Initial_for_AChdip_steepness*Initial_for_AChdip_startTime)) + 1/(1 + exp(-Initial_for_AChdip_steepness*time + Initial_for_AChdip_steepness*(Initial_for_AChdip_startTime + Initial_for_AChdip_duration)));
  AChdip_maximum := Initial_for_AChbasal;
  ACh := (1 - Initial_for_AChdip_present)*Initial_for_AChbasal + Initial_for_AChdip_present*(Initial_for_AChdip_minimum + (Initial_for_AChdip_maximum - Initial_for_AChdip_minimum)*AChdip);

  // Reactions:
  revreaction_1: D1RGolf + $DA -> D1RDAGolf; Spine*(kfD1RGolf_DA*D1RGolf*DA - krD1RGolf_DA*D1RDAGolf);  // isVersionOf reactome:R-MMU-390835 GO:0001664
  revreaction_2: D1RDA + Golf -> D1RDAGolf; Spine*(kfD1RDA_Golf*D1RDA*Golf - krD1RDA_Golf*D1RDAGolf);  // isVersionOf GO:0007212 GO:0032795
  revreaction_3: D1R + Golf -> D1RGolf; Spine*(kfD1R_Golf*D1R*Golf - krD1R_Golf*D1RGolf);  // isVersionOf GO:0031748 GO:0032795
  revreaction_4: D1R + $DA -> D1RDA; Spine*(kfD1R_DA*D1R*DA - krD1R_DA*D1RDA);  // reactome:R-MMU-390835
  revreaction_5: M4R + Gi -> M4RGi; Spine*(kfM4R_Gi*M4R*Gi - krM4R_Gi*M4RGi);  // isVersionOf GO:0033130 GO:0032795
  revreaction_6: M4RACh + Gi -> M4RAChGi; Spine*(kfM4RACh_Gi*M4RACh*Gi - krM4RACh_Gi*M4RAChGi);  // isVersionOf reactome:R-MMU-749456 GO:0032795 GO:0016907
  revreaction_7: $ACh + M4RGi -> M4RAChGi; Spine*(kfM4RGi_ACh*ACh*M4RGi - krM4RGi_ACh*M4RAChGi);  // GO:0031789
  revreaction_8: $ACh + M4R -> M4RACh; Spine*(kfM4R_ACh*ACh*M4R - krM4R_ACh*M4RACh);  // reactome:R-MMU-390673
  revreaction_9: AC5 + GaolfGTP -> AC5GaolfGTP; Spine*(kfAC5XGaolfGTP*AC5*GaolfGTP - krAC5XGaolfGTP*AC5GaolfGTP);  // reactome:R-MMU-170672
  revreaction_10: AC5 + $Ca -> AC5Ca; Spine*(kfAC5Ca*AC5*Ca - krAC5Ca*AC5Ca);  // hasPart GO:0008179 GO:0005509
  revreaction_11: AC5Ca + GaolfGTP -> AC5CaGaolfGTP; Spine*(kfAC5XGaolfGTP*AC5Ca*GaolfGTP - krAC5XGaolfGTP*AC5CaGaolfGTP);  // isVersionOf GO:0007189
  revreaction_12: GaiGTP + AC5Ca -> AC5CaGaiGTP; Spine*(kfAC5XGaiGTP*GaiGTP*AC5Ca - krAC5XGaiGTP*AC5CaGaiGTP);  // isVersionOf GO:0007193
  revreaction_13: GaiGTP + AC5 -> AC5GaiGTP; Spine*(kfAC5XGaiGTP*GaiGTP*AC5 - krAC5XGaiGTP*AC5GaiGTP);  // isVersionOf GO:0007193
  revreaction_14: GaiGTP + AC5GaolfGTP -> AC5GaolfGTPGaiGTP; Spine*(kfAC5XNCGaiGTP*GaiGTP*AC5GaolfGTP - krAC5XNCGaiGTP*AC5GaolfGTPGaiGTP);  // hasPart GO:0007193 GO:0007189
  revreaction_15: GaiGTP + AC5CaGaolfGTP -> AC5CaGaolfGTPGaiGTP; Spine*(kfAC5XNCGaiGTP*GaiGTP*AC5CaGaolfGTP - krAC5XNCGaiGTP*AC5CaGaolfGTPGaiGTP);  // hasPart GO:0007193 GO:0007189
  revreaction_16: AC5GaiGTP + GaolfGTP -> AC5GaolfGTPGaiGTP; Spine*(kfAC5XNCGaolfGTP*AC5GaiGTP*GaolfGTP - krAC5XNCGaolfGTP*AC5GaolfGTPGaiGTP);  // hasPart GO:0007193 GO:0007189
  revreaction_17: AC5CaGaiGTP + GaolfGTP -> AC5CaGaolfGTPGaiGTP; Spine*(kfAC5XNCGaolfGTP*AC5CaGaiGTP*GaolfGTP - krAC5XNCGaolfGTP*AC5CaGaolfGTPGaiGTP);  // hasPart GO:0007193 GO:0007189
  revreaction_18: AC5GaolfGTPGaiGTP + $ATP -> AC5GaolfGTPGaiGTP_ATP; Spine*(kfAC5GaolfGTPGaiGTP_ATP*AC5GaolfGTPGaiGTP*ATP - krAC5X_ATP*AC5GaolfGTPGaiGTP_ATP);  // hasPart GO:0007193 GO:0007189 GO:0005524
  revreaction_19: $ATP + AC5GaiGTP -> AC5GaiGTP_ATP; Spine*(kfAC5GaiGTP_ATP*ATP*AC5GaiGTP - krAC5X_ATP*AC5GaiGTP_ATP);  // isVersionOf GO:0007193; hasPart GO:0005524
  revreaction_20: AC5GaolfGTP + $ATP -> AC5GaolfGTP_ATP; Spine*(kfAC5GaolfGTP_ATP*AC5GaolfGTP*ATP - krAC5X_ATP*AC5GaolfGTP_ATP);  // isVersionOf GO:0007189; hasPart GO:0005524
  revreaction_21: AC5 + $ATP -> AC5_ATP; Spine*(kfAC5_ATP*AC5*ATP - krAC5X_ATP*AC5_ATP);  // hasPart GO:0005524 GO:0008179
  revreaction_22: AC5Ca + $ATP -> AC5Ca_ATP; Spine*(kfAC5Ca_ATP*AC5Ca*ATP - krAC5X_ATP*AC5Ca_ATP);  // hasPart GO:0005524 GO:0008179
  revreaction_23: AC5CaGaolfGTP + $ATP -> AC5CaGaolfGTP_ATP; Spine*(kfAC5CaGaolfGTP_ATP*AC5CaGaolfGTP*ATP - krAC5X_ATP*AC5CaGaolfGTP_ATP);  // isVersionOf GO:0007189; hasPart GO:0005524
  revreaction_24: AC5CaGaiGTP + $ATP -> AC5CaGaiGTP_ATP; Spine*(kfAC5CaGaiGTP_ATP*AC5CaGaiGTP*ATP - krAC5X_ATP*AC5CaGaiGTP_ATP);  // isVersionOf GO:0007193; hasPart GO:0005524
  revreaction_25: AC5CaGaolfGTPGaiGTP + $ATP -> AC5CaGaolfGTPGaiGTP_ATP; Spine*(kfAC5CaGaolfGTPGaiGTP_ATP*AC5CaGaolfGTPGaiGTP*ATP - krAC5X_ATP*AC5CaGaolfGTPGaiGTP_ATP);  // hasPart GO:0007193 GO:0007189 GO:0005524
  revreaction_26: GaolfGTP + AC5GaiGTP_ATP -> AC5GaolfGTPGaiGTP_ATP; Spine*(kfAC5XNCGaolfGTP*GaolfGTP*AC5GaiGTP_ATP - krAC5XNCGaolfGTP*AC5GaolfGTPGaiGTP_ATP);  // hasPart GO:0007193 GO:0007189
  revreaction_27: GaolfGTP + AC5CaGaiGTP_ATP -> AC5CaGaolfGTPGaiGTP_ATP; Spine*(kfAC5XNCGaolfGTP*GaolfGTP*AC5CaGaiGTP_ATP - krAC5XNCGaolfGTP*AC5CaGaolfGTPGaiGTP_ATP);  // hasPart GO:0007193 GO:0007189
  revreaction_28: GaolfGTP + AC5_ATP -> AC5GaolfGTP_ATP; Spine*(kfAC5XGaolfGTP*GaolfGTP*AC5_ATP - krAC5XGaolfGTP*AC5GaolfGTP_ATP);  // isVersionOf GO:0007189
  revreaction_29: GaolfGTP + AC5Ca_ATP -> AC5CaGaolfGTP_ATP; Spine*(kfAC5XGaolfGTP*GaolfGTP*AC5Ca_ATP - krAC5XGaolfGTP*AC5CaGaolfGTP_ATP);  // isVersionOf GO:0007189
  revreaction_30: $Ca + AC5_ATP -> AC5Ca_ATP; Spine*(kfAC5Ca*Ca*AC5_ATP - krAC5Ca*AC5Ca_ATP);  // hasPart GO:0008179 GO:0005509
  revreaction_31: AC5_ATP + GaiGTP -> AC5GaiGTP_ATP; Spine*(kfAC5XGaiGTP*AC5_ATP*GaiGTP - krAC5XGaiGTP*AC5GaiGTP_ATP);  // isVersionOf GO:0007193
  revreaction_32: GaiGTP + AC5GaolfGTP_ATP -> AC5GaolfGTPGaiGTP_ATP; Spine*(kfAC5XNCGaiGTP*GaiGTP*AC5GaolfGTP_ATP - krAC5XNCGaiGTP*AC5GaolfGTPGaiGTP_ATP);  // hasPart GO:0007193 GO:0007189
  revreaction_33: AC5Ca_ATP + GaiGTP -> AC5CaGaiGTP_ATP; Spine*(kfAC5XGaiGTP*AC5Ca_ATP*GaiGTP - krAC5XGaiGTP*AC5CaGaiGTP_ATP);  // isVersionOf GO:0007193
  revreaction_34: GaiGTP + AC5CaGaolfGTP_ATP -> AC5CaGaolfGTPGaiGTP_ATP; Spine*(kfAC5XNCGaiGTP*GaiGTP*AC5CaGaolfGTP_ATP - krAC5XNCGaiGTP*AC5CaGaolfGTPGaiGTP_ATP);  // hasPart GO:0007193 GO:0007189
  revreaction_35: cAMP + PKA -> PKAcAMP2; Spine*(kfPKA_2cAMP*cAMP*PKA - krPKA_2cAMP*PKAcAMP2);  // hasPart GO:0030552 GO:0051018
  revreaction_36: cAMP + PKAcAMP2 -> PKAcAMP4; Spine*(kfPKA2cAMP_2cAMP*cAMP*PKAcAMP2 - krPKA2cAMP_2cAMP*PKAcAMP4);  // hasPart GO:0030552 GO:0051018
  revreaction_37: PKAcAMP4 -> PKAc + PKAreg; Spine*(krPKAc_PKAr*PKAcAMP4 - kfPKAc_PKAr*PKAc*PKAreg);  // reactome:R-MMU-111925
  revreaction_38: cAMP + PDE4 -> PDE4_cAMP; Spine*(kfPDE4_cAMP*cAMP*PDE4 - krPDE4_cAMP*PDE4_cAMP);  // isVersionOf GO:0004115
  revreaction_39: PDE10 + 2 cAMP -> PDE10c; Spine*(kfPDE10_cAMP*PDE10*cAMP^2 - krPDE10_cAMP*PDE10c);  // isVersionOf GO:0004115
  revreaction_40: cAMP + PDE10 -> PDE10_cAMP; Spine*(kfcAMP_PDE10*cAMP*PDE10 - krcAMP_PDE10*PDE10_cAMP);  // isVersionOf GO:0004115
  revreaction_41: cAMP + PDE10c -> PDE10c_cAMP; Spine*(kfPDE10c_cAMP*cAMP*PDE10c - krPDE10c_cAMP*PDE10c_cAMP);  // isVersionOf GO:0004115
  revreaction_42: CaM + $Ca -> CaMCa2; Spine*(kfCaM_2Ca*CaM*Ca - krCaM_2Ca*CaMCa2);  // hasPart GO:0005516 GO:0005509
  revreaction_43: $Ca + CaMCa2 -> CaMCa4; Spine*(kfCaMCa2_2Ca*Ca*CaMCa2 - krCaMCa2_2Ca*CaMCa4);  // isVersionOf GO:0005509
  revreaction_44: PP2B + CaM -> PP2BCaM; Spine*(kfPP2B_CaM*PP2B*CaM - krPP2B_CaM*PP2BCaM);  // hasPart GO:0005516 GO:0030346
  revreaction_45: PP2B + CaMCa4 -> PP2Bc; Spine*(kfPP2B_CaMCa4*PP2B*CaMCa4 - krPP2B_CaMCa4*PP2Bc);  // isVersionOf GO:0033192; hasPart GO:0030346
  revreaction_46: PKAc + DARPP32 -> PKAc_D32; Spine*(kfPKAc_D32*PKAc*DARPP32 - krPKAc_D32*PKAc_D32);  // hasPart GO:0034236 GO:0008157
  revreaction_47: PKAc + B56PP2A -> PKAc_B56PP2A; Spine*(kfPKAc_B56PP2A*PKAc*B56PP2A - krPKAc_B56PP2A*PKAc_B56PP2A);  // hasPart GO:0034236 GO:0051721
  revreaction_48: D32p34 + PP1 -> PP1D32p34; Spine*(kfPP1_D32p34*D32p34*PP1 - krPP1_D32p34*PP1D32p34);  // isVersionOf GO:0008157
  revreaction_49: CDK5 + DARPP32 -> CDK5_D32; Spine*(kfCDK5_D32*CDK5*DARPP32 - krCDK5_D32*CDK5_D32);  // hasPart GO:0008157; isVersionOf GO:0016310
  revreaction_50: D32p75 + PKAc -> PKAcD32p75; Spine*(kfPKAc_D32p75*D32p75*PKAc - krPKAc_D32p75*PKAcD32p75);  // hasPart GO:0034236 GO:0019888
  revreaction_51: B72PP2A + $Ca -> B72PPA2Ca; Spine*(kfB72PP2A_Ca*B72PP2A*Ca - krB72PP2A_Ca*B72PPA2Ca);  // hasPart GO:0005509 GO:0051721
  revreaction_52: B56PP2Ap + D32p75 -> B56PP2Ap_D32p75; Spine*(kfB56PP2Ap_D32p75*B56PP2Ap*D32p75 - krB56PP2Ap_D32p75*B56PP2Ap_D32p75);  // hasPart GO:0051721 GO:0008157
  revreaction_53: B72PP2A + D32p75 -> B72PP2A_D32p75; Spine*(kfB72PP2A_D32p75*B72PP2A*D32p75 - krB72PP2A_D32p75*B72PP2A_D32p75);  // hasPart GO:0051721 GO:0019888
  revreaction_54: D32p75 + B72PPA2Ca -> B72PP2ACa_D32p75; Spine*(kfB72PP2ACa_D32p75*D32p75*B72PPA2Ca - krB72PP2ACa_D32p75*B72PP2ACa_D32p75);  // hasPart GO:0051721 GO:0019888
  revreaction_55: D32p34 + PP2Bc -> PP2Bc_D32p34; Spine*(kfPP2Bc_D32p34*D32p34*PP2Bc - krPP2Bc_D32p34*PP2Bc_D32p34);  // hasPart GO:0030346 GO:0019888
  revreaction_56: PP2BCaM + $Ca -> PP2BCaMCa2; Spine*(kfPP2BCaM_2Ca*PP2BCaM*Ca - krPP2BCaM_2Ca*PP2BCaMCa2);  // hasPart GO:0051721 GO:0005509; isVersionOf GO:0033192
  revreaction_57: PP2BCaMCa2 + $Ca -> PP2Bc; Spine*(kfPP2BCaMCa2_2Ca*PP2BCaMCa2*Ca - krPP2BCaMCa2_2Ca*PP2Bc);  // hasPart GO:0005509 GO:0051721; isVersionOf GO:0033192 GO:0004723
  revreaction_58: PP2B + CaMCa2 -> PP2BCaMCa2; Spine*(kfPP2B_CaMCa2*PP2B*CaMCa2 - krPP2B_CaMCa2*PP2BCaMCa2);  // isHomologTo reactome:R-HSA-201783
  revreaction_59: D32p75 + B56PP2A -> B56PP2A_D32p75; Spine*(kfB56PP2A_D32p75*D32p75*B56PP2A - krB56PP2A_D32p75*B56PP2A_D32p75);  // hasPart GO:0051721 GO:0019888
  revreaction_60: D32p34 + B72PPA2Ca -> B72PP2ACa_D32p34; Spine*(kfB72PP2A_D32p34*D32p34*B72PPA2Ca - krB72PP2A_D32p34*B72PP2ACa_D32p34);  // hasPart GO:0051721 GO:0019888
  revreaction_61: D32p34 + B72PP2A -> B72PP2A_D32p34; Spine*(kfB72PP2A_D32p34*D32p34*B72PP2A - krB72PP2A_D32p34*B72PP2A_D32p34);  // hasPart GO:0051721 GO:0019888
  irrevreaction_1: GaolfGTP => GaolfGDP; Spine*kGaolfGTPase*GaolfGTP;  // isVersionOf GO:0003924
  // The second term is now obsolete, but more accurately describes this reaction.
  irrevreaction_2: D1RDAGolf => Gbgolf + D1RDA + GaolfGTP; Spine*kactGolf*D1RDAGolf;  // isVersionOf GO:0001664 GO:0007201
  irrevreaction_3: GaolfGDP + Gbgolf => Golf; Spine*kGolfback*GaolfGDP*Gbgolf;  // isVersionOf GO:0001664; hasPart GO:0031681 GO:0001965
  irrevreaction_4: GaiGTP => GaiGDP; Spine*kGiGTPase*GaiGTP;  // isVersionOf GO:0003924
  irrevreaction_5: Gbgi + GaiGDP => Gi; Spine*kGiback*Gbgi*GaiGDP;  // isVersionOf GO:0001664; hasPart GO:0001965 GO:0031683
  // The second term is now obsolete, but more accurately describes this reaction.
  irrevreaction_6: M4RAChGi => GaiGTP + M4RACh + Gbgi; Spine*kactGi*M4RAChGi;  // isVersionOf GO:0001664 GO:0007201
  // This identifier may not work in the pathway browser, but works properly when entered into reactome.org search bar.
  irrevreaction_7: AC5GaolfGTP_ATP => cAMP + AC5GaolfGTP; Spine*kcatAC5GaolfGTP_ATP*AC5GaolfGTP_ATP;  // reactome:R-MMU-170676
  // This identifier may not work in the pathway browser, but works properly when entered into reactome.org search bar.
  irrevreaction_8: cAMP + AC5GaolfGTP => AC5GaolfGTP_ATP; Spine*kicatAC5GaolfGTP_ATP*cAMP*AC5GaolfGTP;  // isVersionOf reactome:R-MMU-170676
  irrevreaction_9: AC5_ATP => cAMP + AC5; Spine*kcatAC5_ATP*AC5_ATP;  // reactome:R-MMU-111930
  irrevreaction_10: cAMP + AC5 => AC5_ATP; Spine*kicatAC5_ATP*cAMP*AC5;  // isVersionOf reactome:R-MMU-111930
  // This identifier may not work in the pathway browser, but works properly when entered into reactome.org search bar.
  irrevreaction_11: AC5GaiGTP_ATP => cAMP + AC5GaiGTP; Spine*kcatAC5GaiGTP_ATP*AC5GaiGTP_ATP;  // reactome:R-MMU-170676
  // This identifier may not work in the pathway browser, but works properly when entered into reactome.org search bar.
  irrevreaction_12: cAMP + AC5GaiGTP => AC5GaiGTP_ATP; Spine*kicatAC5GaiGTP_ATP*cAMP*AC5GaiGTP;  // isVersionOf reactome:R-MMU-170676
  // This identifier may not work in the pathway browser, but works properly when entered into reactome.org search bar.
  irrevreaction_13: AC5GaolfGTPGaiGTP_ATP => cAMP + AC5GaolfGTPGaiGTP; Spine*kcatAC5GaolfGTPGaiGTP_ATP*AC5GaolfGTPGaiGTP_ATP;  // reactome:R-MMU-170676
  // This identifier may not work in the pathway browser, but works properly when entered into reactome.org search bar.
  irrevreaction_14: cAMP + AC5GaolfGTPGaiGTP => AC5GaolfGTPGaiGTP_ATP; Spine*kicatAC5GaolfGTPGaiGTP_ATP*cAMP*AC5GaolfGTPGaiGTP;  // isVersionOf reactome:R-MMU-170676
  // This identifier may not work in the pathway browser, but works properly when entered into reactome.org search bar.
  irrevreaction_15: AC5CaGaolfGTPGaiGTP_ATP => cAMP + AC5CaGaolfGTPGaiGTP; Spine*kcatAC5CaGaolfGTPGaiGTP_ATP*AC5CaGaolfGTPGaiGTP_ATP;  // reactome:R-MMU-170676
  // This identifier may not work in the pathway browser, but works properly when entered into reactome.org search bar.
  irrevreaction_16: cAMP + AC5CaGaolfGTPGaiGTP => AC5CaGaolfGTPGaiGTP_ATP; Spine*kicatAC5CaGaolfGTPGaiGTP_ATP*cAMP*AC5CaGaolfGTPGaiGTP;  // isVersionOf reactome:R-MMU-170676
  // This identifier may not work in the pathway browser, but works properly when entered into reactome.org search bar.
  irrevreaction_17: AC5CaGaiGTP_ATP => cAMP + AC5CaGaiGTP; Spine*kcatAC5CaGaiGTP_ATP*AC5CaGaiGTP_ATP;  // reactome:R-MMU-170676
  // This identifier may not work in the pathway browser, but works properly when entered into reactome.org search bar.
  irrevreaction_18: cAMP + AC5CaGaiGTP => AC5CaGaiGTP_ATP; Spine*kicatAC5CaGaiGTP_ATP*cAMP*AC5CaGaiGTP;  // isVersionOf reactome:R-MMU-170676
  irrevreaction_19: AC5Ca_ATP => cAMP + AC5Ca; Spine*kcatAC5Ca_ATP*AC5Ca_ATP;  // reactome:R-MMU-442715
  irrevreaction_20: cAMP + AC5Ca => AC5Ca_ATP; Spine*kicatAC5Ca_ATP*cAMP*AC5Ca;  // isVersionOf reactome:R-MMU-442715
  // This identifier may not work in the pathway browser, but works properly when entered into reactome.org search bar.
  irrevreaction_21: AC5CaGaolfGTP_ATP => cAMP + AC5CaGaolfGTP; Spine*kcatAC5CaGaolfGTP_ATP*AC5CaGaolfGTP_ATP;  // reactome:R-MMU-170676
  // This identifier may not work in the pathway browser, but works properly when entered into reactome.org search bar.
  irrevreaction_22: cAMP + AC5CaGaolfGTP => AC5CaGaolfGTP_ATP; Spine*kicatAC5CaGaolfGTP_ATP*cAMP*AC5CaGaolfGTP;  // isVersionOf reactome:R-MMU-170676
  irrevreaction_23: AC5GaolfGTP => AC5 + GaolfGDP; Spine*krgso*AC5GaolfGTP;  // isVersionOf GO:0003924
  irrevreaction_24: AC5CaGaolfGTP => AC5Ca + GaolfGDP; Spine*krgso*AC5CaGaolfGTP;  // isVersionOf GO:0003924
  irrevreaction_25: AC5CaGaiGTP => AC5Ca + GaiGDP; Spine*krgsi*AC5CaGaiGTP;  // isVersionOf GO:0003924
  irrevreaction_26: AC5GaiGTP => AC5 + GaiGDP; Spine*krgsi*AC5GaiGTP;  // isVersionOf GO:0003924
  irrevreaction_27: AC5GaolfGTPGaiGTP => AC5GaiGTP + GaolfGDP; Spine*krgso*AC5GaolfGTPGaiGTP;  // isVersionOf GO:0003924
  irrevreaction_28: AC5GaolfGTPGaiGTP => AC5GaolfGTP + GaiGDP; Spine*krgsi*AC5GaolfGTPGaiGTP;  // isVersionOf GO:0003924
  irrevreaction_29: AC5CaGaolfGTPGaiGTP => AC5CaGaiGTP + GaolfGDP; Spine*krgso*AC5CaGaolfGTPGaiGTP;  // isVersionOf GO:0003924
  irrevreaction_30: AC5CaGaolfGTPGaiGTP => AC5CaGaolfGTP + GaiGDP; Spine*krgsi*AC5CaGaolfGTPGaiGTP;  // isVersionOf GO:0003924
  irrevreaction_31: AC5GaolfGTPGaiGTP_ATP => GaiGDP + AC5GaolfGTP_ATP; Spine*krgsi*AC5GaolfGTPGaiGTP_ATP;  // isVersionOf GO:0003924
  irrevreaction_32: AC5GaiGTP_ATP => AC5_ATP + GaiGDP; Spine*krgsi*AC5GaiGTP_ATP;  // isVersionOf GO:0003924
  irrevreaction_33: AC5GaolfGTPGaiGTP_ATP => AC5GaiGTP_ATP + GaolfGDP; Spine*krgso*AC5GaolfGTPGaiGTP_ATP;  // isVersionOf GO:0003924
  irrevreaction_34: AC5GaolfGTP_ATP => AC5_ATP + GaolfGDP; Spine*krgso*AC5GaolfGTP_ATP;  // isVersionOf GO:0003924
  irrevreaction_35: AC5CaGaolfGTP_ATP => AC5Ca_ATP + GaolfGDP; Spine*krgso*AC5CaGaolfGTP_ATP;  // isVersionOf GO:0003924
  irrevreaction_36: AC5CaGaolfGTPGaiGTP_ATP => AC5CaGaolfGTP_ATP + GaiGDP; Spine*krgsi*AC5CaGaolfGTPGaiGTP_ATP;  // isVersionOf GO:0003924
  irrevreaction_37: AC5CaGaiGTP_ATP => AC5Ca_ATP + GaiGDP; Spine*krgsi*AC5CaGaiGTP_ATP;  // isVersionOf GO:0003924
  irrevreaction_38: AC5CaGaolfGTPGaiGTP_ATP => AC5CaGaiGTP_ATP + GaolfGDP; Spine*krgso*AC5CaGaolfGTPGaiGTP_ATP;  // isVersionOf GO:0003924
  irrevreaction_39: PDE4_cAMP => PDE4 + $AMP; Spine*kcatPDE4_cAMP*PDE4_cAMP;  // isVersionOf GO:0004115
  irrevreaction_40: PDE10_cAMP => PDE10 + $AMP; Spine*kcatcAMP_PDE10*PDE10_cAMP;  // isVersionOf GO:0004115
  irrevreaction_41: PDE10c_cAMP => PDE10c + $AMP; Spine*kcatPDE10c_cAMP*PDE10c_cAMP;  // isVersionOf GO:0004115
  irrevreaction_42: PKAc_D32 => D32p34 + PKAc; Spine*kcatPKAc_D32*PKAc_D32;  // isVersionOf GO:0004672
  irrevreaction_43: PKAc_B56PP2A => B56PP2Ap + PKAc; Spine*kcatPKAc_B56PP2A*PKAc_B56PP2A;  // isVersionOf GO:0004672
  irrevreaction_44: CDK5_D32 => CDK5 + D32p75; Spine*kcatCDK5_D32*CDK5_D32;  // isVersionOf GO:0097472
  irrevreaction_45: B56PP2Ap_D32p75 => B56PP2Ap + DARPP32; Spine*kcatB56PP2Ap_D32p75*B56PP2Ap_D32p75;  // isVersionOf GO:0004722
  irrevreaction_46: B72PP2A_D32p75 => B72PP2A + DARPP32; Spine*kcatB72PP2A_D32p75*B72PP2A_D32p75;  // isVersionOf GO:0004722
  irrevreaction_47: B72PP2ACa_D32p75 => B72PPA2Ca + DARPP32; Spine*kcatB72PP2ACa_D32p75*B72PP2ACa_D32p75;  // isVersionOf GO:0004722
  irrevreaction_48: B56PP2A_D32p75 => B56PP2A + DARPP32; Spine*kcatB56PP2A_D32p75*B56PP2A_D32p75;  // isVersionOf GO:0004722
  irrevreaction_49: B72PP2ACa_D32p34 => B72PPA2Ca + DARPP32; Spine*kcatB72PP2A_D32p34*B72PP2ACa_D32p34;  // isVersionOf GO:0004722
  irrevreaction_50: B72PP2A_D32p34 => DARPP32 + B72PP2A; Spine*kcatB72PP2A_D32p34*B72PP2A_D32p34;  // isVersionOf GO:0004722
  irrevreaction_51: PP2Bc_D32p34 => DARPP32 + PP2Bc; Spine*kcatPP2Bc_D32p34*PP2Bc_D32p34;  // isVersionOf GO:0033192
  irrevreaction_52: B56PP2Ap => B56PP2A; Spine*kdpB56PP2Ap*B56PP2Ap;  // isVersionOf GO:0034049

  // Unit definitions:
  unit substance = 1e-9 mole;
  unit volume = litre;
  unit area = metre^2;
end
