// SBML level 2 version 4
// dcterms:bibliographicCitation: urn:miriam:pubmed:32322102

function Rate_Law_for_Susceptible_to_Infected(S, alpha, I, beta, D, gamma, A, delta, R)
  S*(alpha*I + beta*D + gamma*A + delta*R);
end

model Giordano2020___SIDARTHE_model_of_COVID_19_spread_in_Italy()
  // Giordano2020 - SIDARTHE model of COVID-19 spread in Italy
  // In Italy, 128,948 confirmed cases and 15,887 deaths of people who tested positive for SARS-CoV-2 were registered as of 5 April 2020. Ending the global SARS-CoV-2 pandemic requires implementation of multiple population-wide strategies, including social distancing, testing and contact tracing. We propose a new model that predicts the course of the epidemic to help plan an effective control strategy. The model considers eight stages of infection: susceptible (S), infected (I), diagnosed (D), ailing (A), recognized (R), threatened (T), healed (H) and extinct (E), collectively termed SIDARTHE. Our SIDARTHE model discriminates between infected individuals depending on whether they have been diagnosed and on the severity of their symptoms. The distinction between diagnosed and non-diagnosed individuals is important because the former are typically isolated and hence less likely to spread the infection. This delineation also helps to explain misperceptions of the case fatality rate and of the epidemic spread. We compare simulation results with real data on the COVID-19 epidemic in Italy, and we model possible scenarios of implementation of countermeasures. Our results demonstrate that restrictive social-distancing measures will need to be combined with widespread testing and contact tracing to end the ongoing COVID-19 pandemic.
  // isDescribedBy pubmed:32322102
  // hasTaxon taxonomy:2697049
  // hasTaxon taxonomy:9606
  // hasProperty DOID:0080600 ido:0000503 mamo:MAMO_0000046
  // biomodels.db:MODEL2007280002 biomodels.db:BIOMD0000000955

  // Compartments:
  compartment Italy = 1;  // isVersionOf ncit:C16761

  // Species:
  species Susceptible in Italy = 0.9999963;  // isVersionOf ido:0000514; hasProperty ido:0000468; hasProperty ido:0000659
  // Infected ND AS - non-diagnosed, asymptomatic (I)
  species Infected in Italy = 3.33333333e-6;  // isVersionOf ido:0000569; isVersionOf ido:0000511; hasProperty ncit:C113725
  // Infected D AS - diagnosed, asymptomatic (D)
  species Diagnosed in Italy = 3.33333333e-7;  // isVersionOf ido:0000511; hasProperty ncit:C15220; hasProperty ncit:C3833
  // Infected ND S - non-diagnosed, symptomatic (A)
  species Ailing in Italy = 1.66666666e-8;  // isVersionOf ido:0000573; isVersionOf ido:0000511; hasProperty ncit:C113725
  // Infected D S - diagnosed, symptomatic (R)
  species Recognized in Italy = 3.33333333e-8;  // isVersionOf ido:0000511; isVersionOf ido:0000573; hasProperty ncit:C25587
  // Infected D IC - diagnosed, life-threatening symptoms (T)
  species Threatened in Italy = 0;  // isVersionOf ido:0000573; hasProperty ncit:C15220; hasProperty ncit:C25467
  species Healed in Italy = 0;  // hasProperty ido:0000621
  species Extinct in Italy = 0;  // ncit:C28554

  // Parameters:
  alpha = 0.57 unit_0;
  beta = 0.011 unit_0;
  gamma = 0.456 unit_0;
  delta = 0.011 unit_0;
  epsilon = 0.171 unit_1;
  theta = 0.371 unit_1;
  zeta = 0.125 unit_1;
  eta = 0.125 unit_1;
  mu = 0.017 unit_1;
  nu = 0.027 unit_1;
  tau = 0.01 unit_1;
  lambda = 0.034 unit_1;
  kappa = 0.017 unit_1;
  rho = 0.034 unit_1;
  sigma = 0.017 unit_1;
  xi = 0.017 unit_1;
  Event_trigger_Fig3b = 0 unit_2;
  Event_trigger_Fig3d = 0 unit_2;
  Event_trigger_Fig4b = 0 unit_2;
  Event_trigger_Fig4d = 1 unit_2;
  epsilon_modifier = 0 unit_2;
  alpha_modifier = 0 unit_2;
  Initial_for_Event_trigger_Fig3b = Event_trigger_Fig3b;
  Initial_for_Event_trigger_Fig3d = Event_trigger_Fig3d;
  Initial_for_Event_trigger_Fig4b = Event_trigger_Fig4b;
  Initial_for_Event_trigger_Fig4d = Event_trigger_Fig4d;
  Initial_for_alpha_modifier = alpha_modifier;
  Initial_for_epsilon_modifier = epsilon_modifier;

  // Reactions:
  Susceptible_to_Infected: Susceptible => Infected; Italy*Rate_Law_for_Susceptible_to_Infected(Susceptible, alpha, Infected, beta, Diagnosed, gamma, Ailing, delta, Recognized);  // modifiers: Diagnosed, Ailing, Recognized; isVersionOf DOID:0080600; isVersionOf ncit:C171133
  Infected_to_Diagnosed: Infected => Diagnosed; Italy*epsilon*Infected;  // isVersionOf DOID:0080600; isVersionOf ncit:C15220
  Infected_to_Ailing: Infected => Ailing; Italy*zeta*Infected;  // isVersionOf DOID:0080600; isVersionOf ncit:C168447
  Infected_to_Healed: Infected => Healed; Italy*lambda*Infected;  // isVersionOf ncit:C25746
  Diagnosed_to_Recognized: Diagnosed => Recognized; Italy*eta*Diagnosed;  // isVersionOf DOID:0080600; isVersionOf ncit:C168447; isVersionOf ncit:C15220
  Diagnosed_to_Healed: Diagnosed => Healed; Italy*rho*Diagnosed;  // isVersionOf ncit:C25746
  Ailing_to_Recognised: Ailing => Recognized; Italy*theta*Ailing;  // isVersionOf DOID:0080600; isVersionOf ncit:C15220
  Ailing_to_Healed: Ailing => Healed; Italy*kappa*Ailing;  // isVersionOf ncit:C25746
  Ailing_to_Threatened: Ailing => Threatened; Italy*mu*Ailing;  // isVersionOf DOID:0080600; isVersionOf meddra:10049438
  Recognised_to_Threatened: Recognized => Threatened; Italy*nu*Recognized;  // isVersionOf DOID:0080600; isVersionOf meddra:10049438
  Recognised_to_Healed: Recognized => Healed; Italy*xi*Recognized;  // isVersionOf ncit:C25746
  Threatened_to_Extinct: Threatened => Extinct; Italy*tau*Threatened;  // isVersionOf ncit:C28554; isVersionOf DOID:0080600
  Threatened_to_Healed: Threatened => Healed; Italy*sigma*Threatened;  // isVersionOf ncit:C25746

  // Events:
  Day_4: at (time > 4): alpha = 0.422, beta = 0.0057, gamma = 0.285, delta = 0.0057;
  Day_12: at (time > 12): epsilon = 0.143;
  Day_22: at (time > 22): alpha = 0.36, beta = 0.005, gamma = 0.2, delta = 0.005, mu = 0.008, nu = 0.015, lambda = 0.08, rho = 0.017, kappa = 0.017, xi = 0.017, sigma = 0.017, zeta = 0.034, eta = 0.034;
  Day_28: at (time > 28): alpha = 0.21, gamma = 0.11;
  Day_38: at (time > 38): rho = 0.02, xi = 0.02, sigma = 0.01, zeta = 0.025, epsilon = 0.2, eta = 0.025, kappa = 0.02;
  Day_50: at (time > 50): alpha = 0.209*Initial_for_alpha_modifier + 0.252*Initial_for_Event_trigger_Fig3b + 0.105*Initial_for_Event_trigger_Fig3d + 0.42*Initial_for_Event_trigger_Fig4d, epsilon = 0.2*Initial_for_epsilon_modifier + 0.4*Initial_for_Event_trigger_Fig4b + 0.6*Initial_for_Event_trigger_Fig4d;

  // Unit definitions:
  unit volume = 1e-3 litre;
  unit time = 86400 second;
  unit substance = item;
  unit unit_0 = 1 / (8640 second * item); unit_0 is "1/(#*d)";
  unit unit_1 = 1 / (8640 second); unit_1 is "1/d";
  unit unit_2 = dimensionless^0; unit_2 is "dimensionless";
end
