// SBML level 2 version 4
// dcterms:bibliographicCitation: urn:miriam:pubmed:26187095

function rateOf(a)
  NaN;
end

model Terentyeva2015___Mechanisms_of_XII_activation()
  // Terentyeva2015 - Mechanisms of XII activation
  // Mathematical model of the mechanism and kinetics of blood coagulation factor XII.
  // isPartOf GO:0007596
  // isDescribedBy pubmed:26187095

  // Compartments:
  compartment compartment = 1;

  // Species:
  species $XIIa in compartment = 10;
  species $XIIa_activation in compartment = 0;
  species $XIIa_fragmentation in compartment = 100;
  species $XIIa_surface_induced in compartment = 0; XIIa_surface_induced is "XIIa_surface-induced";
  species $XIIa_autoactivation in compartment = 0;
  species $XII_bound in compartment;
  species $XII in compartment = 285;
  species $S in compartment = 50;
  species A in compartment = 50;

  // Parameters:
  k_spont = 0.5;
  k_bound = 12;
  k_free = 0;
  k_fragm = 8;
  N = 76;
  k_12 = 170;
  k_A = 307000;

  // Assignment rules:
  XIIf := XIIa_fragmentation;
  Amidolytic := XIIa + XIIf;
  XII_bound := S*XII/(k_12/N*(1 + XII/k_12 + A/k_A) + S);

  // Rate rules:
  XIIa' = rateOf(XIIa_activation) + rateOf(XIIa_fragmentation);
  XIIa_activation' = rateOf(XIIa_surface_induced) + rateOf(XIIa_autoactivation);
  XIIa_fragmentation' = -k_fragm*XIIa_fragmentation*XIIa/S;
  XIIa_surface_induced' = k_spont*XII_bound;
  XIIa_autoactivation' = k_bound*XII_bound*XIIa/S + k_free*XII*XIIa;
  XII' = -rateOf(XIIa_surface_induced) - rateOf(XIIa_autoactivation);
  S' = -(1/N)*rateOf(XII);

  // Unit definitions:
  unit volume = 1e-3 litre;
  unit time = 60 second;
  unit substance = 1e-9 mole;
end
