// SBML level 2 version 4

model New_Model()
  // Bedessem2014 - HiF-1 a -mediated response to hypoxia on the G1/S transition

  // Compartments:
  compartment compartment = 1;

  // Species:
  species $m in compartment = 5;
  species $cycD in compartment = 0.1;
  species $Rb in compartment = 1;
  species $cycE in compartment = 0.01;
  species $SCF in compartment = 0.9;
  species $E2F in compartment = 0.1;

  // Parameters:
  a_1 = 0.51;
  a_2 = 1;
  a_3_H_0 = 0.0085;
  beta_1 = 2.5;
  b_1 = 0.018;
  b_2 = 0.5;
  b_3 = 1;
  J_1 = 0.04;
  J_2 = 0.04;
  d_1 = 0.2;
  d_2 = 0.1;
  e_2 = 14;
  e_1 = 1;
  alpha = 0.005;
  g_1 = 0.016;
  E2F_tot = 1;
  cycE_threshold = 0.15;
  SCF_threshold = 0.004;
  P = 1;
  d_3 = 0;
  Metabolite_0_0 = m; Metabolite_0_0 is "Initial for m";

  // Assignment rules:
  E2F_Rb := 2*E2F_tot*Rb/(E2F_tot + Rb + ((E2F_tot + Rb)^2 - 4*E2F_tot*Rb)^0.5);
  E2F_A := (E2F_tot - E2F_Rb)*E2F/E2F_tot;

  // Rate rules:
  m' = alpha*m*(1 - m/Metabolite_0_0);
  cycD' = a_1 - a_3_H_0*exp(beta_1*(1 - P)) - a_2*cycD;
  Rb' = d_2 - (d_3 + d_1*cycD)*Rb;
  cycE' = b_1*m*E2F_A - b_2*cycE - b_3*cycE*SCF;
  SCF' = e_1*(1 - SCF)/(J_1 + 1 - SCF) - e_2*SCF*cycE/(J_2 + SCF);
  E2F' = g_1*(E2F_tot - E2F);

  // Unit definitions:
  unit volume = 1e-3 litre;
  unit time = 60 second;
  unit substance = 1e-3 mole;
end
