// SBML level 2 version 4
// dcterms:bibliographicCitation: urn:miriam:doi:10.1080/23737867.2018.1440978

function Function_for_Cancer_Cells_Death_T_Cells(eta, C, T)
  eta*C*T;
end

function Function_for_T_Cells_Activation_IL_12(F_1_Q, lambda_TI_12, T_N, I_12, K_I_12)
  F_1_Q*(lambda_TI_12*T_N*I_12/(K_I_12 + I_12));
end
Function_for_T_Cells_Activation_IL_12 is "Function_for_T_Cells_Activation_IL-12";

function Function_for_T_Cells_Stimulation_IL_2(F_1_Q, lambda_TI_2, T, I_2, K_I_2)
  F_1_Q*(lambda_TI_2*T*I_2/(K_I_2 + I_2));
end
Function_for_T_Cells_Stimulation_IL_2 is "Function_for_T_Cells_Stimulation_IL-2";

function Function_for_Cancer_Cells_Growth(lambda_C, C, C_K)
  lambda_C*C*(1 - C/C_K);
end

function Function_for_Anti_PD_1_Effective_Level(A)
  A;
end
Function_for_Anti_PD_1_Effective_Level is "Function_for_Anti-PD-1_Effective_Level";

function Function_for_Anti_PD_1_Depletion_PD_1_Blocking(mu_PA, P, A)
  mu_PA*P*A;
end
Function_for_Anti_PD_1_Depletion_PD_1_Blocking is "Function_for_Anti-PD-1_Depletion_PD-1_Blocking";

model Nikolopoulou2018___Tumour_immune_dynamics_with_an_immune_checkpoint_inhibitor()
  // Nikolopoulou2018 - Tumour-immune dynamics with an immune checkpoint inhibitor
  // This is a mathematical model investigating the effects of continuous and intermittent PD-L1 and anti-PD-L1 therapy upon tumor-immune dynamics.
  // isDescribedBy doi:10.1080/23737867.2018.1440978
  // hasProperty mamo:MAMO_0000046
  // hasProperty ncit:C94697

  // Compartments:
  compartment compartment = 1;

  // Species:
  species C in compartment = 0.3968;
  species T in compartment = 0.006;
  species A in compartment = 0;

  // Parameters:
  lambda_C = 0.425;
  C_K = 0.8725;
  eta = 57.5;
  lambda_TI_12 = 8.81;
  T_N = 0.0006;
  I_12 = 1.5e-10;
  K_I_12 = 1.5e-10;
  lambda_TI_2 = 0.5;
  I_2 = 2.37e-11;
  K_I_2 = 2.37e-11;
  K_TQ = 1.365e-18;
  rho_L = 1.1615e-6;
  rho_P = 5.84e-7;
  epsilon_C = 50.5;
  d_T = 0.025;
  mu_PA = 105954000;
  gamma_A = 1e-10;
  d_A = 0.7115;
  gamma = 10;
  sigma = 0.002;
  alpha_PL = 1e-6;
  d_Q = 1;
  Initial_for_K_TQ = K_TQ;
  Initial_for_epsilon_C = epsilon_C;
  Initial_for_gamma = gamma;
  Initial_for_rho_L = rho_L;
  Initial_for_rho_P = rho_P;

  // Assignment rules:
  P := (Initial_for_rho_P - Initial_for_gamma*A)*T;
  kappa := sigma*Initial_for_rho_L;
  Q := kappa*P*(T + Initial_for_epsilon_C*C);
  F_1_Q := 1/(1 + Q/Initial_for_K_TQ);

  // Reactions:
  Cancer_Cells_Death_T_Cells: C => ; compartment*Function_for_Cancer_Cells_Death_T_Cells(eta, C, T);  // modifiers: T
  Cancer_Cells_Growth: => C; compartment*Function_for_Cancer_Cells_Growth(lambda_C, C, C_K);
  T_Cells_Activation_IL_12: => T; compartment*Function_for_T_Cells_Activation_IL_12(F_1_Q, lambda_TI_12, T_N, I_12, K_I_12); T_Cells_Activation_IL_12 is "T_Cells_Activation_IL-12";
  T_Cells_Stimulation_IL_2: => T; compartment*Function_for_T_Cells_Stimulation_IL_2(F_1_Q, lambda_TI_2, T, I_2, K_I_2); T_Cells_Stimulation_IL_2 is "T_Cells_Stimulation_IL-2";
  T_Cell_Death: T => ; compartment*d_T*T;
  Anti_PD_1_Effective_Level: => A; compartment*Function_for_Anti_PD_1_Effective_Level(A); Anti_PD_1_Effective_Level is "Anti-PD-1_Effective_Level";
  Anti_PD_1_Depletion_PD_1_Blocking: A => ; compartment*Function_for_Anti_PD_1_Depletion_PD_1_Blocking(mu_PA, P, A); Anti_PD_1_Depletion_PD_1_Blocking is "Anti-PD-1_Depletion_PD-1_Blocking";
  Anti_PD_1_Natural_Degradation: A => ; compartment*d_A*A; Anti_PD_1_Natural_Degradation is "Anti-PD-1_Natural_Degradation";

  // Unit definitions:
  unit volume = 1e-3 litre;
  unit time = 86400 second;
  unit substance = item;
end
