// SBML level 2 version 4
// dcterms:bibliographicCitation: urn:miriam:pubmed:18271720

function function_for_induced_production(k1, S, Tmax, T)
  k1*S*(Tmax - T);
end

function function_for_S_continuous_production(s, Smax, S)
  s*(Smax - S);
end

function function_for_continuous_production(s, Tmax, T)
  s*(Tmax - T);
end

function function_for_inter_compartment_exchange(theta, S, T)
  theta*(S - T);
end
function_for_inter_compartment_exchange is "function for inter-compartment exchange";

function function_for_S_consumption_in_synapse(y, theta, S, T)
  y*theta*(S - T);
end

model Bidot2008___Mathematical_modeling_of_T_cell_activation_kinetcis()
  // Bidot2008 - Mathematical modelling of T cell activation kinetics
  // Mathematical modeling representing Tcell actiavtion regualtion by TCR, IL2 and other players.
  // isDescribedBy pubmed:18271720

  // Compartments:
  compartment TCell = 1;
  compartment Synapse = 1;

  // Species:
  // CD4/8 Coreceptor
  // CD4: 40000 molecules/cell
  // CD8: 60000 - 90000 molecules/cell
  species CD4_8 in TCell = 40000; CD4_8 is "CD4/8";
  // TCR/p-MHC complex
  species TL in TCell = 1;
  // TCR/p-MHC complex activated
  species TL_0 in TCell = 1; TL_0 is "TL*";
  // p-MHC as ligand
  species L in TCell = 10;
  // TCR
  species T in TCell = 1;
  species T_0 in TCell = 1; T_0 is "T*";
  // Activated TCR internalized
  species T_i in TCell = 1; T_i is "T*i";
  species CD69 in TCell = 1;
  species IL2Rm in TCell = 1;
  species IL2 in TCell = 1;
  species CD28 in TCell = 1;
  species CD28_CD80 in TCell = 1; CD28_CD80 is "CD28-CD80";
  species CD80 in TCell = 50000;
  species CD28_0 in TCell = 1; CD28_0 is "CD28*";
  species CD28_i in TCell = 1; CD28_i is "CD28*i";
  species CD69_CD69L in TCell = 1; CD69_CD69L is "CD69-CD69L";
  species CD69L in TCell = 0;
  species CD69_0 in TCell = 1; CD69_0 is "CD69*";
  species CD69_i in TCell = 1; CD69_i is "CD69*i";
  species IL2_IL2Rm in TCell = 1; IL2_IL2Rm is "IL2-IL2Rm";
  species IL2_IL2Rm_0 in TCell = 1; IL2_IL2Rm_0 is "IL2-IL2Rm*";
  species IL2_IL2Rm_i in TCell = 1; IL2_IL2Rm_i is "IL2-IL2Rm*i";
  species IL2Rs in TCell = 1;
  species IL2_IL2Rs in TCell = 1; IL2_IL2Rs is "IL2-IL2Rs";
  // TCR membrane concentration outside the synapse
  species S in TCell = 1;

  // Parameters:
  theta = 0.0055;
  delta = 0.25;
  k1 = 60;
  koff_TL = 0.01;
  kd1 = 0.01;
  ke1 = 0.01;
  kf2 = 0.01;
  kf3 = 0.015;
  kf4 = 0.015;
  kf5 = 150;
  ki1 = 0.00156;
  km1 = 0.001;
  koff_CD28 = 1.6;
  koff_CD4_8 = 0.05; koff_CD4_8 is "koff CD4/8";
  koff_CD69 = 0.01;
  koff_IL2m = 0.035;
  koff_IL2s = 0.035;
  kon_CD28 = 660000;
  kon_CD4_8 = 1200; kon_CD4_8 is "kon CD4/8";
  kon_CD69 = 7000;
  kon_IL2m = 1060000;
  kon_IL2s = 1060000;
  kon_TL = 850;
  kp_1 = 5e-10; kp_1 is "kp'1";
  kp_3 = 0.0005; kp_3 is "kp'3";
  kp1 = 760;
  kp2 = 940;
  kp3 = 0.019;
  s = 1.83e-5;
  Smax = 20000;
  Tmax = 40000;
  s_0 = 0; s_0 is "s'";

  // Reactions:
  TL_CD4_8_binding: TL + CD4_8 -> TL_0; TCell*(kon_CD4_8*TL*CD4_8 - koff_CD4_8*TL_0); TL_CD4_8_binding is "TL CD4/8 binding";
  TCR_pMHC_binding: T + L -> TL; TCell*(kon_TL*T*L - koff_TL*TL);
  CD69_production_by_T_i_and_CD28_i: T_i + CD28_i => CD69; TCell*kp1*T_i*CD28_i; CD69_production_by_T_i_and_CD28_i is "CD69 production by T*i and CD28*i";
  IL2Rs_formation: IL2Rm + IL2_IL2Rm_i => IL2Rs; TCell*kf5*IL2Rm*IL2_IL2Rm_i;
  IL2_IL2Rs_binding: IL2 + IL2Rs -> IL2_IL2Rs; TCell*(kon_IL2s*IL2*IL2Rs - koff_IL2s*IL2_IL2Rs);
  IL2Rs_elimination: IL2Rs => ; TCell*ke1*IL2Rs;
  IL2Rm_elimination: IL2Rm => ; TCell*ke1*IL2Rm;
  IL2_elimination: IL2 => ; TCell*ke1*IL2;
  IL2_IL2Rs_elimination: IL2_IL2Rs => ; TCell*ke1*IL2_IL2Rs; IL2_IL2Rs_elimination is "IL2-IL2Rs elimination";
  CD69_production_by_IL2Rm_i: IL2_IL2Rm_i => CD69; TCell*kp1*IL2_IL2Rm_i; CD69_production_by_IL2Rm_i is "CD69 production by IL2Rm*i";
  TL__dissociation: TL_0 => T_0 + L; TCell*koff_TL*TL_0; TL__dissociation is "TL* dissociation";
  T__internalization: T_0 => T_i; TCell*ki1*T_0; T__internalization is "T* internalization";
  CD69_production_by_T_i: T_i => CD69; TCell*km1*T_i; CD69_production_by_T_i is "CD69 production by T*i";
  IL2Rm_production_by_T_i: T_i => IL2Rm; TCell*km1*T_i; IL2Rm_production_by_T_i is "IL2Rm production by T*i";
  IL2_production_by_T_i: T_i => IL2; TCell*km1*T_i; IL2_production_by_T_i is "IL2 production by T*i";
  T_i_elimination: T_i => ; TCell*kd1*T_i; T_i_elimination is "T*i elimination";
  CD28_CD80_binding: CD28 + CD80 -> CD28_CD80; TCell*(kon_CD28*CD28*CD80 - koff_CD28*CD28_CD80);
  CD28_activation: CD28_CD80 => CD28_0 + CD80; TCell*kf2*CD28_CD80;
  CD28__internalization: CD28_0 => CD28_i; TCell*ki1*CD28_0; CD28__internalization is "CD28* internalization";
  CD28_i_elimination: CD28_i => ; TCell*kd1*CD28_i; CD28_i_elimination is "CD28*i elimination";
  IL2Rm_production_by_T_i_and_CD28_i: T_i + CD28_i => IL2Rm; TCell*kp2*T_i*CD28_i; IL2Rm_production_by_T_i_and_CD28_i is "IL2Rm production by T*i and CD28*i";
  CD69_CD69L_binding: CD69 + CD69L -> CD69_CD69L; TCell*(kon_CD69*CD69*CD69L - koff_CD69*CD69_CD69L);
  CD69_activation: CD69_CD69L => CD69_0 + CD69L; TCell*kf3*CD69_CD69L;
  CD69__internalization: CD69_0 => CD69_i; TCell*ki1*CD69_0; CD69__internalization is "CD69* internalization";
  CD69_elimination: CD69 => ; TCell*ke1*CD69;
  IL2_production_by_CD69_i: CD69_i => IL2; TCell*kp3*CD69_i; IL2_production_by_CD69_i is "IL2 production by CD69*i";
  CD69_i_elimination: CD69_i => ; TCell*kd1*CD69_i; CD69_i_elimination is "CD69*i elimination";
  IL2_IL2Rm_binding: IL2 + IL2Rm -> IL2_IL2Rm; TCell*(kon_IL2m*IL2*IL2Rm - koff_IL2m*IL2_IL2Rm);
  IL2Rm_activation: IL2_IL2Rm => IL2_IL2Rm_0; TCell*kf4*IL2_IL2Rm;
  IL2_IL2Rm__internalization: IL2_IL2Rm_0 => IL2_IL2Rm_i; TCell*ki1*IL2_IL2Rm_0; IL2_IL2Rm__internalization is "IL2-IL2Rm* internalization";
  IL2Rm_production_by_IL2_IL2Rm_i: IL2_IL2Rm_i => IL2Rm; TCell*kp2*IL2_IL2Rm_i; IL2Rm_production_by_IL2_IL2Rm_i is "IL2Rm production by IL2-IL2Rm*i";
  IL2_production_by_IL2_IL2Rm_i: IL2_IL2Rm_i => IL2; TCell*kp3*IL2_IL2Rm_i; IL2_production_by_IL2_IL2Rm_i is "IL2 production by IL2-IL2Rm*i";
  TCR_production_by_IL2_IL2Rm_i: IL2_IL2Rm_i => T; TCell*function_for_induced_production(k1, IL2_IL2Rm_i, Tmax, T); TCR_production_by_IL2_IL2Rm_i is "TCR production by IL2-IL2Rm*i";
  S_production_by_IL2_IL2Rm_i: IL2_IL2Rm_i => S; TCell*k1*IL2_IL2Rm_i; S_production_by_IL2_IL2Rm_i is "S production by IL2-IL2Rm*i";
  IL2_IL2Rm_i_elimination: IL2_IL2Rm_i => ; TCell*kd1*IL2_IL2Rm_i; IL2_IL2Rm_i_elimination is "IL2-IL2Rm*i elimination";
  Continuous_TCR_production: => T; TCell*function_for_continuous_production(s, Tmax, T);
  TCR_intercompartment_exchange: => T; TCell*function_for_inter_compartment_exchange(theta, S, T);  // modifiers: S
  Continuous_S_production: => S; TCell*function_for_S_continuous_production(s, Smax, S);
  S_consumption_in_synapse: S => ; TCell*function_for_S_consumption_in_synapse(delta, theta, S, T);  // modifiers: T
end
