// SBML level 2 version 4
// dcterms:bibliographicCitation: urn:miriam:pubmed:29146308

function Constant_flux__irreversible(v)
  v;
end
Constant_flux__irreversible is "Constant flux (irreversible)";

model Martinez_Guimera2017___Generic_redox_signalling_model_with_negative_feedback_regulation__Model_2()
  // Martinez-Guimera2017 - Generic redox signalling model with negative feedback regulation (Model 2)
  // This model is described in the article:
  // 'Molecular habituation' as a potential mechanism of gradual homeostatic loss with age.
  // Martinez Guimera A, Welsh CM, Proctor CJ, McArdle A, Shanley DP.
  // Mech. Ageing Dev. 2017 Nov; :
  // Abstract:
  // The ability of reactive oxygen species (ROS) to cause molecular damage has meant that chronic oxidative stress has been mostly studied from the point of view of being a source of toxicity to the cell. However, the known duality of ROS molecules as both damaging agents and cellular redox signals implies another perspective in the study of sustained oxidative stress. This is a perspective of studying oxidative stress as a constitutive signal within the cell. In this work, we adopt a theoretical perspective as an exploratory and explanatory approach to examine how chronic oxidative stress can interfere with signal processing by redox signalling pathways in the cell. We report that constitutive signals can give rise to a 'molecular habituation' effect that can prime for a gradual loss of biological function. This is because a constitutive signal in the environment has the potential to reduce the responsiveness of a signalling pathway through the prolonged activation of negative regulators. Additionally, we demonstrate how this phenomenon is likely to occur in different signalling pathways exposed to persistent signals and furthermore at different levels of biological organisation.
  // This model is hosted on BioModels Database and identified by: MODEL1710260001.
  // To cite BioModels Database, please use: Chelliah V et al. BioModels: ten-year anniversary. Nucl. Acids Res. 2015, 43(Database issue):D542-8.
  // To the extent possible under law, all copyright and related or neighbouring rights to this encoded model have been dedicated to the public domain worldwide. Please refer to CC0 Public Domain Dedication for more information.
  // isVersionOf mamo:MAMO_0000046
  // occursIn GO:0005739
  // hasProperty GO:0045454
  // isDescribedBy pubmed:29146308

  // Compartments:
  compartment compartment = 1;  // GO:0005623

  // Species:
  species Oxidant in compartment = 0;  // omit:OMIT_0017310
  species AOX in compartment = 100;
  species Nil in compartment = 1;
  species Activator in compartment = 0;  // ncit:C154897
  species Sensor in compartment = 10;
  species SensorOX in compartment = 0;
  species Function in compartment = 0;  // mamo:MAMO_0000027
  species Relay in compartment = 10;
  species Intermediate in compartment = 0;
  species Reductant in compartment = 100;
  species Inhibitor in compartment = 0;
  species ReductantOX in compartment = 0;
  species NegReg in compartment = 0;
  species Relay2 in compartment = 10;
  species Inactive in compartment = 0;

  // Reactions:
  reaction_1: Nil => Oxidant + Nil; compartment*Constant_flux__irreversible(v);
    v = 1;
  reaction_2: Oxidant + AOX => AOX; compartment*reaction_2_k1*Oxidant*AOX;
    reaction_2_k1 = 0.1;
  reaction_3: Oxidant + Sensor => SensorOX + Activator; compartment*reaction_3_k1*Oxidant*Sensor;
    reaction_3_k1 = 0.1;
  reaction_4: Activator + Relay => Function + Relay + Activator; compartment*reaction_4_k1*Activator*Relay;
    reaction_4_k1 = 0.1;
  reaction_5: SensorOX + Reductant => Intermediate; compartment*reaction_5_k1*SensorOX*Reductant; reaction_5 is "reaction_7";
    reaction_5_k1 = 0.1;
  reaction_8: Intermediate => Inhibitor + ReductantOX; compartment*reaction_8_k1*Intermediate;
    reaction_8_k1 = 0.01;
  reaction_7: Inhibitor + Activator => Sensor; compartment*reaction_7_k1*Inhibitor*Activator; reaction_7 is "reaction_9";
    reaction_7_k1 = 0.1;
  reaction_9: Function + Relay2 => NegReg + Relay2; compartment*reaction_9_k1*Function*Relay2; reaction_9 is "reaction_5";
    reaction_9_k1 = 0.1;
  reaction_10: Activator + NegReg => Inactive; compartment*reaction_10_k1*Activator*NegReg; reaction_10 is "reaction_6";
    reaction_10_k1 = 0.1;

  // Events:
  event_1: at (time >= 100): Oxidant = 100;

  // Unit definitions:
  unit volume = 1e-3 litre;
  unit substance = item;
end
