// SBML level 2 version 1
// This model was downloaded from BioModels Database
// http://www.ebi.ac.uk/biomodels/

model Scheper1999()
  // Scheper1999_CircClock
  // To the extent possible under law, all copyright and related or neighbouring rights to this encoded model have been dedicated to the public domain worldwide. Please refer to CC0 Public Domain Dedication for more information.
  // In summary, you are entitled to use this encoded model in absolutely any manner you deem suitable, verbatim, or with modification, alone or embedded it in a larger context, redistribute it, commercially or not, in a restricted way or not.
  // To cite BioModels Database, please use: Li C, Donizelli M, Rodriguez N, Dharuri H, Endler L, Chelliah V, Li L, He E, Henry A, Stefan MI, Snoep JL, Hucka M, Le Novère N, Laibe C (2010) BioModels Database: An enhanced, curated and annotated resource for published quantitative kinetic models. BMC Syst Biol., 4:92.
  // biomodels.db:MODEL6618241436
  // biomodels.db:BIOMD0000000024
  // isDescribedBy pubmed:9870936
  // hasTaxon taxonomy:10036 taxonomy:7227
  // kegg.pathway:dme04711
  // isVersionOf GO:0042752

  // Compartments:
  compartment cytoplasm = 1e-15;  // GO:0005737

  // Species:
  species $EmptySet in cytoplasm = 0;
  species M in cytoplasm = 1e-15/cytoplasm; M is "mRNA";  // isVersionOf CHEBI:33699 kegg.compound:C00046
  species P in cytoplasm = 1e-15/cytoplasm; P is "protein";  // kegg.compound:C00017 CHEBI:16541

  // Reactions:
  TC: $EmptySet => M; cytoplasm*(rM/(1 + (P/k)^n)); TC is "mRNA production";  // modifiers: P; isVersionOf GO:0009299
    rM = 1; k = 1; n = 2;
  TL: $EmptySet => P; cytoplasm*rP*delay(M, parameter_0000009)^m; TL is "protein production";  // modifiers: M; isVersionOf GO:0006412
    rP = 1; m = 3; parameter_0000009 = 4;
  Md: M => $EmptySet; cytoplasm*qM*M; Md is "messenger degradation";  // isVersionOf GO:0006402
    qM = 0.21;
  Pd: P => $EmptySet; cytoplasm*qP*P; Pd is "protein degradation";  // isVersionOf GO:0030163
    qP = 0.21;

  // Unit definitions:
  unit time = 3600 second;
end
