// SBML level 3 version 2

model Maeda2006_MyosinPhosphorylation()
  // The model reproduces Fig 2B, D, F, and 2H. The dynamics correspond to a stimulus of 1 U/ml of thrombin which is equal to 0.01 uM. Phosphorylated MLC is the sum of pMLC (s359) and ppMLC (s360). A slight discrepancy in peak values of species between the figure in the paper and simulation result might be due to different initial conditions in the two sets. The model was successfully tested on MathSBML. It is possible to simulate the model on other software that do not support "Events" at this time by removing the "listOfEvents" and substituting a value of 0.01 for thrombin (s2). This does not change the model very much. With the latter format, the model was also successfully tested on Copasi.
  // To the extent possible under law, all copyright and related or neighbouring rights to this encoded model have been dedicated to the public domain worldwide. Please refer to CC0 Public Domain Dedication for more information.
  // In summary, you are entitled to use this encoded model in absolutely any manner you deem suitable, verbatim, or with modification, alone or embedded it in a larger context, redistribute it, commercially or not, in a restricted way or not.
  // To cite BioModels Database, please use: Li C, Donizelli M, Rodriguez N, Dharuri H, Endler L, Chelliah V, Li L, He E, Henry A, Stefan MI, Snoep JL, Hucka M, Le Novère N, Laibe C (2010) BioModels Database: An enhanced, curated and annotated resource for published quantitative kinetic models. BMC Syst Biol., 4:92.
  // biomodels.db:MODEL7944007619
  // biomodels.db:BIOMD0000000088
  // isDescribedBy pubmed:16923126
  // hasTaxon taxonomy:9606
  // isPartOf kegg.pathway:hsa04810
  // GO:0035023 GO:0030036
  // model units - substance: substance, time: second, volume: volume, area: area, length: metre, extent: substance

  // Compartments:
  compartment Default = 1 volume;
  compartment cytosol = 1 volume;  // GO:0005829
  compartment ER = 0.1 volume;  // GO:0005783

  // Species:
  species $thrombin in Default = 0;  // uniprot:P00734
  species thrombin_R in cytosol = 0;  // uniprot:P25116 interpro:IPR000935
  species pro_thrombinR in cytosol = 0.42;  // uniprot:P25116 interpro:IPR000935
  species thrombin_ligand in Default = 0;  // uniprot:P00734
  species thrombinR_active in cytosol = 0;  // uniprot:P25116 interpro:IPR000935
  species s93 in cytosol = 0.2; s93 is "RGS";  // isVersionOf uniprot:O94810; interpro:IPR000342
  species Inositol in cytosol = 0;  // CHEBI:17268 kegg.compound:C00137
  species sa40_degraded in cytosol = 0;
  species thrombinR in cytosol = 0;  // uniprot:P25116 interpro:IPR000935
  species s184 in cytosol = 0; s184 is "RGS";  // isVersionOf uniprot:O94810; interpro:IPR000342
  species $GTP in cytosol = 50;  // CHEBI:15996 kegg.compound:C00044
  species G_sub_q_endsub__alpha__GTP in cytosol = 0; G_sub_q_endsub__alpha__GTP is "G_sub_q_endsub__alpha_.GTP";  // hasPart CHEBI:15996 uniprot:P29992 kegg.compound:C00044
  species $GDP in cytosol = 5;  // CHEBI:17552 kegg.compound:C00035
  species IP3R in cytosol = 0.008333;  // uniprot:Q14643
  species _3IP3_IP3R in cytosol = 0; _3IP3_IP3R is "3IP3.IP3R";  // hasPart CHEBI:16595 uniprot:Q14643 kegg.compound:C01245
  species p115RhoGEF in cytosol = 0.1;  // uniprot:Q92888 interpro:IPR000219
  species Rho_kinase in cytosol = 0.042; Rho_kinase is "Rho-kinase";  // uniprot:Q13464
  species RhoGAP in cytosol = 0.1;  // uniprot:Q9NRY4 interpro:IPR008936
  species DAG in cytosol = 0;  // CHEBI:18035 kegg.compound:C00165
  species IP3 in cytosol = 0.3;  // CHEBI:16595 kegg.compound:C01245
  species Rho_GAP in cytosol = 0;  // uniprot:Q9NRY4
  species Rho_GTP in cytosol = 0.005; Rho_GTP is "Rho.GTP";  // hasPart CHEBI:15996 uniprot:P61586 kegg.compound:C00044
  species $PIP2 in cytosol = 10;  // CHEBI:18348 kegg.compound:C04637
  species PC in cytosol = 0;
  species Rho_GDP in cytosol = 0.09; Rho_GDP is "Rho.GDP";  // hasPart CHEBI:17552 uniprot:P61586 kegg.compound:C00035
  species Rho_GEF in cytosol = 0;  // hasPart uniprot:Q92888
  species Rho_GEF_active in cytosol = 0;
  species Rho_GTP_Rho_kinase in cytosol = 0.005; Rho_GTP_Rho_kinase is "Rho.GTP.Rho-kinase";  // hasPart CHEBI:15996 uniprot:Q13464 uniprot:P61586 kegg.compound:C00044
  species Ca_super_2_plus__endsuper__CaM in cytosol = 0.3; Ca_super_2_plus__endsuper__CaM is "Ca_super_2_plus__endsuper_.CaM";  // hasVersion CHEBI:29108 uniprot:P62158 kegg.compound:C00391 kegg.compound:C00076
  species _2Ca_super_2_plus__endsuper__CaM in cytosol = 0; _2Ca_super_2_plus__endsuper__CaM is "2Ca_super_2_plus__endsuper_.CaM";  // hasVersion CHEBI:29108 uniprot:P62158 kegg.compound:C00391 kegg.compound:C00076
  species _3Ca_super_2_plus__endsuper__CaM in cytosol = 0; _3Ca_super_2_plus__endsuper__CaM is "3Ca_super_2_plus__endsuper_.CaM";  // CHEBI:29108 uniprot:P62158 kegg.compound:C00391 kegg.compound:C00076
  species _4Ca_super_2_plus__endsuper__CaM in cytosol = 0; _4Ca_super_2_plus__endsuper__CaM is "4Ca_super_2_plus__endsuper_.CaM";  // CHEBI:29108 uniprot:P62158 kegg.compound:C00391 kegg.compound:C00076
  species MLCK in cytosol = 0.69;  // isVersionOf uniprot:Q9H1R3
  species s292 in cytosol = 0.05; s292 is "MLCK.Ca_super_2_plus__endsuper_.CaM";  // hasVersion CHEBI:29108 uniprot:P62158 uniprot:Q9H1R3 kegg.compound:C00391
  species s293 in cytosol = 0; s293 is "MLCK.2Ca_super_2_plus__endsuper_.CaM";  // hasVersion CHEBI:29108 uniprot:P62158 uniprot:Q9H1R3 kegg.compound:C00391
  species s294 in cytosol = 0; s294 is "MLCK.3Ca_super_2_plus__endsuper_.CaM";  // hasVersion CHEBI:29108 uniprot:P62158 uniprot:Q9H1R3 kegg.compound:C00391
  species s295 in cytosol = 0; s295 is "MLCK.4Ca_super_2_plus__endsuper_.CaM";  // hasVersion CHEBI:29108 uniprot:P62158 uniprot:Q9H1R3 kegg.compound:C00391
  species PKC in cytosol = 2;  // uniprot:P17252
  species PKC_active1 in cytosol = 0.039823;  // uniprot:P17252
  species PKC_DAG in cytosol = 0; PKC_DAG is "PKC.DAG";  // hasPart CHEBI:18035 uniprot:P17252 kegg.compound:C00165
  species PKC_active_2 in cytosol = 0.68193;  // uniprot:P17252
  species PKC_active_3 in cytosol = 0;  // uniprot:P17252
  species csa39_degraded in cytosol = 0;
  species csa36_degraded in cytosol = 0;
  species csa35_degraded in cytosol = 0;
  species PKC_active_1_CPI in cytosol = 0; PKC_active_1_CPI is "PKC active_1.CPI";  // hasPart uniprot:Q96A00 uniprot:P17252
  species PKC_active_2_CPI in cytosol = 0; PKC_active_2_CPI is "PKC active_2.CPI";  // hasPart uniprot:Q96A00 uniprot:P17252
  species PKC_active_3_CPI in cytosol = 0; PKC_active_3_CPI is "PKC active_3.CPI";  // hasPart uniprot:Q96A00 uniprot:P17252
  species s352 in cytosol = 0; s352 is "CPI-17.MYPT1_PPase";  // hasPart uniprot:O14974 uniprot:Q96A00
  species s355 in cytosol = 0; s355 is "CPI-17.MYPT1_PPase";  // hasPart uniprot:O14974 uniprot:Q96A00
  species s349 in cytosol = 0.059; s349 is "CPI-17";  // isVersionOf uniprot:Q96A00
  species s360 in cytosol = 0.1; s360 is "MLC";  // kegg.compound:C01003; isVersionOf uniprot:P05976
  species s358 in cytosol = 4.3; s358 is "MLC";  // kegg.compound:C03875; isVersionOf uniprot:P05976
  species s361 in cytosol = 0; s361 is "Rho-kinase.MLC";  // hasPart uniprot:Q13464 uniprot:P05976
  species s362 in cytosol = 0; s362 is "Rho-kinase.MLC";  // hasPart uniprot:Q13464 uniprot:P05976
  species s350 in cytosol = 0; s350 is "CPI-17";  // isVersionOf uniprot:Q96A00
  species Ca_super_2_plus__endsuper in cytosol = 0.0833; Ca_super_2_plus__endsuper is "Ca_super_2_plus__endsuper_";  // CHEBI:29108 kegg.compound:C00076
  species CaM in cytosol = 19.65;  // uniprot:P62158 kegg.compound:C00391
  species Ca_super_2_plus__endsuper__store in ER = 155;  // CHEBI:29108 kegg.compound:C00076
  species G_beta__gamma__1 in cytosol = 0;  // hasPart uniprot:P63211 uniprot:P62873
  species G_beta__gamma__2 in cytosol = 0;  // uniprot:P63211 uniprot:P62873
  species PLC_beta in cytosol = 0.57; PLC_beta is "PLC_beta_";  // uniprot:Q9NQ66
  species s430 in cytosol = 0.5; s430 is "Ca_super_2_plus__endsuper_ trunsp";  // CHEBI:29108 kegg.compound:C00076
  species Ca_super_2_plus__endsuper__pump in cytosol = 0.1;  // CHEBI:29108 kegg.compound:C00076
  species s435 in cytosol = 0; s435 is "G_sub_12_endsub__alpha__beta__gamma__thrombinR active";  // hasPart uniprot:P25116 uniprot:P63211 uniprot:P62873 uniprot:Q03113
  species p115RhoGEF_GTP_alpha in cytosol = 0; p115RhoGEF_GTP_alpha is "p115RhoGEF.GTP_alpha_";  // hasPart CHEBI:15996 uniprot:Q03113 uniprot:Q92888 kegg.compound:C00044
  species s437 in cytosol = 0.5; s437 is "G_sub_12_endsub__alpha__beta__gamma_";  // hasPart uniprot:P63211 uniprot:P62873 uniprot:Q03113
  species G_sub_12_endsub__alpha__GDP in cytosol = 0; G_sub_12_endsub__alpha__GDP is "G_sub_12_endsub__alpha_.GDP";  // hasPart CHEBI:17552 uniprot:Q03113 kegg.compound:C00035
  species G_sub_12_endsub__alpha__GTP in cytosol = 0; G_sub_12_endsub__alpha__GTP is "G_sub_12_endsub__alpha_.GTP";  // hasPart CHEBI:15996 uniprot:Q03113 kegg.compound:C00044
  species G_sub_q_endsub__alpha__GDP in cytosol = 0; G_sub_q_endsub__alpha__GDP is "G_sub_q_endsub__alpha_.GDP";  // hasPart CHEBI:17552 uniprot:P29992 kegg.compound:C00035
  species s441 in cytosol = 0; s441 is "G_sub_q_endsub__alpha__beta__gamma__thrombinR active";  // hasPart uniprot:P25116 uniprot:P63211 uniprot:P62873 uniprot:P29992
  species s442 in cytosol = 0.5; s442 is "G_sub_q_endsub__alpha__beta__gamma_";  // hasPart uniprot:P63211 uniprot:P62873 uniprot:P29992
  species s443 in cytosol = 0; s443 is "PLC_beta_.G_sub_q_endsub__alpha_.GTP";  // hasPart CHEBI:15996 uniprot:Q9NQ66 uniprot:P63211 uniprot:P62873
  species s444 in cytosol = 0; s444 is "2Ca_super_2_plus__endsuper_ .Ca_super_2_plus__endsuper_ trunsp";  // CHEBI:29108 kegg.compound:C00076
  species s446 in cytosol = 0; s446 is "Ca_super_2_plus__endsuper_ pump.Ca_super_2_plus__endsuper_";  // CHEBI:29108 kegg.compound:C00076
  species s449 in cytosol = 0; s449 is "Rho.GTP.Rho-kinase.MLC";  // hasPart CHEBI:15996 uniprot:P61586 uniprot:Q13464 uniprot:P05976
  species s456 in cytosol = 0; s456 is "Rho.GTP.Rho-kinase.MLC";  // hasPart CHEBI:15996 uniprot:P61586 uniprot:Q13464 uniprot:P05976
  species s359 in cytosol = 0.6; s359 is "MLC";  // kegg.compound:C03875; hasPart uniprot:P05976
  species s463 in cytosol = 0; s463 is "MYPT1.Rho-kinase";  // hasPart uniprot:Q13464 uniprot:O14974
  species s467 in cytosol = 0; s467 is "MYPT1.MLC";  // hasPart uniprot:P05976 uniprot:O14974
  species s470 in cytosol = 0; s470 is "MYPT1.MLC";  // hasPart uniprot:P05976 uniprot:O14974
  species s477 in cytosol = 0; s477 is "MYPT1.MLC";  // hasPart uniprot:P05976 uniprot:O14974
  species s480 in cytosol = 0; s480 is "MYPT1.MLC";  // hasPart uniprot:P05976 uniprot:O14974
  species s491 in cytosol = 0; s491 is "MLCK.MLC";  // hasPart uniprot:Q9H1R3 uniprot:P05976
  species s487 in cytosol = 0; s487 is "MLCK.MLC";  // hasPart uniprot:Q9H1R3 uniprot:P05976
  species s496 in cytosol = 0; s496 is "MYPT1.Rho-kinase";  // hasPart uniprot:Q13464 uniprot:O14974
  species s506 in cytosol = 0; s506 is "MLCK.4Ca_super_2_plus__endsuper_.CaM.MLC";  // hasPart CHEBI:29108 uniprot:Q9H1R3 uniprot:P62158 uniprot:P05976
  species s512 in cytosol = 0; s512 is "MLCK.3Ca_super_2_plus__endsuper_.CaM.MLC";  // hasPart CHEBI:29108 uniprot:Q9H1R3 uniprot:P62158 uniprot:P05976
  species s513 in cytosol = 0; s513 is "MLCK.4Ca_super_2_plus__endsuper_.CaM.MLC";  // hasPart CHEBI:29108 uniprot:Q9H1R3 uniprot:P62158 uniprot:P05976
  species s520 in cytosol = 0; s520 is "MLCK.3Ca_super_2_plus__endsuper_.CaM.MLC";  // hasPart CHEBI:29108 uniprot:Q9H1R3 uniprot:P62158 uniprot:P05976
  species s526 in cytosol = 0; s526 is "MLCK.2Ca_super_2_plus__endsuper_.CaM.MLC";  // hasPart CHEBI:29108 uniprot:Q9H1R3 uniprot:P62158 uniprot:P05976
  species s539 in cytosol = 0; s539 is "MLCK.2Ca_super_2_plus__endsuper_.CaM.MLC";  // hasPart CHEBI:29108 uniprot:Q9H1R3 uniprot:P62158 uniprot:P05976
  species s546 in cytosol = 0; s546 is "MLCK.Ca_super_2_plus__endsuper_.CaM.MLC";  // hasPart CHEBI:29108 uniprot:Q9H1R3 uniprot:P62158 uniprot:P05976
  species s551 in cytosol = 0; s551 is "MLCK.Ca_super_2_plus__endsuper_.CaM.MLC";  // hasPart CHEBI:29108 uniprot:Q9H1R3 uniprot:P62158 uniprot:P05976
  species $s556 in cytosol = 0.00833; s556 is "Ca_super_2_plus__endsuper_ ext leak";  // CHEBI:29108 kegg.compound:C00076
  species $Ca_super_2_plus__endsuper__ext in Default = 4000;  // CHEBI:29108 kegg.compound:C00076
  species $s557 in cytosol = 0.001; s557 is "Ca_super_2_plus__endsuper_ int leak";  // CHEBI:29108 kegg.compound:C00076
  species s564 in cytosol = 0; s564 is "PLC_beta_.G_sub_q_endsub__alpha_.GTP.Ca_super_2_plus__endsuper_";  // hasPart CHEBI:15996 CHEBI:29108 uniprot:Q9NQ66 uniprot:P29992
  species s565 in cytosol = 0; s565 is "PKC.Ca_super_2_plus__endsuper_.DAG";  // hasPart CHEBI:18035 CHEBI:29108 uniprot:P17252 kegg.compound:C00165
  species PKC_Ca_super_2_plus__endsuper in cytosol = 0.094; PKC_Ca_super_2_plus__endsuper is "PKC.Ca_super_2_plus__endsuper_";  // hasPart CHEBI:29108 uniprot:P17252 kegg.compound:C00076
  species s567 in cytosol = 0; s567 is "PLC_beta_.G_sub_q_endsub_.GTP.Ca.PIP2";  // hasPart CHEBI:15996 CHEBI:29108 uniprot:Q9NQ66 uniprot:P29992
  species PLC_beta__Ca_PIP2 in cytosol = 0.08; PLC_beta__Ca_PIP2 is "PLC_beta_.Ca.PIP2";  // hasPart CHEBI:18348 CHEBI:29108 uniprot:Q9NQ66 kegg.compound:C04637
  species s569 in cytosol = 0.15; s569 is "PLC_beta_.Ca_super_2_plus__endsuper_";  // hasPart CHEBI:29108 uniprot:Q9NQ66 kegg.compound:C00076
  species s351 in cytosol = 0.7; s351 is "MYPT1_PPase";  // isVersionOf uniprot:O14974
  species s570 in cytosol = 0.4941; s570 is "MYPT1_PPase";  // isVersionOf uniprot:O14974

  // Reactions:
  A2_1_1: $thrombin + pro_thrombinR -> thrombin_R; cytosol*((1 + A2_1_1_ratio)*A2_1_1_Vmax*pro_thrombinR*thrombin/A2_1_1_Km - A2_1_1_Vmax*A2_1_1_ratio*thrombin_R); A2_1_1 is "A2-1.1";  // ec-code:3.4.21.5 GO:0015057 GO:0005102
    A2_1_1_Km = 5 microMolar; A2_1_1_ratio = 4 dimensionless; A2_1_1_Vmax = 15 per_sec;
  A1_2: $GTP + s435 => G_sub_12_endsub__alpha__GTP + G_beta__gamma__1 + $GDP + thrombinR; cytosol*A1_2_kf*GTP*s435; A1_2 is "A1-2";  // GO:0015057 GO:0031684 GO:0003924
    A1_2_kf = 0.01 per_uM_per_sec;
  A1_5_1: thrombinR => sa40_degraded; cytosol*A1_5_1_kf*thrombinR; A1_5_1 is "A1-5.1";  // GO:0030163
    A1_5_1_kf = 0.00224 per_sec;
  A1_3: s442 + thrombinR_active -> s441; cytosol*(A1_3_kf*s442*thrombinR_active - A1_3_kb*s441); A1_3 is "A1-3";  // GO:0015057 GO:0004930
    A1_3_kf = 1 per_uM_per_sec; A1_3_kb = 0.006 per_sec;
  A1_4: s441 + $GTP => G_sub_q_endsub__alpha__GTP + thrombinR + $GDP + G_beta__gamma__2; cytosol*A1_4_kf*GTP*s441; A1_4 is "A1-4";  // GO:0031684 GO:0003924
    A1_4_kf = 0.01 per_uM_per_sec;
  A1_6: G_sub_12_endsub__alpha__GTP => G_sub_12_endsub__alpha__GDP; cytosol*A1_6_kf*G_sub_12_endsub__alpha__GTP; A1_6 is "A1-6";  // GO:0003924
    A1_6_kf = 0.0133 per_sec;
  A1_7: G_beta__gamma__1 + G_sub_12_endsub__alpha__GDP => s437; cytosol*A1_7_kf*G_beta__gamma__1*G_sub_12_endsub__alpha__GDP; A1_7 is "A1-7";  // GO:0031684
    A1_7_kf = 0.01 per_uM_per_sec;
  A2_2_1: s93 + G_sub_q_endsub__alpha__GTP -> s184; cytosol*((1 + A2_2_1_ratio)*A2_2_1_Vmax*G_sub_q_endsub__alpha__GTP*s93/A2_2_1_Km - A2_2_1_ratio*A2_2_1_Vmax*s184); A2_2_1 is "A2-2.1";  // GO:0016299
    A2_2_1_Km = 0.05 microMolar; A2_2_1_ratio = 23.51 dimensionless; A2_2_1_Vmax = 0.0102 per_sec;
  A1_9: G_beta__gamma__2 + G_sub_q_endsub__alpha__GDP => s442; cytosol*A1_9_kf*G_beta__gamma__2*G_sub_q_endsub__alpha__GDP; A1_9 is "A1-9";  // GO:0031684
    A1_9_kf = 0.01 per_uM_per_sec;
  B1_1: G_sub_12_endsub__alpha__GTP + p115RhoGEF -> p115RhoGEF_GTP_alpha; cytosol*(B1_1_kf*G_sub_12_endsub__alpha__GTP*p115RhoGEF - B1_1_kb*p115RhoGEF_GTP_alpha); B1_1 is "B1-1";  // GO:0005515
    B1_1_kf = 20 per_uM_per_sec; B1_1_kb = 0.1 per_sec;
  B2_1_1: Rho_GDP => Rho_GTP; cytosol*(B2_1_1_Vmax*Rho_GDP*p115RhoGEF_GTP_alpha/(B2_1_1_Km + Rho_GTP)); B2_1_1 is "B2-1.1";  // modifiers: p115RhoGEF_GTP_alpha; GO:0005089
    B2_1_1_Km = 0.015 microMolar; B2_1_1_Vmax = 0.052 per_sec;
  B2_2_1: p115RhoGEF + Rho_GDP -> Rho_GEF; cytosol*((1 + B2_2_1_ratio)*B2_2_1_Vmax*p115RhoGEF*Rho_GDP/B2_2_1_Km - B2_2_1_Vmax*B2_2_1_ratio*Rho_GEF); B2_2_1 is "B2-2.1";  // GO:0005089
    B2_2_1_Km = 2 microMolar; B2_2_1_ratio = 4 dimensionless; B2_2_1_Vmax = 0.04 per_sec;
  B2_3_1: RhoGAP + Rho_GTP -> Rho_GAP; cytosol*((1 + B2_3_1_ratio)*B2_3_1_Vmax*RhoGAP*Rho_GTP/B2_3_1_Km - B2_3_1_Vmax*B2_3_1_ratio*Rho_GAP); B2_3_1 is "B2-3.1";  // GO:0035024
    B2_3_1_Km = 2.83 microMolar; B2_3_1_ratio = 13.246 dimensionless; B2_3_1_Vmax = 0.993 per_sec;
  B2_1_2: Rho_GEF => Rho_GTP + p115RhoGEF; cytosol*B2_1_2_Vmax*Rho_GEF; B2_1_2 is "B2-1.2";  // GO:0005089
    B2_1_2_Vmax = 0.04 per_sec;
  B2_3_2: Rho_GAP => Rho_GDP + RhoGAP; cytosol*B2_3_2_Vmax*Rho_GAP; B2_3_2 is "B2-3.2";  // GO:0035024
    B2_3_2_Vmax = 0.9933 per_sec;
  A2_2_2: s184 => G_sub_q_endsub__alpha__GDP + s93; cytosol*A2_2_2_Vmax*s184; A2_2_2 is "A2-2.2";  // GO:0016299
    A2_2_2_Vmax = 0.0102 per_sec;
  B1_2: p115RhoGEF_GTP_alpha => G_sub_12_endsub__alpha__GDP + p115RhoGEF; cytosol*B1_2_kf*p115RhoGEF_GTP_alpha; B1_2 is "B1-2";  // GO:0005089
    B1_2_kf = 0.0117 per_sec;
  B1_3: Rho_GTP => Rho_GDP; cytosol*B1_3_kf*Rho_GTP; B1_3 is "B1-3";  // GO:0003924
    B1_3_kf = 0.0003667 per_sec;
  B1_4: Rho_kinase + Rho_GTP -> Rho_GTP_Rho_kinase; cytosol*(B1_4_kf*Rho_kinase*Rho_GTP - B1_4_kb*Rho_GTP_Rho_kinase); B1_4 is "B1-4";  // intact:EBI-876651 GO:0035025
    B1_4_kf = 10 per_uM_per_sec; B1_4_kb = 0.5 per_sec;
  A2_1_2: thrombin_R => thrombinR_active + thrombin_ligand + $thrombin; cytosol*A2_1_2_Vmax*thrombin_R; A2_1_2 is "A2-1.2";  // ec-code:3.4.21.5 GO:0015057
    A2_1_2_Vmax = 15 per_sec;
  A1_1: s437 + thrombinR_active -> s435; cytosol*(A1_1_kf*s437*thrombinR_active - A1_1_kb*s435); A1_1 is "A1-1";  // GO:0015057 GO:0004930
    A1_1_kf = 1 per_uM_per_sec; A1_1_kb = 0.006 per_sec;
  A1_8: G_sub_q_endsub__alpha__GTP => G_sub_q_endsub__alpha__GDP; cytosol*A1_8_kf*G_sub_q_endsub__alpha__GTP; A1_8 is "A1-8";  // GO:0003924
    A1_8_kf = 0.0133 per_sec;
  A1_5_2: thrombinR_active => sa40_degraded; cytosol*A1_5_2_kf*thrombinR_active; A1_5_2 is "A1-5.2";  // GO:0030163
    A1_5_2_kf = 0.00224 per_sec;
  C1_2: G_sub_q_endsub__alpha__GTP + s569 -> s564; cytosol*(C1_2_kf*G_sub_q_endsub__alpha__GTP*s569 - C1_2_kb*s564); C1_2 is "C1-2";  // isPartOf GO:0007200; GO:0001965
    C1_2_kf = 25.201 per_uM_per_sec; C1_2_kb = 1 per_sec;
  C1_3: PLC_beta + G_sub_q_endsub__alpha__GTP -> s443; cytosol*(C1_3_kf*PLC_beta*G_sub_q_endsub__alpha__GTP - C1_3_kb*s443); C1_3 is "C1-3";  // GO:0001965; isPartOf GO:0007200
    C1_3_kf = 2.5201 per_uM_per_sec; C1_3_kb = 1 per_sec;
  C1_4: Ca_super_2_plus__endsuper + s443 -> s564; cytosol*(C1_4_kf*Ca_super_2_plus__endsuper*s443 - C1_4_kb*s564); C1_4 is "C1-4";  // isPartOf GO:0007200
    C1_4_kf = 30 per_uM_per_sec; C1_4_kb = 1 per_sec;
  C1_1: PLC_beta + Ca_super_2_plus__endsuper -> s569; cytosol*(C1_1_kf*PLC_beta*Ca_super_2_plus__endsuper - C1_1_kb*s569); C1_1 is "C1-1";  // isPartOf GO:0007202; GO:0005509
    C1_1_kf = 3 per_uM_per_sec; C1_1_kb = 1 per_sec;
  C1_5: s564 => s569 + G_sub_q_endsub__alpha__GDP; cytosol*C1_5_kf*s564; C1_5 is "C1-5";  // GO:0003924
    C1_5_kf = 0.0133 per_sec;
  C2_1_1: s569 + $PIP2 -> PLC_beta__Ca_PIP2; cytosol*((1 + C2_1_1_ratio)*C2_1_1_Vmax*s569*PIP2/C2_1_1_Km - C2_1_1_ratio*C2_1_1_Vmax*PLC_beta__Ca_PIP2); C2_1_1 is "C2-1.1";  // isPartOf kegg.reaction:R03435 GO:0007202; GO:0005546
    C2_1_1_Km = 19.841 microMolar; C2_1_1_ratio = 4 dimensionless; C2_1_1_Vmax = 10 per_sec;
  C2_2_1: s564 + $PIP2 -> s567; cytosol*((1 + C2_2_1_ratio)*C2_2_1_Vmax*s564*PIP2/C2_2_1_Km - C2_2_1_ratio*C2_2_1_Vmax*s567); C2_2_1 is "C2-2.1";  // isPartOf kegg.reaction:R03435 GO:0004435; GO:0005546
    C2_2_1_Km = 5 microMolar; C2_2_1_ratio = 4 dimensionless; C2_2_1_Vmax = 48 per_sec;
  C2_1_2: PLC_beta__Ca_PIP2 => IP3 + DAG + s569; cytosol*C2_1_2_Vmax*PLC_beta__Ca_PIP2; C2_1_2 is "C2-1.2";  // ec-code:3.1.4.11 kegg.reaction:R03435 GO:0004435
    C2_1_2_Vmax = 10 per_sec;
  C2_2_2: s567 => DAG + IP3 + s564; cytosol*C2_2_2_Vmax*s567; C2_2_2 is "C2-2.2";  // ec-code:3.1.4.11 kegg.reaction:R03435 GO:0004435
    C2_2_2_Vmax = 48 per_sec;
  C1_6: DAG => PC; cytosol*C1_6_kf*DAG; C1_6 is "C1-6";  // GO:0046340
    C1_6_kf = 0.15 per_sec;
  C1_7: IP3 => Inositol; cytosol*C1_7_kf*IP3; C1_7 is "C1-7";  // GO:0032957
    C1_7_kf = 2.5 per_sec;
  C1_8: IP3R + 3 IP3 -> _3IP3_IP3R; cytosol*(C1_8_kf*IP3*IP3*IP3*IP3R - C1_8_kb*_3IP3_IP3R); C1_8 is "C1-8";  // GO:0005220
    C1_8_kf = 0.1 per_uM3_per_sec; C1_8_kb = 10 per_sec;
  D3_1: Ca_super_2_plus__endsuper__store -> Ca_super_2_plus__endsuper; cytosol*D3_1_g*_3IP3_IP3R*(Ca_super_2_plus__endsuper__store - Ca_super_2_plus__endsuper); D3_1 is "D3-1";  // modifiers: _3IP3_IP3R; GO:0005220 GO:0015085
    D3_1_g = 150 per_uM_per_sec;
  D1_2: s444 => 2 Ca_super_2_plus__endsuper__store + s430; cytosol*D1_2_kf*s444; D1_2 is "D1-2";  // GO:0006816
    D1_2_kf = 1 per_sec;
  D1_3: CaM + Ca_super_2_plus__endsuper -> Ca_super_2_plus__endsuper__CaM; cytosol*(D1_3_kf*CaM*Ca_super_2_plus__endsuper - D1_3_kb*Ca_super_2_plus__endsuper__CaM); D1_3 is "D1-3";  // GO:0005516 GO:0005509
    D1_3_kf = 10 per_uM_per_sec; D1_3_kb = 50 per_sec;
  D1_4: Ca_super_2_plus__endsuper__CaM + Ca_super_2_plus__endsuper -> _2Ca_super_2_plus__endsuper__CaM; cytosol*(D1_4_kf*Ca_super_2_plus__endsuper__CaM*Ca_super_2_plus__endsuper - D1_4_kb*_2Ca_super_2_plus__endsuper__CaM); D1_4 is "D1-4";  // GO:0005509
    D1_4_kf = 10 per_uM_per_sec; D1_4_kb = 45 per_sec;
  D1_6: _3Ca_super_2_plus__endsuper__CaM + Ca_super_2_plus__endsuper -> _4Ca_super_2_plus__endsuper__CaM; cytosol*(D1_6_kf*_3Ca_super_2_plus__endsuper__CaM*Ca_super_2_plus__endsuper - D1_6_kb*_4Ca_super_2_plus__endsuper__CaM); D1_6 is "D1-6";  // GO:0005509
    D1_6_kf = 10 per_uM_per_sec; D1_6_kb = 500 per_sec;
  D1_5: _2Ca_super_2_plus__endsuper__CaM + Ca_super_2_plus__endsuper -> _3Ca_super_2_plus__endsuper__CaM; cytosol*(D1_5_kf*_2Ca_super_2_plus__endsuper__CaM*Ca_super_2_plus__endsuper - D1_5_kb*_3Ca_super_2_plus__endsuper__CaM); D1_5 is "D1-5";  // GO:0005509
    D1_5_kf = 10 per_uM_per_sec; D1_5_kb = 170 per_sec;
  D1_10: _4Ca_super_2_plus__endsuper__CaM + MLCK -> s295; cytosol*(D1_10_kf*_4Ca_super_2_plus__endsuper__CaM*MLCK - D1_10_kb*s295); D1_10 is "D1-10";  // GO:0019901
    D1_10_kf = 10 per_uM_per_sec; D1_10_kb = 0.01 per_sec;
  D1_9: _3Ca_super_2_plus__endsuper__CaM + MLCK -> s294; cytosol*(D1_9_kf*_3Ca_super_2_plus__endsuper__CaM*MLCK - D1_9_kb*s294); D1_9 is "D1-9";  // GO:0019901
    D1_9_kf = 10 per_uM_per_sec; D1_9_kb = 0.01 per_sec;
  D1_8: _2Ca_super_2_plus__endsuper__CaM + MLCK -> s293; cytosol*(D1_8_kf*_2Ca_super_2_plus__endsuper__CaM*MLCK - D1_8_kb*s293); D1_8 is "D1-8";  // GO:0019901
    D1_8_kf = 0.1 per_uM_per_sec; D1_8_kb = 0.45 per_sec;
  D1_7: Ca_super_2_plus__endsuper__CaM + MLCK -> s292; cytosol*(D1_7_kf*Ca_super_2_plus__endsuper__CaM*MLCK - D1_7_kb*s292); D1_7 is "D1-7";  // GO:0019901
    D1_7_kf = 0.1 per_uM_per_sec; D1_7_kb = 0.5 per_sec;
  E1_1: PKC -> PKC_active1; cytosol*(E1_1_kf*PKC - E1_1_kb*PKC_active1); E1_1 is "E1-1";  // GO:0007205
    E1_1_kf = 1 per_sec; E1_1_kb = 50 per_sec;
  E1_3: PKC + DAG -> PKC_DAG; cytosol*(E1_3_kf*PKC*DAG - E1_3_kb*PKC_DAG); E1_3 is "E1-3";  // GO:0005080 GO:0019992 GO:0008426
    E1_3_kf = 0.0003 per_uM_per_sec; E1_3_kb = 0.1 per_sec;
  E1_5: PKC_Ca_super_2_plus__endsuper -> PKC_active_2; cytosol*(E1_5_kf*PKC_Ca_super_2_plus__endsuper - E1_5_kb*PKC_active_2); E1_5 is "E1-5";  // GO:0007205
    E1_5_kf = 1.2705 per_sec; E1_5_kb = 3.5026 per_sec;
  E1_4: PKC + Ca_super_2_plus__endsuper -> PKC_Ca_super_2_plus__endsuper; cytosol*(E1_4_kf*PKC*Ca_super_2_plus__endsuper - E1_4_kb*PKC_Ca_super_2_plus__endsuper); E1_4 is "E1-4";  // GO:0005509 GO:0005080
    E1_4_kf = 0.3 per_uM_per_sec; E1_4_kb = 0.5 per_sec;
  D2_1_2: s446 => Ca_super_2_plus__endsuper__pump + $Ca_super_2_plus__endsuper__ext; cytosol*D2_1_2_Vmax*s446; D2_1_2 is "D2-1.2";  // GO:0051928
    D2_1_2_Vmax = 4.9 per_sec;
  D1_1: s430 + 2 Ca_super_2_plus__endsuper -> s444; cytosol*(D1_1_kf*Ca_super_2_plus__endsuper*Ca_super_2_plus__endsuper*s430 - D1_1_kb*s444); D1_1 is "D1-1";  // GO:0051928
    D1_1_kf = 30 per_uM2_per_sec; D1_1_kb = 3 per_sec;
  E1_7: PKC_Ca_super_2_plus__endsuper + DAG -> s565; cytosol*(E1_7_kf*PKC_Ca_super_2_plus__endsuper*DAG - E1_7_kb*s565); E1_7 is "E1-7";  // isPartOf GO:0007205; GO:0019992
    E1_7_kf = 0.004 per_uM_per_sec; E1_7_kb = 8.6348 per_sec;
  E1_8: s565 -> PKC_active_3; cytosol*(E1_8_kf*s565 - E1_8_kb*PKC_active_3); E1_8 is "E1-8";  // isPartOf GO:0007205
    E1_8_kf = 1 per_sec; E1_8_kb = 0.1 per_sec;
  E1_9: PKC_active_3 => csa39_degraded; cytosol*E1_9_kf*PKC_active_3; E1_9 is "E1-9";  // GO:0030163
    E1_9_kf = 4.63e-5 per_sec;
  E1_6: PKC_active_2 => csa36_degraded; cytosol*E1_6_kf*PKC_active_2; E1_6 is "E1-6";  // GO:0030163
    E1_6_kf = 4.63e-5 per_sec;
  E1_2: PKC_active1 => csa35_degraded; cytosol*E1_2_kf*PKC_active1; E1_2 is "E1-2";  // GO:0030163
    E1_2_kf = 4.63e-5 per_sec;
  D2_1_1: Ca_super_2_plus__endsuper__pump + Ca_super_2_plus__endsuper -> s446; cytosol*((1 + D2_1_1_ratio)*D2_1_1_Vmax*Ca_super_2_plus__endsuper__pump*Ca_super_2_plus__endsuper/D2_1_1_Km - D2_1_1_Vmax*D2_1_1_ratio*s446); D2_1_1 is "D2-1.1";  // GO:0051928
    D2_1_1_Km = 0.04 microMolar; D2_1_1_ratio = 4 dimensionless; D2_1_1_Vmax = 4.9 per_sec;
  E2_1_1_3: PKC_active_3 + s349 -> PKC_active_3_CPI; cytosol*((1 + E2_1_1_3_ratio)*E2_1_1_3_Vmax*PKC_active_3*s349/E2_1_1_3_Km - E2_1_1_3_Vmax*E2_1_1_3_ratio*PKC_active_3_CPI); E2_1_1_3 is "E2-1.1.3";  // ec-code:2.7.11.13 GO:0005080 GO:0004697
    E2_1_1_3_Km = 0.0014 microMolar; E2_1_1_3_ratio = 4 dimensionless; E2_1_1_3_Vmax = 3.94 per_sec;
  E2_1_1_2: PKC_active_2 + s349 -> PKC_active_2_CPI; cytosol*((1 + E2_1_1_2_ratio)*E2_1_1_2_Vmax*PKC_active_2*s349/E2_1_1_2_Km - E2_1_1_2_ratio*E2_1_1_2_Vmax*PKC_active_2_CPI); E2_1_1_2 is "E2-1.1.2";  // ec-code:2.7.11.13 GO:0005080 GO:0004698
    E2_1_1_2_Km = 0.0014 microMolar; E2_1_1_2_ratio = 4 dimensionless; E2_1_1_2_Vmax = 3.94 per_sec;
  E2_1_1_1: PKC_active1 + s349 -> PKC_active_1_CPI; cytosol*((1 + E2_1_1_1_ratio)*E2_1_1_1_Vmax*PKC_active1*s349/E2_1_1_1_Km - E2_1_1_1_Vmax*E2_1_1_1_ratio*PKC_active_1_CPI); E2_1_1_1 is "E2-1.1.1";  // ec-code:2.7.11.13 GO:0005080 GO:0004699
    E2_1_1_1_Km = 0.0014 microMolar; E2_1_1_1_ratio = 4 dimensionless; E2_1_1_1_Vmax = 3.94 per_sec;
  E2_1_2_3: PKC_active_3_CPI => PKC_active_3 + s350; cytosol*E2_1_2_3_Vmax*PKC_active_3_CPI; E2_1_2_3 is "E2-1.2.3";  // ec-code:2.7.11.13 GO:0004697
    E2_1_2_3_Vmax = 3.94 per_sec;
  E2_1_2_2: PKC_active_2_CPI => PKC_active_2 + s350; cytosol*E2_1_2_2_Vmax*PKC_active_2_CPI; E2_1_2_2 is "E2-1.2.2";  // ec-code:2.7.11.13 GO:0004698
    E2_1_2_2_Vmax = 3.94 per_sec;
  E2_1_2_1: PKC_active_1_CPI => PKC_active1 + s350; cytosol*E2_1_2_1_Vmax*PKC_active_1_CPI; E2_1_2_1 is "E2-1.2.1";  // ec-code:2.7.11.13 GO:0004699
    E2_1_2_1_Vmax = 3.94 per_sec;
  E1_10: s350 => s349; cytosol*E1_10_kf*s350; E1_10 is "E1-10";  // GO:0006470
    E1_10_kf = 0.5 per_sec;
  E1_11: s351 + s350 -> s352; cytosol*(E1_11_kf*s351*s350 - E1_11_kb*s352); E1_11 is "E1-11";  // GO:0017020
    E1_11_kf = 100 per_uM_per_sec; E1_11_kb = 0.62 per_sec;
  E1_12: s351 + s349 -> s355; cytosol*(E1_12_kf*s351*s349 - E1_12_kb*s355); E1_12 is "E1-12";  // GO:0017020
    E1_12_kf = 0.01 per_uM_per_sec; E1_12_kb = 0.1 per_sec;
  E1_13: s352 => s355; cytosol*E1_13_kf*s352; E1_13 is "E1-13";  // GO:0006470
    E1_13_kf = 0.5 per_sec;
  F2_1_1: Rho_kinase + s358 -> s361; cytosol*((1 + F2_1_1_ratio)*F2_1_1_Vmax*Rho_kinase*s358/F2_1_1_Km - F2_1_1_Vmax*F2_1_1_ratio*s361); F2_1_1 is "F2-1.1";  // GO:0032027
    F2_1_1_Km = 4.5099 microMolar; F2_1_1_ratio = 16.617 dimensionless; F2_1_1_Vmax = 1.28 per_sec;
  F2_2_1: Rho_kinase + s359 -> s362; cytosol*((1 + F2_2_1_ratio)*F2_2_1_Vmax*Rho_kinase*s359/F2_2_1_Km - F2_2_1_Vmax*F2_2_1_ratio*s362); F2_2_1 is "F2-2.1";  // GO:0032027
    F2_2_1_Km = 4.5099 microMolar; F2_2_1_ratio = 16.617 dimensionless; F2_2_1_Vmax = 1.28 per_sec;
  F2_1_2: s361 => s359 + Rho_kinase; cytosol*F2_1_2_Vmax*s361; F2_1_2 is "F2-1.2";  // ec-code:2.7.11.1 GO:0004674
    F2_1_2_Vmax = 1.28 per_sec;
  F2_2_2: s362 => s360 + Rho_kinase; cytosol*F2_2_2_Vmax*s362; F2_2_2 is "F2-2.2";  // ec-code:2.7.11.1 GO:0004674
    F2_2_2_Vmax = 1.28 per_sec;
  F2_3_1: Rho_GTP_Rho_kinase + s358 -> s456; cytosol*((1 + F2_3_1_ratio)*F2_3_1_Vmax*Rho_GTP_Rho_kinase*s358/F2_3_1_Km - F2_3_1_Vmax*F2_3_1_ratio*s456); F2_3_1 is "F2-3.1";  // GO:0017049 GO:0032027
    F2_3_1_Km = 2.47 microMolar; F2_3_1_ratio = 0.4261 dimensionless; F2_3_1_Vmax = 8.66 per_sec;
  F2_4_1: Rho_GTP_Rho_kinase + s359 => s449; cytosol*((1 + F2_4_1_ratio)*F2_4_1_Vmax*Rho_GTP_Rho_kinase*s359/F2_4_1_Km - F2_4_1_Vmax*F2_4_1_ratio*s449); F2_4_1 is "F2-4.1";  // GO:0032027 GO:0017049
    F2_4_1_Km = 2.47 microMolar; F2_4_1_ratio = 0.4261 dimensionless; F2_4_1_Vmax = 8.66 per_sec;
  F2_3_2: s456 => Rho_GTP_Rho_kinase + s359; cytosol*F2_3_2_Vmax*s456; F2_3_2 is "F2-3.2";  // ec-code:2.7.11.1 GO:0004674
    F2_3_2_Vmax = 8.66 per_sec;
  F2_4_2: s449 => Rho_GTP_Rho_kinase + s360; cytosol*F2_4_2_Vmax*s449; F2_4_2 is "F2-4.2";  // ec-code:2.7.11.1 GO:0004674
    F2_4_2_Vmax = 8.66 per_sec;
  F2_14_1: Rho_kinase + s351 -> s463; cytosol*((1 + F2_14_1_ratio)*F2_14_1_Vmax*Rho_kinase*s351/F2_14_1_Km - F2_14_1_Vmax*F2_14_1_ratio*s463); F2_14_1 is "F2-14.1";  // GO:0019901 GO:0017020
    F2_14_1_Km = 0.18 microMolar; F2_14_1_ratio = 0.23288 dimensionless; F2_14_1_Vmax = 1.46 per_sec;
  F2_14_2: s463 => Rho_kinase + s570; cytosol*F2_14_2_Vmax*s463; F2_14_2 is "F2-14.2";  // ec-code:2.7.11.1 GO:0004674 GO:0017020
    F2_14_2_Vmax = 1.46 per_sec;
  F2_13_1: Rho_GTP_Rho_kinase + s351 -> s496; cytosol*((1 + F2_13_1_ratio)*F2_13_1_Vmax*Rho_GTP_Rho_kinase*s351/F2_13_1_Km - F2_13_1_Vmax*F2_13_1_ratio*s496); F2_13_1 is "F2-13.1";  // GO:0019901 GO:0017049 GO:0017020
    F2_13_1_Km = 0.1 microMolar; F2_13_1_ratio = 0.028278 dimensionless; F2_13_1_Vmax = 17.505 per_sec;
  F2_13_2: s496 => Rho_GTP_Rho_kinase + s570; cytosol*F2_13_2_Vmax*s496; F2_13_2 is "F2-13.2";  // ec-code:2.7.11.1 GO:0004674 GO:0017020
    F2_13_2_Vmax = 17.505 per_sec;
  F2_11_1: s360 + s570 -> s467; cytosol*((1 + F2_11_1_ratio)*F2_11_1_Vmax*s360*s570/F2_11_1_Km - F2_11_1_Vmax*F2_11_1_ratio*s467); F2_11_1 is "F2-11.1";  // GO:0017018 GO:0032027
    F2_11_1_Km = 58.099 microMolar; F2_11_1_ratio = 28.795 dimensionless; F2_11_1_Vmax = 1.95 per_sec;
  F2_9_1: s360 + s351 -> s470; cytosol*((1 + F2_9_1_ratio)*F2_9_1_Vmax*s360*s351/F2_9_1_Km - F2_9_1_Vmax*F2_9_1_ratio*s470); F2_9_1 is "F2-9.1";  // GO:0017018 GO:0032027
    F2_9_1_Km = 16 microMolar; F2_9_1_ratio = 7.5865 dimensionless; F2_9_1_Vmax = 9.317 per_sec;
  F2_12_1: s359 + s570 -> s477; cytosol*((1 + F2_12_1_ratio)*F2_12_1_Vmax*s359*s570/F2_12_1_Km - F2_12_1_Vmax*F2_12_1_ratio*s477); F2_12_1 is "F2-12.1";  // GO:0017018 GO:0032027
    F2_12_1_Km = 58.099 microMolar; F2_12_1_ratio = 28.795 dimensionless; F2_12_1_Vmax = 1.95 per_sec;
  F2_10_1: s359 + s351 -> s480; cytosol*((1 + F2_10_1_ratio)*F2_10_1_Vmax*s351*s359/F2_10_1_Km - F2_10_1_Vmax*F2_10_1_ratio*s480); F2_10_1 is "F2-10.1";  // GO:0017018 GO:0032027
    F2_10_1_Km = 16 microMolar; F2_10_1_ratio = 7.5865 dimensionless; F2_10_1_Vmax = 9.317 per_sec;
  F2_11_2: s467 => s359 + s570; cytosol*F2_11_2_Vmax*s467; F2_11_2 is "F2-11.2";  // ec-code:3.1.3.53 kegg.reaction:R03151 GO:0050115
    F2_11_2_Vmax = 1.95 per_sec;
  F2_9_2: s470 => s359 + s351; cytosol*F2_9_2_Vmax*s470; F2_9_2 is "F2-9.2";  // ec-code:3.1.3.53 kegg.reaction:R03151 GO:0050115
    F2_9_2_Vmax = 9.317 per_sec;
  F2_12_2: s477 => s358 + s570; cytosol*F2_12_2_Vmax*s477; F2_12_2 is "F2-12.2";  // ec-code:3.1.3.53 kegg.reaction:R03151 GO:0050115
    F2_12_2_Vmax = 1.95 per_sec;
  F2_10_2: s480 => s358 + s351; cytosol*F2_10_2_Vmax*s480; F2_10_2 is "F2-10.2";  // ec-code:3.1.3.53 kegg.reaction:R03151 GO:0050115
    F2_10_2_Vmax = 9.317 per_sec;
  F1_1: s570 => s351; cytosol*F1_1_kf*s570; F1_1 is "F1-1";  // GO:0017020 GO:0006470
    F1_1_kf = 0.2 per_sec;
  F2_7_1: s358 + MLCK -> s487; cytosol*((1 + F2_7_1_ratio)*F2_7_1_Vmax*MLCK*s358/F2_7_1_Km - F2_7_1_Vmax*F2_7_1_ratio*s487); F2_7_1 is "F2-7.1";  // GO:0032027 GO:0019901
    F2_7_1_Km = 148.08 microMolar; F2_7_1_ratio = 39.349 dimensionless; F2_7_1_Vmax = 3.67 per_sec;
  F2_8_1: s359 + MLCK -> s491; cytosol*((1 + F2_8_1_ratio)*F2_8_1_Vmax*MLCK*s359/F2_8_1_Km - F2_8_1_Vmax*F2_8_1_ratio*s491); F2_8_1 is "F2-8.1";  // GO:0032027 GO:0019901
    F2_8_1_Km = 148.08 microMolar; F2_8_1_ratio = 39.349 dimensionless; F2_8_1_Vmax = 3.67 per_sec;
  F2_7_2: s487 => s359 + MLCK; cytosol*F2_7_2_Vmax*s487; F2_7_2 is "F2-7.2";  // ec-code:2.7.11.18 kegg.reaction:R03150 GO:0004687
    F2_7_2_Vmax = 3.67 per_sec;
  F2_8_2: s491 => s360 + MLCK; cytosol*F2_8_2_Vmax*s491; F2_8_2 is "F2-8.2";  // ec-code:2.7.11.18 kegg.reaction:R03150 GO:0004687
    F2_8_2_Vmax = 3.67 per_sec;
  F2_5_1_1: s358 + s292 -> s551; cytosol*((1 + F2_5_1_1_ratio)*F2_5_1_1_Vmax*s292*s358/F2_5_1_1_Km - F2_5_1_1_Vmax*F2_5_1_1_ratio*s551); F2_5_1_1 is "F2-5.1.1";  // GO:0032027; isPartOf kegg.reaction:R03150
    F2_5_1_1_Km = 10.019 microMolar; F2_5_1_1_ratio = 1.7299 dimensionless; F2_5_1_1_Vmax = 3.67 per_sec;
  F2_5_2_1: s358 + s293 -> s539; cytosol*((1 + F2_5_2_1_ratio)*F2_5_2_1_Vmax*s293*s358/F2_5_2_1_Km - F2_5_2_1_Vmax*F2_5_2_1_ratio*s539); F2_5_2_1 is "F2-5.2.1";  // GO:0032027; isPartOf kegg.reaction:R03150
    F2_5_2_1_Km = 10.019 microMolar; F2_5_2_1_ratio = 1.7299 dimensionless; F2_5_2_1_Vmax = 3.67 per_sec;
  F2_5_3_1: s358 + s294 -> s520; cytosol*((1 + F2_5_3_1_ratio)*F2_5_3_1_Vmax*s294*s358/F2_5_3_1_Km - F2_5_3_1_Vmax*F2_5_3_1_ratio*s520); F2_5_3_1 is "F2-5.3.1";  // GO:0032027; isPartOf kegg.reaction:R03150
    F2_5_3_1_Km = 10.019 microMolar; F2_5_3_1_ratio = 1.7299 dimensionless; F2_5_3_1_Vmax = 3.67 per_sec;
  F2_5_4_1: s358 + s295 -> s513; cytosol*((1 + F2_5_4_1_ratio)*F2_5_4_1_Vmax*s295*s358/F2_5_4_1_Km - F2_5_4_1_Vmax*F2_5_4_1_ratio*s513); F2_5_4_1 is "F2-5.4.1";  // GO:0032027; isPartOf kegg.reaction:R03150
    F2_5_4_1_Km = 10.019 microMolar; F2_5_4_1_ratio = 1.7299 dimensionless; F2_5_4_1_Vmax = 3.67 per_sec;
  F2_6_1_1: s359 + s292 -> s546; cytosol*((1 + F2_6_1_1_ratio)*F2_6_1_1_Vmax*s292*s359/F2_6_1_1_Km - F2_6_1_1_Vmax*F2_6_1_1_ratio*s546); F2_6_1_1 is "F2-6.1.1";  // GO:0032027; isPartOf kegg.reaction:R03150
    F2_6_1_1_Km = 10.019 microMolar; F2_6_1_1_ratio = 1.7299 dimensionless; F2_6_1_1_Vmax = 3.67 per_sec;
  F2_6_2_1: s359 + s293 -> s526; cytosol*((1 + F2_6_2_1_ratio)*F2_6_2_1_Vmax*s293*s359/F2_6_2_1_Km - F2_6_2_1_Vmax*F2_6_2_1_ratio*s526); F2_6_2_1 is "F2-6.2.1";  // GO:0032027; kegg.reaction:R03150
    F2_6_2_1_Km = 10.019 microMolar; F2_6_2_1_ratio = 1.7299 dimensionless; F2_6_2_1_Vmax = 3.67 per_sec;
  F2_6_3_1: s359 + s294 -> s512; cytosol*((1 + F2_6_3_1_ratio)*F2_6_3_1_Vmax*s294*s359/F2_6_3_1_Km - F2_6_3_1_Vmax*F2_6_3_1_ratio*s512); F2_6_3_1 is "F2-6.3.1";  // GO:0032027; isPartOf kegg.reaction:R03150
    F2_6_3_1_Km = 10.019 microMolar; F2_6_3_1_ratio = 1.7299 dimensionless; F2_6_3_1_Vmax = 3.67 per_sec;
  F2_6_4_1: s359 + s295 -> s506; cytosol*((1 + F2_6_4_1_ratio)*F2_6_4_1_Vmax*s295*s359/F2_6_4_1_Km - F2_6_4_1_Vmax*F2_6_4_1_ratio*s506); F2_6_4_1 is "F2-6.4.1";  // GO:0032027; kegg.reaction:R03150
    F2_6_4_1_Km = 10.019 microMolar; F2_6_4_1_ratio = 1.7299 dimensionless; F2_6_4_1_Vmax = 3.67 per_sec;
  F2_6_4_2: s506 => s360 + s295; cytosol*F2_6_4_2_Vmax*s506; F2_6_4_2 is "F2-6.4.2";  // ec-code:2.7.11.18 kegg.reaction:R03150 GO:0004687
    F2_6_4_2_Vmax = 3.67 per_sec;
  F2_5_4_2: s513 => s359 + s295; cytosol*F2_5_4_2_Vmax*s513; F2_5_4_2 is "F2-5.4.2";  // ec-code:2.7.11.18 kegg.reaction:R03150 GO:0004687
    F2_5_4_2_Vmax = 3.67 per_sec;
  F2_6_3_2: s512 => s360 + s294; cytosol*F2_6_3_2_Vmax*s512; F2_6_3_2 is "F2-6.3.2";  // ec-code:2.7.11.18 kegg.reaction:R03150 GO:0004687
    F2_6_3_2_Vmax = 3.67 per_sec;
  F2_5_3_2: s520 => s359 + s294; cytosol*F2_5_3_2_Vmax*s520; F2_5_3_2 is "F2-5.3.2";  // ec-code:2.7.11.18 kegg.reaction:R03150 GO:0004687
    F2_5_3_2_Vmax = 3.67 per_sec;
  F2_6_2_2: s526 => s360 + s293; cytosol*F2_6_2_2_Vmax*s526; F2_6_2_2 is "F2-6.2.2";  // ec-code:2.7.11.18 kegg.reaction:R03150 GO:0004687
    F2_6_2_2_Vmax = 3.67 per_sec;
  F2_5_2_2: s539 => s359 + s293; cytosol*F2_5_2_2_Vmax*s539; F2_5_2_2 is "F2-5.2.2";  // ec-code:2.7.11.18 kegg.reaction:R03150 GO:0004687
    F2_5_2_2_Vmax = 3.67 per_sec;
  F2_6_1_2: s546 => s360 + s292; cytosol*F2_6_1_2_Vmax*s546; F2_6_1_2 is "F2-6.1.2";  // ec-code:2.7.11.18 kegg.reaction:R03150 GO:0004687
    F2_6_1_2_Vmax = 3.67 per_sec;
  F2_5_1_2: s551 => s359 + s292; cytosol*F2_5_1_2_Vmax*s551; F2_5_1_2 is "F2-5.1.2";  // ec-code:2.7.11.18 kegg.reaction:R03150 GO:0004687
    F2_5_1_2_Vmax = 3.67 per_sec;
  D3_3: $Ca_super_2_plus__endsuper__ext -> Ca_super_2_plus__endsuper; cytosol*D3_3_g*s556*(Ca_super_2_plus__endsuper__ext - Ca_super_2_plus__endsuper); D3_3 is "D3-3";  // modifiers: s556; GO:0006816
    D3_3_g = 0.01 per_uM_per_sec;
  D3_2: Ca_super_2_plus__endsuper__store -> Ca_super_2_plus__endsuper; cytosol*D3_2_g*s557*(Ca_super_2_plus__endsuper__store - Ca_super_2_plus__endsuper); D3_2 is "D3-2";  // modifiers: s557; GO:0006816
    D3_2_g = 0.01 per_uM_per_sec;

  // Events:
  event_0000001: at (time >= 300): thrombin = 0.01;

  // Unit definitions:
  unit substance = 1e-6 mole; substance is "micromoles";
  unit microMolar = 1e-6 mole / litre;
  unit per_uM_per_sec = litre / (1e-6 mole * second);
  unit per_sec = 1 / second;
  unit per_uM2_per_sec = litre^2 / ((1e-6 mole)^2 * second);
  unit per_uM3_per_sec = litre^3 / ((1e-6 mole)^3 * second);
  unit volume = litre;
  unit area = metre^2;
end
