// SBML level 2 version 1
// This model was downloaded from BioModels Database
// http://www.ebi.ac.uk/biomodels/

model BIOMD0000000105()
  // Proctor2007 - Age related decline of proteolysis, ubiquitin-proteome system
  // This is a stochastic model of the ubiquitin-proteasome system for a generic pool of native proteins (NatP), which have a half-life of about 10 hours under normal conditions. It is assumed that these proteins are only degraded after they have lost their native structure due to a damage event. This is represented in the model by the misfolding reaction which depends on the level of reactive oxygen species (ROS) in the cell. Misfolded proteins (MisP) are first bound by an E3 ubiquitin ligase. Ubiquitin (Ub) is activated by E1 (ubiquitin-activating enzyme) and then passed to E2 (ubiquitin-conjugating enzyme). The E2 enzyme then passes the ubiquitin molecule to the E3/MisP complex with the net effect that the misfolded protein is monoubiquitinated and both E2 and E3 are released. Further ubiquitin molecules are added in a step-wise manner. When the chain of ubiquitin molecules is of length 4 or more, the polyubiquitinated misfolded protein may bind to the proteasome. The model also includes de-ubiquitinating enzymes (DUB) which cleave ubiquitin molecules from the chain in a step-wise manner. They work on chains attached to misfolded proteins both unbound and bound to the proteasomes. Misfolded proteins bound to the proteasome may be degraded releasing ubiquitin. Misfolded proteins including ubiquitinated proteins may also aggregate. Aggregates (AggP) may be sequestered (Seq_AggP) which takes them out of harm's way or they may bind to the proteasome (AggP_Proteasome). Proteasomes bound by aggregates are no longer available for protein degradation.
  // Figure 2 and Figure 3 has been simulated using Gillespie2.
  // This model is described in the article:
  // An in silico model of the ubiquitin-proteasome system that incorporates normal homeostasis and age-related decline.
  // Proctor CJ, Tsirigotis M, Gray DA.
  // BMC Syst Biol 2007; 1: 17
  // Abstract:
  // BACKGROUND: The ubiquitin-proteasome system is responsible for homeostatic degradation of intact protein substrates as well as the elimination of damaged or misfolded proteins that might otherwise aggregate. During ageing there is a decline in proteasome activity and an increase in aggregated proteins. Many neurodegenerative diseases are characterised by the presence of distinctive ubiquitin-positive inclusion bodies in affected regions of the brain. These inclusions consist of insoluble, unfolded, ubiquitinated polypeptides that fail to be targeted and degraded by the proteasome. We are using a systems biology approach to try and determine the primary event in the decline in proteolytic capacity with age and whether there is in fact a vicious cycle of inhibition, with accumulating aggregates further inhibiting proteolysis, prompting accumulation of aggregates and so on. A stochastic model of the ubiquitin-proteasome system has been developed using the Systems Biology Mark-up Language (SBML). Simulations are carried out on the BASIS (Biology of Ageing e-Science Integration and Simulation) system and the model output is compared to experimental data wherein levels of ubiquitin and ubiquitinated substrates are monitored in cultured cells under various conditions. The model can be used to predict the effects of different experimental procedures such as inhibition of the proteasome or shutting down the enzyme cascade responsible for ubiquitin conjugation. RESULTS: The model output shows good agreement with experimental data under a number of different conditions. However, our model predicts that monomeric ubiquitin pools are always depleted under conditions of proteasome inhibition, whereas experimental data show that monomeric pools were depleted in IMR-90 cells but not in ts20 cells, suggesting that cell lines vary in their ability to replenish ubiquitin pools and there is the need to incorporate ubiquitin turnover into the model. Sensitivity analysis of the model revealed which parameters have an important effect on protein turnover and aggregation kinetics. CONCLUSION: We have developed a model of the ubiquitin-proteasome system using an iterative approach of model building and validation against experimental data. Using SBML to encode the model ensures that it can be easily modified and extended as more data become available. Important aspects to be included in subsequent models are details of ubiquitin turnover, models of autophagy, the inclusion of a pool of short-lived proteins and further details of the aggregation process.
  // This model is hosted on BioModels Database and identified by: BIOMD0000000105.
  // To cite BioModels Database, please use: BioModels Database: An enhanced, curated and annotated resource for published quantitative kinetic models.
  // To the extent possible under law, all copyright and related or neighbouring rights to this encoded model have been dedicated to the public domain worldwide. Please refer to CC0 Public Domain Dedication for more information.
  // biomodels.db:MODEL6540028317
  // biomodels.db:BIOMD0000000105
  // isDescribedBy pubmed:17408507
  // isDerivedFrom biomodels.db:BIOMD0000000091
  // hasProperty DOID:1289
  // isVersionOf GO:0043161

  // Compartments:
  compartment cytosol = 1;  // isVersionOf GO:0005829

  // Species:
  substanceOnly species NatP in cytosol = 500;
  substanceOnly species MisP in cytosol = 0;
  substanceOnly species Ub in cytosol = 500;  // isVersionOf interpro:IPR000626
  substanceOnly species E1 in cytosol = 100;  // isVersionOf interpro:IPR000011
  substanceOnly species E2 in cytosol = 100;  // isVersionOf interpro:IPR000608
  substanceOnly species E3 in cytosol = 100;  // isVersionOf interpro:IPR000569
  substanceOnly species DUB in cytosol = 200;  // isVersionOf interpro:IPR001394
  substanceOnly species Proteasome in cytosol = 100;  // isVersionOf GO:0000502
  substanceOnly species ROS in cytosol = 10;  // isVersionOf CHEBI:26523
  substanceOnly species E1_Ub in cytosol = 0;  // hasPart interpro:IPR000011 interpro:IPR000626
  substanceOnly species E2_Ub in cytosol = 0;  // hasPart interpro:IPR000626 interpro:IPR000608
  substanceOnly species E3_MisP in cytosol = 0;
  substanceOnly species MisP_Ub in cytosol = 0;
  substanceOnly species MisP_Ub2 in cytosol = 0;
  substanceOnly species MisP_Ub3 in cytosol = 0;
  substanceOnly species MisP_Ub4 in cytosol = 0;
  substanceOnly species MisP_Ub5 in cytosol = 0;
  substanceOnly species MisP_Ub6 in cytosol = 0;
  substanceOnly species MisP_Ub7 in cytosol = 0;
  substanceOnly species MisP_Ub8 in cytosol = 0;
  substanceOnly species MisP_Ub4_Proteasome in cytosol = 0;
  substanceOnly species MisP_Ub5_Proteasome in cytosol = 0;
  substanceOnly species MisP_Ub6_Proteasome in cytosol = 0;
  substanceOnly species MisP_Ub7_Proteasome in cytosol = 0;
  substanceOnly species MisP_Ub8_Proteasome in cytosol = 0;
  substanceOnly species $ATP in cytosol = 10000;  // CHEBI:15422
  substanceOnly species $ADP in cytosol = 1000;  // CHEBI:16761
  substanceOnly species $AMP in cytosol = 1000;  // CHEBI:16027
  substanceOnly species $Source in cytosol = 1;
  substanceOnly species degUb4 in cytosol = 0;
  substanceOnly species degUb5 in cytosol = 0;
  substanceOnly species degUb6 in cytosol = 0;
  substanceOnly species degUb7 in cytosol = 0;
  substanceOnly species degUb8 in cytosol = 0;
  substanceOnly species totMisP in cytosol = 0;
  substanceOnly species refNatP in cytosol = 0;
  substanceOnly species AggP in cytosol = 0;
  substanceOnly species SeqAggP in cytosol = 0;
  substanceOnly species AggP_Proteasome in cytosol = 0;

  // Parameters:
  k1 = 0.01;
  k2 = 2e-6;
  k3 = 4e-6;
  k61 = 1.7e-5;
  k61r = 0.0002;
  k62 = 0.0002;
  k63 = 0.001;
  k64 = 0.001;
  k65 = 0.01;
  k66 = 1e-5;
  k67 = 1e-5;
  k68 = 1e-5;
  // This is the inhibiting proteasome activity situlation, k69=0. All the other parameters as in Tables2 and 3. If in the model is in the normal conditions, k69=1e-3.
  k69 = 0;
  k71 = 1e-8;
  k72 = 1e-8;
  k73 = 0.001;
  k74 = 1e-5;

  // Reactions:
  ProteinSynthesis: $Source => NatP; k1*Source;  // isVersionOf GO:0009059
  Misfolding: NatP + ROS => MisP + ROS + totMisP; k2*NatP*ROS;  // hasVersion GO:0022417
  Refolding: MisP => NatP + refNatP; k3*MisP;  // isVersionOf GO:0042026
  MisPE3Binding: MisP + E3 => E3_MisP; k61*MisP*E3;  // isVersionOf GO:0004842 GO:0005515
  MisPE3Release: E3_MisP => MisP + E3; k61r*E3_MisP;  // isVersionOf GO:0043624
  E1UbBinding: E1 + Ub + $ATP => E1_Ub + $AMP; k62*E1*Ub*ATP/(5000 + ATP);  // isVersionOf GO:0005515 GO:0008641 GO:0006167
  E2UbBinding: E2 + E1_Ub => E2_Ub + E1; k63*E2*E1_Ub;  // isVersionOf GO:0019787 GO:0005515
  Monoubiquitination: E2_Ub + E3_MisP => MisP_Ub + E2 + E3; k64*E2_Ub*E3_MisP;  // isVersionOf GO:0006513
  Polyubiquitination1: MisP_Ub + E2_Ub => MisP_Ub2 + E2; k65*MisP_Ub*E2_Ub;  // isVersionOf GO:0000209
  Polyubiquitination2: MisP_Ub2 + E2_Ub => MisP_Ub3 + E2; k65*MisP_Ub2*E2_Ub;  // isVersionOf GO:0000209
  Polyubiquitination3: MisP_Ub3 + E2_Ub => MisP_Ub4 + E2; k65*MisP_Ub3*E2_Ub;  // isVersionOf GO:0000209
  Polyubiquitination4: MisP_Ub4 + E2_Ub => MisP_Ub5 + E2; k65*MisP_Ub4*E2_Ub;  // isVersionOf GO:0000209
  Polyubiquitination5: MisP_Ub5 + E2_Ub => MisP_Ub6 + E2; k65*MisP_Ub5*E2_Ub;  // isVersionOf GO:0000209
  Polyubiquitination6: MisP_Ub6 + E2_Ub => MisP_Ub7 + E2; k65*MisP_Ub6*E2_Ub;  // isVersionOf GO:0000209
  Polyubiquitination7: MisP_Ub7 + E2_Ub => MisP_Ub8 + E2; k65*MisP_Ub7*E2_Ub;  // isVersionOf GO:0000209
  Deubiqutination1: MisP_Ub8 + DUB => MisP_Ub7 + DUB + Ub; k66*MisP_Ub8*DUB;  // isVersionOf GO:0016579
  Deubiqutination2: MisP_Ub7 + DUB => MisP_Ub6 + DUB + Ub; k66*MisP_Ub7*DUB;  // isVersionOf GO:0016579
  Deubiqutination3: MisP_Ub6 + DUB => MisP_Ub5 + DUB + Ub; k66*MisP_Ub6*DUB;  // isVersionOf GO:0016579
  Deubiqutination4: MisP_Ub5 + DUB => MisP_Ub4 + DUB + Ub; k66*MisP_Ub5*DUB;  // isVersionOf GO:0016579
  Deubiqutination5: MisP_Ub4 + DUB => MisP_Ub3 + DUB + Ub; k66*MisP_Ub4*DUB;  // isVersionOf GO:0016579
  Deubiqutination6: MisP_Ub3 + DUB => MisP_Ub2 + DUB + Ub; k66*MisP_Ub3*DUB;  // isVersionOf GO:0016579
  Deubiqutination7: MisP_Ub2 + DUB => MisP_Ub + DUB + Ub; k66*MisP_Ub2*DUB;  // isVersionOf GO:0016579
  Deubiqutination8: MisP_Ub + DUB => MisP + DUB + Ub; k66*MisP_Ub*DUB;  // isVersionOf GO:0016579
  ProteasomeBinding1: MisP_Ub4 + Proteasome => MisP_Ub4_Proteasome; k67*MisP_Ub4*Proteasome;  // isVersionOf GO:0005515
  ProteasomeBinding2: MisP_Ub5 + Proteasome => MisP_Ub5_Proteasome; k67*MisP_Ub5*Proteasome;  // isVersionOf GO:0005515
  ProteasomeBinding3: MisP_Ub6 + Proteasome => MisP_Ub6_Proteasome; k67*MisP_Ub6*Proteasome;  // isVersionOf GO:0005515
  ProteasomeBinding4: MisP_Ub7 + Proteasome => MisP_Ub7_Proteasome; k67*MisP_Ub7*Proteasome;  // isVersionOf GO:0005515
  ProteasomeBinding5: MisP_Ub8 + Proteasome => MisP_Ub8_Proteasome; k67*MisP_Ub8*Proteasome;  // isVersionOf GO:0005515
  DeubiquitinationBoundMisP5: MisP_Ub8_Proteasome + DUB => MisP_Ub7_Proteasome + Ub + DUB; k68*MisP_Ub8_Proteasome*DUB;  // isVersionOf GO:0016579
  DeubiquitinationBoundMisP4: MisP_Ub7_Proteasome + DUB => MisP_Ub6_Proteasome + Ub + DUB; k68*MisP_Ub7_Proteasome*DUB;  // isVersionOf GO:0016579
  DeubiquitinationBoundMisP3: MisP_Ub6_Proteasome + DUB => MisP_Ub5_Proteasome + Ub + DUB; k68*MisP_Ub6_Proteasome*DUB;  // isVersionOf GO:0016579
  DeubiquitinationBoundMisP2: MisP_Ub5_Proteasome + DUB => MisP_Ub4_Proteasome + Ub + DUB; k68*MisP_Ub5_Proteasome*DUB;  // isVersionOf GO:0016579
  DeubiquitinationBoundMisP1: MisP_Ub4_Proteasome + DUB => MisP_Ub3 + Proteasome + Ub + DUB; k68*MisP_Ub4_Proteasome*DUB;  // isVersionOf GO:0016579
  ProteasomeActivity1: MisP_Ub4_Proteasome + $ATP => 4 Ub + Proteasome + $ADP + degUb4; k69*MisP_Ub4_Proteasome*ATP/(5000 + ATP);  // isVersionOf GO:0016887 GO:0008233
  ProteasomeActivity2: MisP_Ub5_Proteasome + $ATP => 5 Ub + Proteasome + $ADP + degUb5; k69*MisP_Ub5_Proteasome*ATP/(5000 + ATP);  // isVersionOf GO:0016887 GO:0008233
  ProteasomeActivity3: MisP_Ub6_Proteasome + $ATP => 6 Ub + Proteasome + $ADP + degUb6; k69*MisP_Ub6_Proteasome*ATP/(5000 + ATP);  // isVersionOf GO:0016887 GO:0008233
  ProteasomeActivity4: MisP_Ub7_Proteasome + $ATP => 7 Ub + Proteasome + $ADP + degUb7; k69*MisP_Ub7_Proteasome*ATP/(5000 + ATP);  // isVersionOf GO:0016887 GO:0008233
  ProteasomeActivity5: MisP_Ub8_Proteasome + $ATP => 8 Ub + Proteasome + $ADP + degUb8; k69*MisP_Ub8_Proteasome*ATP/(5000 + ATP);  // isVersionOf GO:0016887 GO:0008233
  Aggregation1: 2 MisP => AggP; k71*MisP*(MisP - 1)*0.5;  // isVersionOf GO:0006461
  Aggregation2: MisP + AggP => 2 AggP; k71*MisP*AggP;  // isVersionOf GO:0006461
  Aggregation3: 2 MisP_Ub => AggP; k72*MisP_Ub*(MisP_Ub - 1)*0.5;  // isVersionOf GO:0006461
  Aggregation4: 2 MisP_Ub2 => AggP; k72*MisP_Ub2*(MisP_Ub2 - 1)*0.5;  // isVersionOf GO:0006461
  Aggregation5: 2 MisP_Ub3 => AggP; k72*MisP_Ub3*(MisP_Ub3 - 1)*0.5;  // isVersionOf GO:0006461
  Aggregation6: 2 MisP_Ub4 => AggP; k72*MisP_Ub4*(MisP_Ub4 - 1)*0.5;  // isVersionOf GO:0006461
  Aggregation7: 2 MisP_Ub5 => AggP; k72*MisP_Ub5*(MisP_Ub5 - 1)*0.5;  // isVersionOf GO:0006461
  Aggregation8: 2 MisP_Ub6 => AggP; k72*MisP_Ub6*(MisP_Ub6 - 1)*0.5;  // isVersionOf GO:0006461
  Aggregation9: 2 MisP_Ub7 => AggP; k72*MisP_Ub7*(MisP_Ub7 - 1)*0.5;  // isVersionOf GO:0006461
  Aggregation10: 2 MisP_Ub8 => AggP; k72*MisP_Ub8*(MisP_Ub8 - 1)*0.5;  // isVersionOf GO:0006461
  Aggregation11: MisP_Ub + MisP => AggP; k72*MisP_Ub*MisP;  // isVersionOf GO:0006461
  Aggregation12: MisP_Ub2 + MisP => AggP; k72*MisP_Ub2*MisP;  // isVersionOf GO:0006461
  Aggregation13: MisP_Ub3 + MisP => AggP; k72*MisP_Ub3*MisP;  // isVersionOf GO:0006461
  Aggregation14: MisP_Ub4 + MisP => AggP; k72*MisP_Ub4*MisP;  // isVersionOf GO:0006461
  Aggregation15: MisP_Ub5 + MisP => AggP; k72*MisP_Ub5*MisP;  // isVersionOf GO:0006461
  Aggregation16: MisP_Ub6 + MisP => AggP; k72*MisP_Ub6*MisP;  // isVersionOf GO:0006461
  Aggregation17: MisP_Ub7 + MisP => AggP; k72*MisP_Ub7*MisP;  // isVersionOf GO:0006461
  Aggregation18: MisP_Ub8 + MisP => AggP; k72*MisP_Ub8*MisP;  // isVersionOf GO:0006461
  Aggregation19: MisP_Ub + AggP => 2 AggP; k72*MisP_Ub*AggP;  // isVersionOf GO:0006461
  Aggregation20: MisP_Ub2 + AggP => 2 AggP; k72*MisP_Ub2*AggP;  // isVersionOf GO:0006461
  Aggregation21: MisP_Ub3 + AggP => 2 AggP; k72*MisP_Ub3*AggP;  // isVersionOf GO:0006461
  Aggregation22: MisP_Ub4 + AggP => 2 AggP; k72*MisP_Ub4*AggP;  // isVersionOf GO:0006461
  Aggregation23: MisP_Ub5 + AggP => 2 AggP; k72*MisP_Ub5*AggP;  // isVersionOf GO:0006461
  Aggregation24: MisP_Ub6 + AggP => 2 AggP; k72*MisP_Ub6*AggP;  // isVersionOf GO:0006461
  Aggregation25: MisP_Ub7 + AggP => 2 AggP; k72*MisP_Ub7*AggP;  // isVersionOf GO:0006461
  Aggregation26: MisP_Ub8 + AggP => 2 AggP; k72*MisP_Ub8*AggP;  // isVersionOf GO:0006461
  Aggregation27: MisP_Ub + MisP_Ub2 => AggP; k72*MisP_Ub*MisP_Ub2;  // isVersionOf GO:0006461
  Aggregation28: MisP_Ub + MisP_Ub3 => AggP; k72*MisP_Ub*MisP_Ub3;  // isVersionOf GO:0006461
  Aggregation29: MisP_Ub + MisP_Ub4 => AggP; k72*MisP_Ub*MisP_Ub4;  // isVersionOf GO:0006461
  Aggregation30: MisP_Ub + MisP_Ub5 => AggP; k72*MisP_Ub*MisP_Ub5;  // isVersionOf GO:0006461
  Aggregation31: MisP_Ub + MisP_Ub6 => AggP; k72*MisP_Ub*MisP_Ub6;  // isVersionOf GO:0006461
  Aggregation32: MisP_Ub + MisP_Ub7 => AggP; k72*MisP_Ub*MisP_Ub7;  // isVersionOf GO:0006461
  Aggregation33: MisP_Ub + MisP_Ub8 => AggP; k72*MisP_Ub*MisP_Ub8;  // isVersionOf GO:0006461
  Aggregation34: MisP_Ub2 + MisP_Ub3 => AggP; k72*MisP_Ub2*MisP_Ub3;  // isVersionOf GO:0006461
  Aggregation35: MisP_Ub2 + MisP_Ub4 => AggP; k72*MisP_Ub2*MisP_Ub4;  // isVersionOf GO:0006461
  Aggregation36: MisP_Ub2 + MisP_Ub5 => AggP; k72*MisP_Ub2*MisP_Ub5;  // isVersionOf GO:0006461
  Aggregation37: MisP_Ub2 + MisP_Ub6 => AggP; k72*MisP_Ub2*MisP_Ub6;  // isVersionOf GO:0006461
  Aggregation38: MisP_Ub2 + MisP_Ub7 => AggP; k72*MisP_Ub2*MisP_Ub7;  // isVersionOf GO:0006461
  Aggregation39: MisP_Ub2 + MisP_Ub8 => AggP; k72*MisP_Ub2*MisP_Ub8;  // isVersionOf GO:0006461
  Aggregation40: MisP_Ub3 + MisP_Ub4 => AggP; k72*MisP_Ub3*MisP_Ub4;  // isVersionOf GO:0006461
  Aggregation41: MisP_Ub3 + MisP_Ub5 => AggP; k72*MisP_Ub3*MisP_Ub5;  // isVersionOf GO:0006461
  Aggregation42: MisP_Ub3 + MisP_Ub6 => AggP; k72*MisP_Ub3*MisP_Ub6;  // isVersionOf GO:0006461
  Aggregation43: MisP_Ub3 + MisP_Ub7 => AggP; k72*MisP_Ub3*MisP_Ub7;  // isVersionOf GO:0006461
  Aggregation44: MisP_Ub3 + MisP_Ub8 => AggP; k72*MisP_Ub3*MisP_Ub8;  // isVersionOf GO:0006461
  Aggregation45: MisP_Ub4 + MisP_Ub5 => AggP; k72*MisP_Ub4*MisP_Ub5;  // isVersionOf GO:0006461
  Aggregation46: MisP_Ub4 + MisP_Ub6 => AggP; k72*MisP_Ub4*MisP_Ub6;  // isVersionOf GO:0006461
  Aggregation47: MisP_Ub4 + MisP_Ub7 => AggP; k72*MisP_Ub4*MisP_Ub7;  // isVersionOf GO:0006461
  Aggregation48: MisP_Ub4 + MisP_Ub8 => AggP; k72*MisP_Ub4*MisP_Ub8;  // isVersionOf GO:0006461
  Aggregation49: MisP_Ub5 + MisP_Ub6 => AggP; k72*MisP_Ub5*MisP_Ub6;  // isVersionOf GO:0006461
  Aggregation50: MisP_Ub5 + MisP_Ub7 => AggP; k72*MisP_Ub5*MisP_Ub7;  // isVersionOf GO:0006461
  Aggregation51: MisP_Ub5 + MisP_Ub8 => AggP; k72*MisP_Ub5*MisP_Ub8;  // isVersionOf GO:0006461
  Aggregation52: MisP_Ub6 + MisP_Ub7 => AggP; k72*MisP_Ub6*MisP_Ub7;  // isVersionOf GO:0006461
  Aggregation53: MisP_Ub6 + MisP_Ub8 => AggP; k72*MisP_Ub6*MisP_Ub8;  // isVersionOf GO:0006461
  Aggregation54: MisP_Ub7 + MisP_Ub8 => AggP; k72*MisP_Ub7*MisP_Ub8;  // isVersionOf GO:0006461
  SequesteringOfAggregates: AggP => SeqAggP; k73*AggP;  // isVersionOf GO:0051220
  ProteasomeInhibtion: AggP + Proteasome => AggP_Proteasome; k74*AggP*Proteasome;  // isVersionOf GO:0008539

  // Unit definitions:
  unit substance = item;
end
