// SBML level 2 version 4
// This model was downloaded from BioModels Database
// http://www.ebi.ac.uk/biomodels/

model restif06()
  // Restif2006 - Whooping cough
  // This model is described in the article:
  // Integrating life history and cross-immunity into the evolutionary dynamics of pathogens.
  // Restif O, Grenfell BT.
  // Proc. Biol. Sci. 2006 Feb; 273(1585): 409-416
  // Abstract:
  // Models for the diversity and evolution of pathogens have branched into two main directions: the adaptive dynamics of quantitative life-history traits (notably virulence) and the maintenance and invasion of multiple, antigenically diverse strains that interact with the host's immune memory. In a first attempt to reconcile these two approaches, we developed a simple modelling framework where two strains of pathogens, defined by a pair of life-history traits (infectious period and infectivity), interfere through a given level of cross-immunity. We used whooping cough as a potential example, but the framework proposed here could be applied to other acute infectious diseases. Specifically, we analysed the effects of these parameters on the invasion dynamics of one strain into a population, where the second strain is endemic. Whereas the deterministic version of the model converges towards stable coexistence of the two strains in most cases, stochastic simulations showed that transient epidemic dynamics can cause the extinction of either strain. Thus ecological dynamics, modulated by the immune parameters, eventually determine the adaptive value of different pathogen genotypes. We advocate an integrative view of pathogen dynamics at the crossroads of immunology, epidemiology and evolution, as a way towards efficient control of infectious diseases.
  // This version of the model can be used for both the stochastic and the deterministic simulations described in the article. For deterministic interpretations with infinite population sizes, set the population size N = 1. The model reproduces the deterministic time courses. Stochastic interpretation with Copasi UI gave results similar to the article, but was not extensively tested. The initial conditions for competition simulations can be derived by equilibrating the system for one pathogen and then adding a starting concentration for the other.
  // Originally created by libAntimony v1.3 (using libSBML 4.1.0-b1)
  // This model is hosted on BioModels Database and identified by: BIOMD0000000249.
  // To cite BioModels Database, please use: BioModels Database: An enhanced, curated and annotated resource for published quantitative kinetic models.
  // To the extent possible under law, all copyright and related or neighbouring rights to this encoded model have been dedicated to the public domain worldwide. Please refer to CC0 Public Domain Dedication for more information.
  // biomodels.db:MODEL1003290000
  // biomodels.db:BIOMD0000000249
  // isDescribedBy pubmed:16615206
  // isDerivedFrom pubmed:460412 pubmed:460424
  // hasTaxon taxonomy:9606 taxonomy:520
  // hasProperty DOID:1116

  // Compartments:
  compartment env = 1; env is "environment";  // GO:0043245

  // Species:
  substanceOnly species N in env = 1*env;  // isVersionOf taxonomy:9606
  substanceOnly species S in env = 0.0588912*env;  // isVersionOf taxonomy:9606
  substanceOnly species I_1 in env = 0.003775*env;  // hasVersion taxonomy:9606 taxonomy:520
  substanceOnly species I_2 in env = 1e-6*env;  // hasVersion taxonomy:9606 taxonomy:520
  substanceOnly species R_1 in env = 0.93733*env;  // isVersionOf taxonomy:9606
  substanceOnly species R_2 in env = 0;  // isVersionOf taxonomy:9606
  substanceOnly species I_1p in env = 0;  // hasVersion taxonomy:9606 taxonomy:520
  substanceOnly species I_2p in env = 0;  // hasVersion taxonomy:9606 taxonomy:520
  substanceOnly species R_p in env = 0;  // isVersionOf taxonomy:9606

  // Parameters:
  // birth/death rate
  mu has per_year;
  l_e = 50 time; l_e is "life expectancy";
  // transmission rate pathogen 1
  beta_1 has per_year;
  // basic reproductive ratio (beta/gamma) pathogen 1
  R0_1 = 17 dimensionless;
  // recovery rate from disease 1
  gamma_1 has per_year;
  // transmission rate pathogen 2
  beta_2 has per_year;
  // basic reproductive ratio (beta/gamma) pathogen 2
  R0_2 = 17 dimensionless;
  // recovery rate from disease 2
  gamma_2 has per_year;
  tInf_1 = 21 days; tInf_1 is "infectious period 1";
  tInf_2 = 21 days; tInf_2 is "infectious period 2";
  // rate of immunity loss
  sigma has per_year;
  tImm = 20 time; tImm is "immune period";
  // force of infection strain 1
  Lambda_1 has per_year;
  // force of infection strain 1
  Lambda_2 has per_year;
  I_1_frac has dimensionless;
  I_2_frac has dimensionless;
  S_frac has dimensionless;
  R1_frac has dimensionless;
  R2_frac has dimensionless;
  Rp_frac has dimensionless;
  // cross-immunity
  psi = 0.2 dimensionless;

  // Assignment rules:
  mu := 1/l_e;
  beta_1 := R0_1*gamma_1;
  gamma_1 := 365/tInf_1;
  beta_2 := R0_2*gamma_2;
  gamma_2 := 365/tInf_2;
  sigma := 1/tImm;
  Lambda_1 := beta_1*(I_1 + I_1p)/N;
  Lambda_2 := beta_2*(I_2 + I_2p)/N;
  I_1_frac := (I_1 + I_1p)/N;
  I_2_frac := (I_2 + I_2p)/N;
  S_frac := S/N;
  R1_frac := (R_1 + R_p)/N;
  R2_frac := (R_2 + R_p)/N;
  Rp_frac := R_p/N;

  // Reactions:
  Birth: => S; mu*N;  // modifiers: N; isVersionOf GO:0007567
  Death_in_S: S => ; mu*S;  // isVersionOf GO:0016265
  Death_in_I_1: I_1 => ; mu*I_1;  // isVersionOf GO:0016265
  Death_in_I_2: I_2 => ; mu*I_2;  // isVersionOf GO:0016265
  Death_in_R_1: R_1 => ; mu*R_1;  // isVersionOf GO:0016265
  Death_in_R_2: R_2 => ; mu*R_2;  // isVersionOf GO:0016265
  Death_in_I_1p: I_1p => ; mu*I_1p;  // isVersionOf GO:0016265
  Death_in_I_2p: I_2p => ; mu*I_2p;  // isVersionOf GO:0016265
  Death_in_R_p: R_p => ; mu*R_p;  // isVersionOf GO:0016265
  Primary_Infection_with_strain_1: S => I_1; beta_1*((I_1 + I_1p)/N)*S;  // modifiers: I_1p, N
  Primary_Infection_with_strain_2: S => I_2; beta_2*((I_2 + I_2p)/N)*S;  // modifiers: I_2p, N
  r12: R_2 => I_1p; (1 - psi)*beta_1*(I_1 + I_1p)/N*R_2; r12 is "Secondary Infection with strain 1";  // modifiers: I_1, N
  r13: R_1 => I_2p; (1 - psi)*beta_2*(I_2 + I_2p)/N*R_1; r13 is "Secondary Infection with strain 2";  // modifiers: I_2, N
  Recovery_I_1: I_1 => R_1; gamma_1*I_1; Recovery_I_1 is "Recovery (I_1)";
  Recovery_I_2: I_2 => R_2; gamma_2*I_2; Recovery_I_2 is "Recovery (I_2)";
  Recovery_I_1p: I_1p => R_p; gamma_1*I_1p; Recovery_I_1p is "Recovery (I_1p)";
  Recovery_I_2p: I_2p => R_p; gamma_2*I_2p; Recovery_I_2p is "Recovery (I_2p)";
  Loss_of_Immunity_R_1: R_1 => S; sigma*R_1; Loss_of_Immunity_R_1 is "Loss of Immunity (R_1)";
  Loss_of_Immunity_R_2: R_2 => S; sigma*R_2; Loss_of_Immunity_R_2 is "Loss of Immunity (R_2)";
  Loss_of_Immunity_R_p: R_p => S; sigma*R_p; Loss_of_Immunity_R_p is "Loss of Immunity (R_p)";

  // Unit definitions:
  unit substance = item; substance is "individuals";
  unit time = 3.1536e7 second; time is "years";
  unit days = 86400 second;
  unit per_year = 1 / (3.1536e7 second);
end
