// SBML level 3 version 2

model Nyman2011_M3Hierarachical_InsulinGlucosedynamics()
  // This a model from the article:
  // A Hierarchical Whole-body Modeling Approach Elucidates the Link between in Vitro Insulin Signaling and in Vivo Glucose Homeostasis.
  // Nyman E, Brannmark C, Palmer R, Brugard J, Nystrom FH, Stralfors P, Cedersund G.J Biol Chem.2011 Jul 22;286(29):26028-41. 21572040,
  // Abstract:
  // Type 2 diabetes is a metabolic disease that profoundly affects energy homeostasis. The disease involves failure at several levels and subsystems and is characterized by insulin resistance in target cells and tissues (i.e. by impaired intracellular insulin signaling). We have previously used an iterative experimental-theoretical approach to unravel the early insulin signaling events in primary human adipocytes. That study, like most insulin signaling studies, is based on in vitro experimental examination of cells, and the in vivo relevance of such studies for human beings has not been systematically examined. Herein, we develop a hierarchical model of the adipose tissue, which links intracellular insulin control of glucose transport in human primary adipocytes with whole-body glucose homeostasis. An iterative approach between experiments and minimal modeling allowed us to conclude that it is not possible to scale up the experimentally determined glucose uptake by the isolated adipocytes to match the glucose uptake profile of the adipose tissue in vivo. However, a model that additionally includes insulin effects on blood flow in the adipose tissue and GLUT4 translocation due to cell handling can explain all data, but neither of these additions is sufficient independently. We also extend the minimal model to include hierarchical dynamic links to more detailed models (both to our own models and to those by others), which act as submodules that can be turned on or off. The resulting multilevel hierarchical model can merge detailed results on different subsystems into a coherent understanding of whole-body glucose homeostasis. This hierarchical modeling can potentially create bridges between other experimental model systems and the in vivo human situation and offers a framework for systematic evaluation of the physiological relevance of in vitro obtained molecular/cellular experimental data.
  // This model originates from BioModels Database: A Database of Annotated Published Models (http://www.ebi.ac.uk/biomodels/). It is copyright (c) 2005-2011 The BioModels.net Team.
  // For more information see the terms of use.
  // To cite BioModels Database, please use: Li C, Donizelli M, Rodriguez N, Dharuri H, Endler L, Chelliah V, Li L, He E, Henry A, Stefan MI, Snoep JL, Hucka M, Le Novère N, Laibe C (2010) BioModels Database: An enhanced, curated and annotated resource for published quantitative kinetic models. BMC Syst Biol., 4:92.
  // biomodels.db:MODEL1108190000
  // biomodels.db:BIOMD0000000356
  // isDescribedBy pubmed:21572040
  // isDerivedFrom biomodels.db:BIOMD0000000137 biomodels.db:BIOMD0000000343 biomodels.db:BIOMD0000000379 pubmed:19225456
  // occursIn BTO:0000443
  // hasTaxon taxonomy:9606
  // model units - substance: substance, time: second, volume: volume, area: area, length: metre, extent: substance

  // Compartments:
  compartment default = 1 volume;

  // Species:
  species r0 in default = 9.968204/default;  // isVersionOf uniprot:P06213
  species r1 in default = 0.0221366/default;  // isVersionOf uniprot:P06213
  species r2 in default = 0.009349211/default;  // isVersionOf uniprot:P06213
  species r11 in default = 1.228867e-5/default;  // isVersionOf uniprot:P06213
  species r12 in default = 1.037642e-5/default;  // isVersionOf uniprot:P06213
  species r22 in default = 2.186833e-6/default;  // isVersionOf uniprot:P06213
  species r1x2 in default = 1.364758e-6/default;  // isVersionOf uniprot:P06213
  species r11x2 in default = 1.515139e-9/default;  // isVersionOf uniprot:P06213
  species r1x22 in default = 6.393518e-10/default;  // isVersionOf uniprot:P06213
  species r1x22d in default = 5.592311e-20/default;  // isVersionOf uniprot:P06213
  species r11x22 in default = 1.787255e-14/default;  // isVersionOf uniprot:P06213
  species rend in default = 3.317118e-5/default;  // hasVersion reactome:REACT_3809.1
  species rendP in default = 0.0002125339/default;  // reactome:REACT_3809.1
  species iendIR in default = 7.255192e-6/default;  // reactome:REACT_4836.1
  species iend in default = 1.132285e-6/default;  // isVersionOf reactome:REACT_3655.2
  species rPbasal in default = 3.872303e-5/default;  // isHomologTo reactome:REACT_3057.1
  species IRS in default = 9.999823/default;  // isVersionOf uniprot:P35568 reactome:REACT_2507.1
  species IRSiP in default = 0.000177464/default;  // hasVersion uniprot:P35568 reactome:REACT_3893.1
  species X in default = 9.924632/default;  // CHEBI:36080
  species X_P in default = 0.07536758/default;  // CHEBI:36080
  species PI3K in default = 9.975784/default;  // interpro:IPR015433 reactome:REACT_4240.1
  species PI3K_ in default = 0.02421643/default;  // hasVersion reactome:REACT_4240.1
  species PDK1 in default = 8.65877/default;  // isVersionOf uniprot:O15530 reactome:REACT_2603.3
  species PDK1_ in default = 1.34123/default;  // hasVersion uniprot:O15530
  species PKC in default = 3.602836e-5/default;  // uniprot:P13678
  species PKC_P in default = 9.999964/default;  // hasVersion uniprot:P13678
  species PKB in default = 9.901931/default;  // isVersionOf uniprot:P31749
  species PKB_P in default = 0.09806856/default;  // hasVersion uniprot:P31749
  species mTOR in default = 0.0201915/default;  // isVersionOf uniprot:P42345 reactome:REACT_7426.1
  species mTOR_ in default = 9.979808/default;  // hasVersion uniprot:P42345
  species GLUT4_C in default = 9.993168/default;  // isVersionOf uniprot:P14672
  species GLUT4_M in default = 0.006831692/default;  // hasVersion uniprot:P14672

  // Parameters:
  a1 = 4.482515e8;
  a2 = 4321892;
  d1 = 0.7722612;
  d2 = 0.0122057759;
  Kcr = 0.0013640432;
  Kex = 37.08189;
  Kend = 30.68251;
  Kdp = 0.0009500831;
  Kcat = 237.5189;
  Km = 3.018193;
  kfbasal = 0.49752158;
  krbasal = 128042.9;
  k21 = 0.009645863;
  k22 = 2374.977;
  k23 = 0.1199031;
  k24 = 0.9430861;
  k2b = 608.584;
  k3f = 8.111935;
  k3b = 0.1895302;
  k4f = 384885.7;
  k4b = 28137.07;
  k5f = 64300.07;
  k5b = 10052.51;
  k6f = 1.60942e7;
  k6b = 77.77121;
  k7f = 4174.63;
  k7b = 565342.2;
  k8f = 1515762;
  k8b = 300.7512;
  k91 = 8.14e-8;
  k92 = 0.0280831426;
  k9b = 4.02976;
  k5Basic = 0.2040341;
  k5BasicWb = 2.34e-8;
  k_glut4 = 31.42113;
  k_glut1 = 0.2966651;
  KmG1 = 132.7705;
  KmG4 = 70.4032;
  kbf = 0.003119389;
  V_G = 1.88;
  k_1 = 0.065;
  k_2 = 0.079;
  G_b = 95;
  V_I = 0.05;
  m_1 = 0.19;
  m_2 = 0.484;
  m_4 = 0.194;
  m_5 = 0.0304;
  m_6 = 0.6471;
  HE_b = 0.6;
  I_b = 25;
  S_b = 1.8;
  S_b_minus = -1.8;
  k_max = 0.0558;
  k_min = 0.008;
  k_abs = 0.057;
  k_gri = 0.0558;
  f = 0.9;
  b = 0.82;
  d = 0.01;
  BW = 78;
  k_p1 = 2.7;
  k_p2 = 0.0021;
  k_p3 = 0.009;
  k_p4 = 0.0618;
  k_i = 0.0079;
  U_ii = 1;
  V_m0 = 2.5;
  V_mX = 0.047;
  K_m0 = 225.59;
  p_2U = 0.0331;
  part = 0.2;
  K = 2.3;
  alpha = 0.05;
  beta = 0.11;
  gamma = 0.5;
  k_e1 = 0.0005;
  k_e2 = 339;
  D = 78000;
  G_p = 178;
  G_t = 135;
  I_l = 4.5;
  I_p = 1.25;
  Q_sto1 = 78000;
  Q_sto2 = 0;
  Q_gut = 0;
  I_1 = 25;
  I_d = 25;
  INS = 0;
  I_po = 3.6;
  Y = 0;

  // Assignment rules:
  vglucoseuptake := k_glut1*G_t/(KmG1 + G_t) + k_glut4*GLUT4_M*G_t/(KmG4 + G_t) + kbf*(INS + 5);
  KD := 7e-6;
  S2 := 0;
  S1 := (INS + 5)*1e-12;
  K4 := 1400;
  K8 := 0.01;
  aa := 5/2/(1 - b)/D;
  cc := 5/2/d/D;
  EGP := k_p1 - k_p2*G_p - k_p3*I_d - k_p4*I_po;
  V_mmax := (1 - part)*(V_m0 + V_mX*INS);
  E := 0;
  S := gamma*I_po;
  I := I_p/V_I;
  G := G_p/V_G;
  HE := -m_5*S + m_6;
  m_3 := HE*m_1/(1 - HE);
  Q_sto := Q_sto1 + Q_sto2;
  Ra := f*k_abs*Q_gut/BW;
  k_empt := k_min + (k_max - k_min)/2*(tanh(aa*(Q_sto - b*D)) - tanh(cc*(Q_sto - d*D)) + 2);
  U_idm := V_mmax*G_t/(K_m0 + G_t);
  U_id := U_idm + vglucoseuptake;
  U := U_ii + U_id;
  S_po := Y + K*(EGP + Ra - E - U_ii - k_1*G_p + k_2*G_t)/V_G + S_b;

  // Rate rules:
  G_p' = EGP + Ra - E - U_ii - k_1*G_p + k_2*G_t;
  G_t' = -U_id + k_1*G_p - k_2*G_t;
  I_l' = -m_1*I_l - m_3*I_l + m_2*I_p + S;
  I_p' = -m_2*I_p - m_4*I_p + m_1*I_l;
  Q_sto1' = -k_gri*Q_sto1;
  Q_sto2' = -k_empt*Q_sto2 + k_gri*Q_sto1;
  Q_gut' = -k_abs*Q_gut + k_empt*Q_sto2;
  I_1' = -k_i*(I_1 - I);
  I_d' = -k_i*(I_d - I_1);
  INS' = -p_2U*INS + p_2U*(I - I_b);
  I_po' = -gamma*I_po + S_po;
  Y' = -alpha*(Y - beta*(G - G_b));

  // Reactions:
  R1: r0 => r1; 2*a1*S1*r0;  // isVersionOf GO:0043559
  R2: r0 => r2; 2*a2*S1*r0;  // isVersionOf GO:0043559
  R3: r1 => r11; a1*S1*r1;  // isVersionOf GO:0043559
  R4: r2 => r12; a1*S1*r2;  // isVersionOf GO:0043559
  R5: r1 => r0; d1*r1;
  R6: r1 => r12; a2*S1*r1;  // isVersionOf GO:0043559
  R7: r2 => r22; a2*S1*r2;  // GO:0043559
  R8: r2 => r0; d2*r2;
  R9: r1 => r1x2; Kcr*r1;  // isVersionOf GO:0043559
  R10: r2 => r1x2; Kcr*r2;  // isVersionOf GO:0043559
  R11: r1x2 => r11x2; a1*S1*r1x2;  // isVersionOf GO:0043559
  R12: r11 => r1; 2*d1*r11;  // isVersionOf GO:0043559
  R13: r12 => r2; d1*r12;  // isVersionOf GO:0043559
  R14: r1x2 => r1x22; a2*S1*r1x2;  // isVersionOf GO:0043559
  R15: r12 => r1; d2*r12;  // isVersionOf GO:0043559
  R16: r22 => r2; 2*d2*r22;  // isVersionOf GO:0043559
  R17: r11 => r11x2; 2*Kcr*r11;  // isVersionOf GO:0043559
  R18: r12 => r1x22; Kcr*r12;  // isVersionOf GO:0043559
  R19: r1x2 => r1; d2*r1x2;  // isVersionOf GO:0043559
  R20: r12 => r11x2; Kcr*r12;  // isVersionOf GO:0043559
  R21: r22 => r1x22; 2*Kcr*r22;  // isVersionOf GO:0043559
  R22: r1x2 => r2; d1*r1x2;  // isVersionOf GO:0043559
  R23: r1x2 => r1x22d; a2*S2*r1x2;  // isVersionOf GO:0043559
  R24: r11x2 => r1x2; d1*r11x2;  // isVersionOf GO:0043559
  R25: r1x22 => r1x2; d2*r1x22;  // isVersionOf GO:0043559
  R26: r11x2 => r11; d2*r11x2;  // isVersionOf GO:0043559
  R27: r1x22 => r12; d2*r1x22;  // isVersionOf GO:0043559
  R28: r11x2 => r12; d1*r11x2;  // isVersionOf GO:0043559
  R29: r1x22 => r22; d1*r1x22;  // isVersionOf GO:0043559
  R30: r1x22 => r11x22; a1*S1*r1x22;  // isVersionOf GO:0043559
  R31: r11x2 => r11x22; a2*S1*r11x2;  // isVersionOf GO:0043559
  R32: r1x22 => r1x22d; K4*S1*r1x22;  // isVersionOf GO:0043559
  R33: r1x22d => r1x22; K8*r1x22d;  // isVersionOf GO:0043559
  R34: r1x22d => r1x2; d2*r1x22d;  // isVersionOf GO:0043559
  R35: r11x22 => r1x22; d1*r11x22;  // isVersionOf GO:0043559
  R36: r11x22 => r11x2; d2*r11x22;  // isVersionOf GO:0043559
  R37: rend => r0; Kex*rend;  // GO:0031623
  R38: iend => ; Kex*iend;  // isVersionOf reactome:REACT_3655.2
  R39: r1x2 => rendP + iendIR; Kend*r1x2;  // isVersionOf GO:0031623
  R40: r11x2 => rendP + 2 iendIR; Kend*r11x2;  // isVersionOf GO:0031623
  R41: r1x22 => rendP + 2 iendIR; Kend*r1x22;  // isVersionOf GO:0031623
  R42: r1x22d => rendP + 3 iendIR; Kend*r1x22d;  // isVersionOf GO:0031623
  R43: r11x22 => rendP + 3 iendIR; Kend*r11x22;  // isVersionOf GO:0031623
  R44: rendP => rend; (Kdp + Kcat*X_P/(Km + X_P))*rendP;  // modifiers: X_P; isVersionOf GO:0016311
  R45: iendIR => iend; (Kdp + Kcat*X_P/(Km + X_P))*iendIR;  // modifiers: X_P; isVersionOf GO:0038020
  R46: r0 => rPbasal; kfbasal*r0;  // isVersionOf GO:0016310
  R47: rPbasal => r0; krbasal*rPbasal;  // isVersionOf GO:0016311
  R48: rPbasal => rendP; Kend*rPbasal;  // isVersionOf GO:0031623
  v2f: IRS => IRSiP; k21*IRS*(r1x2 + r11x2 + r1x22 + r1x22d + r11x22 + rPbasal + k22*rendP)*(1 + k23*PKC_P + k24*mTOR);  // modifiers: PKC_P, mTOR, r11x2, r11x22, r1x2, r1x22, r1x22d, rPbasal, rendP; isVersionOf reactome:REACT_342.3 GO:0006468
  v2b: IRSiP => IRS; k2b*IRSiP;  // isVersionOf reactome:REACT_1810.2 GO:0006470
  v3f: X => X_P; k3f*X*IRSiP;  // modifiers: IRSiP; GO:0006468
  v3b: X_P => X; k3b*X_P;  // isVersionOf GO:0006470
  v4f: PI3K => PI3K_; k4f*PI3K*IRSiP;  // modifiers: IRSiP; GO:0005942 GO:0006468
  v4b: PI3K_ => PI3K; k4b*PI3K_;  // GO:0006470 GO:0005942
  v5f: PDK1 => PDK1_; k5f*PDK1*PI3K_;  // modifiers: PI3K_; isVersionOf GO:0016310
  v5b: PDK1_ => PDK1; k5b*PDK1_;  // isVersionOf GO:0016311
  v6f: PKC => PKC_P; k6f*PKC*PDK1_;  // modifiers: PDK1_; GO:0016310 GO:0007205
  v6b: PKC_P => PKC; k6b*PKC_P;  // isVersionOf GO:0016311
  v7f: PKB => PKB_P; k7f*PKB*PDK1_;  // modifiers: PDK1_; isVersionOf GO:0016310
  v7b: PKB_P => PKB; k7b*PKB_P;  // isVersionOf GO:0016311
  v8f: mTOR => mTOR_; k8f*mTOR*PKB_P;  // modifiers: PKB_P; isVersionOf GO:0016310
  v8b: mTOR_ => mTOR; k8b*mTOR_;  // isVersionOf GO:0016311
  v9f: GLUT4_C => GLUT4_M; k91*GLUT4_C*PKC_P + k92*GLUT4_C*PKB_P + k5BasicWb*GLUT4_C;  // modifiers: PKB_P, PKC_P; GO:0006839
  v9b: GLUT4_M => GLUT4_C; k9b*GLUT4_M;  // GO:0006839

  // Unit definitions:
  unit volume = litre;
  unit substance = mole;
  unit area = metre^2;
end
