// SBML level 2 version 4
// This model was downloaded from BioModels Database
// http://www.ebi.ac.uk/biomodels/

model Model_1()
  // Lee2010_ThrombinActivation_OneForm_reduced
  // biomodels.db:MODEL1108260003
  // biomodels.db:BIOMD0000000357
  // isDescribedBy pubmed:20435402
  // isDerivedFrom pubmed:17726029
  // hasTaxon taxonomy:2759
  // isVersionOf GO:0007596 GO:0003804

  // Compartments:
  compartment compartment = 1;

  // Species:
  species E in compartment = 0.00015;  // isVersionOf PR:000007294
  species E_P_1 in compartment = 0;  // hasPart PR:000007294 PR:000007299
  species P in compartment = 1;  // isVersionOf PR:000007299
  species M in compartment = 0;  // isVersionOf PR:000007299
  species E_M in compartment = 0;  // hasPart PR:000007299 PR:000007294
  species T in compartment = 0;  // isVersionOf PR:000007299
  species E_P_2 in compartment = 0;  // hasPart PR:000007299 PR:000007294
  species P2 in compartment = 0;  // hasPart PR:000007299
  species E_P2 in compartment = 0;  // hasPart PR:000007294 PR:000007299

  // Parameters:
  k1 = 91.8;
  k2 = 82.4;
  k3a = 151.5;
  k4a = 209.9;
  k5 = 5.16;
  k6 = 32.3;
  k7a = 4.7;
  k8a = 42.6;
  j1 = 33.4;
  j3a = 0.185;
  j5 = 21.8;
  j7a = 2.66e-5;

  // Reactions:
  r1: E + P -> E_P_1; compartment*(k1*E*P - j1*E_P_1);
  r2: E_P_1 => E + M; compartment*k2*E_P_1;  // isVersionOf ec-code:3.4.21.6 GO:0004252
  r5: E + M -> E_M; compartment*(k3a*E*M - j3a*E_M);
  r7: E_M => E + T; compartment*k4a*E_M;  // isVersionOf ec-code:3.4.21.6 GO:0004252
  r8: E + P -> E_P_2; compartment*(k5*E*P - j5*E_P_2);
  r9: E_P_2 => E + P2; compartment*k6*E_P_2;  // isVersionOf ec-code:3.4.21.6 GO:0004252
  r12: E + P2 -> E_P2; compartment*(k7a*E*P2 - j7a*E_P2);
  r14: E_P2 => E + T; compartment*k8a*E_P2;  // isVersionOf ec-code:3.4.21.6 GO:0004252

  // Unit definitions:
  unit substance = 1e-6 mole;
end
