// SBML level 2 version 4
// This model was downloaded from BioModels Database
// http://www.ebi.ac.uk/biomodels/

function Function_for_reaction_1(kRLOff, kRLOn, sR_IL6_serum, sR_serum, serum, IL6_serum)
  (kRLOn*sR_serum*IL6_serum - kRLOff*sR_IL6_serum)/serum;
end

function Function_for_reaction_2(kgp130Off, kgp130On, sR_IL6_serum, serum, sR_IL6_sgp130_serum, sgp130_serum)
  (kgp130On*sR_IL6_serum*sgp130_serum - kgp130Off*sR_IL6_sgp130_serum)/serum;
end

function Function_for_reaction_3(kIL6Synth, serum)
  kIL6Synth/serum;
end

function Function_for_reaction_4(kIL6Decay, serum, IL6_serum)
  kIL6Decay*IL6_serum/serum;
end

function Function_for_reaction_5(kCRPDecay, CRP_serum, serum)
  kCRPDecay*CRP_serum/serum;
end

function Function_for_reaction_6(kgp130Off, kgp130On, sR_IL6_liver, gp130_liver, liver, R_IL6_gp130_liver)
  (kgp130On*sR_IL6_liver*gp130_liver - kgp130Off*R_IL6_gp130_liver)/liver;
end

function Function_for_reaction_7(kRLOff, kRLOn, IL6_liver, R, R_IL6, liver)
  (kRLOn*R*IL6_liver - kRLOff*R_IL6)/liver;
end

function Function_for_reaction_8(kgp130Off, kgp130On, R_IL6, gp130_liver, liver, R_IL6_gp130_liver)
  (kgp130On*R_IL6*gp130_liver - kgp130Off*R_IL6_gp130_liver)/liver;
end

function Function_for_reaction_16(kRAct, liver, R_IL6_gp130_liver)
  kRAct*R_IL6_gp130_liver/liver;
end

function Function_for_reaction_9(Ractive_liver, STAT3_liver, liver, kcatSTATPhos, KmSTATPhos)
  kcatSTATPhos*Ractive_liver*STAT3_liver/(KmSTATPhos + STAT3_liver)/liver;
end

function Function_for_reaction_10(pSTAT3_liver, liver, VmSTATDephos, KmSTATDephos)
  VmSTATDephos*pSTAT3_liver/(KmSTATDephos + pSTAT3_liver)/liver;
end

function Function_for_reaction_15(kRdeg, R, liver)
  kRdeg*R/liver;
end

function Function_for_reaction_11(kRint, R_IL6, liver)
  kRint*R_IL6/liver;
end

function Function_for_reaction_12(kRint, liver, R_IL6_gp130_liver)
  kRint*R_IL6_gp130_liver/liver;
end

function Function_for_reaction_13(Ractive_liver, liver, kintActiveR)
  kintActiveR*Ractive_liver/liver;
end

function Function_for_reaction_14(kRsynth, liver)
  kRsynth/liver;
end

function Function_for_reaction_41(kgp130Off, kgp130On, sR_IL6_gut, R_IL6_gp130_gut, gp130_gut, gut)
  (kgp130On*sR_IL6_gut*gp130_gut - kgp130Off*R_IL6_gp130_gut)/gut;
end

function Function_for_reaction_46(kRAct, R_IL6_gp130_gut, gut)
  kRAct*R_IL6_gp130_gut/gut;
end

function Function_for_reaction_42(STAT3_gut, Ractive_gut, kcatSTATPhos, KmSTATPhos, gut)
  kcatSTATPhos*Ractive_gut*STAT3_gut/(KmSTATPhos + STAT3_gut)/gut;
end

function Function_for_reaction_43(pSTAT3_gut, VmSTATDephos, gut, KmSTATDephos)
  VmSTATDephos*pSTAT3_gut/(KmSTATDephos + pSTAT3_gut)/gut;
end

function Function_for_reaction_44(kRint, R_IL6_gp130_gut, gut)
  kRint*R_IL6_gp130_gut/gut;
end

function Function_for_reaction_45(Ractive_gut, gut, kintActiveR)
  kintActiveR*Ractive_gut/gut;
end

function function_23(Ractive_liver, VmRDephos, liver, KmRDephos)
  VmRDephos*Ractive_liver/(KmRDephos + Ractive_liver)/liver;
end

function function_24(VmRDephos, Ractive_gut, gut, KmRDephos)
  VmRDephos*Ractive_gut/(KmRDephos + Ractive_gut)/gut;
end

function function_25(kRsynth, liver)
  kRsynth/liver;
end

function function_26(kRdeg, gp130_liver, liver)
  kRdeg*gp130_liver/liver;
end

function function_27(kRsynth, gut)
  kRsynth/gut;
end

function function_28(kRdeg, gp130_gut, gut)
  kRdeg*gp130_gut/gut;
end

function function_29(kRLOff, kRLOn, IL6_gut, sR_IL6_gut, sR_gut, gut)
  (kRLOn*sR_gut*IL6_gut - kRLOff*sR_IL6_gut)/gut;
end

function function_30(kRLOff, kRLOn, IL6_liver, sR_liver, sR_IL6_liver, liver)
  (kRLOn*sR_liver*IL6_liver - kRLOff*sR_IL6_liver)/liver;
end

function function_31(kCRPSecretion, liver, CRP_liver)
  kCRPSecretion*CRP_liver/liver;
end

function function_32(serum, ksynthCRP)
  ksynthCRP/serum;
end

function function_33(kgp130Off, kgp130On, sR_IL6_sgp130_gut, sR_IL6_gut, sgp130_gut, gut)
  (kgp130On*sgp130_gut*sR_IL6_gut - kgp130Off*sR_IL6_sgp130_gut)/gut;
end

function function_34(kgp130Off, kgp130On, sgp130_liver, sR_IL6_liver, liver, sR_IL6_sgp130_liver)
  (kgp130On*sR_IL6_liver*sgp130_liver - kgp130Off*sR_IL6_sgp130_liver)/liver;
end

function function_35(serum, ksynthsR)
  ksynthsR/serum;
end

function function_36(sR_serum, serum, kdegsR)
  kdegsR*sR_serum/serum;
end

function function_37(ksynthsgp130, serum)
  ksynthsgp130/serum;
end

function function_38(serum, sgp130_serum, kdegsgp130)
  kdegsgp130*sgp130_serum/serum;
end

function function_39(ksynthIL6Gut, gut)
  ksynthIL6Gut/gut;
end

function function_40(kdegIL6Gut, IL6_gut, gut)
  kdegIL6Gut*IL6_gut/gut;
end

function function_41(CRP_serum, serum, kRShedding)
  kRShedding*CRP_serum/serum;
end

function function_43(Ab_IL6_serum, serum, kdegAb)
  kdegAb*Ab_IL6_serum/serum;
end

function function_45(serum, kdegAb, Ab_serum)
  kdegAb*Ab_serum/serum;
end

function function_47(Ab_IL6_gut, kdegAb, gut)
  kdegAb*Ab_IL6_gut/gut;
end

function function_50(liver, kdegAb, Ab_IL6_liver)
  kdegAb*Ab_IL6_liver/liver;
end

function function_52(Ab_liver, liver, kdegAb)
  kdegAb*Ab_liver/liver;
end

function function_53(kdegAb, gut, Ab_gut)
  kdegAb*Ab_gut/gut;
end

function function_51(Ab_sR_IL6_liver, liver, kdegAb)
  kdegAb*Ab_sR_IL6_liver/liver;
end

function function_42(kIL6AbUnbind, Ab_IL6_serum, serum, kIL6AbBind, Ab_serum, IL6_serum)
  (kIL6AbBind*IL6_serum*Ab_serum - kIL6AbUnbind*Ab_IL6_serum)/serum;
end
function_42 is "Function for mwb1879013_5fcd_490c_8b01_eaf84df15b9a [1]";

function function_44(serum, Ab_sR_IL6_serum, kdegAb)
  kdegAb*Ab_sR_IL6_serum/serum;
end

function function_49(IL6_liver, kIL6AbUnbind, Ab_liver, liver, kIL6AbBind, Ab_IL6_liver)
  (kIL6AbBind*Ab_liver*IL6_liver - kIL6AbUnbind*Ab_IL6_liver)/liver;
end
function_49 is "Function for mw8fb6c0a7_b05d_4c2a_8866_77eb81f063d1 [1]";

function function_48(kIL6AbUnbind, IL6_gut, Ab_IL6_gut, kIL6AbBind, gut, Ab_gut)
  (kIL6AbBind*Ab_gut*IL6_gut - kIL6AbUnbind*Ab_IL6_gut)/gut;
end
function_48 is "Function for mwa3cb4a9b_d628_4807_8847_bdcd9b40c7f1 [1]";

function function_46(Ab_sR_IL6_gut, kdegAb, gut)
  kdegAb*Ab_sR_IL6_gut/gut;
end

model MODEL1408050000()
  // Dwivedi2014 - Healthy Volunteer IL6 Model
  // This model is comprised of four models:
  // [BIOMD0000000534] Healthy Volunteer model
  // [BIOMD0000000535] Crohn's Disease - IL-6 Antibody
  // [BIOMD0000000536] Crohn's Disease - sgp130FC
  // [BIOMD0000000537] Crohn's Disease - IL-6Ra Antibody
  // Possible avenues for Interleukin-6 (IL-6) inhibition in treating Crohn's disease are compared here. Each model refers to separate ligands. The system simulates differential activity of the ligands on the signalling of IL-6. This affects Signal Transducer and Activator of Transcription 3 (STAT3) activity on the production of biomarker C-Reactive Protein (CRP) expression.
  // Figures referring to this Healthy Volunteer model are 2c and 2d.
  // This model is described in the article:
  // A multiscale model of interleukin-6-mediated immune regulation in Crohn's disease and its application in drug discovery and development.
  // Dwivedi G, Fitz L, Hegen M, Martin SW, Harrold J, Heatherington A, Li C.
  // CPT Pharmacometrics Syst Pharmacol 2014; 3: e89
  // Abstract:
  // In this study, we have developed a multiscale systems model of interleukin (IL)-6-mediated immune regulation in Crohn's disease, by integrating intracellular signaling with organ-level dynamics of pharmacological markers underlying the disease. This model was linked to a general pharmacokinetic model for therapeutic monoclonal antibodies and used to comparatively study various biotherapeutic strategies targeting IL-6-mediated signaling in Crohn's disease. Our work illustrates techniques to develop mechanistic models of disease biology to study drug-system interaction. Despite a sparse training data set, predictions of the model were qualitatively validated by clinical biomarker data from a pilot trial with tocilizumab. Model-based analysis suggests that strategies targeting IL-6, IL-6R?, or the IL-6/sIL-6R? complex are less effective at suppressing pharmacological markers of Crohn's than dual targeting the IL-6/sIL-6R? complex in addition to IL-6 or IL-6R?. The potential value of multiscale system pharmacology modeling in drug discovery and development is also discussed.CPT: Pharmacometrics & Systems Pharmacology (2014) 3, e89; doi:10.1038/psp.2013.64; advance online publication 8 January 2014.
  // This model is hosted on BioModels Database and identified by: BIOMD0000000534.
  // To cite BioModels Database, please use: BioModels Database: An enhanced, curated and annotated resource for published quantitative kinetic models.
  // To the extent possible under law, all copyright and related or neighbouring rights to this encoded model have been dedicated to the public domain worldwide. Please refer to CC0 Public Domain Dedication for more information.
  // biomodels.db:MODEL1408050000
  // biomodels.db:BIOMD0000000534
  // isDescribedBy pubmed:24402116
  // hasTaxon taxonomy:9606
  // hasPart GO:0007259
  // isVersionOf GO:0004915

  // Compartments:
  compartment serum = 1;  // isVersionOf BTO:0001239
  compartment liver = 1;  // BTO:0000759
  compartment gut = 1;  // isVersionOf BTO:0000545
  compartment peripheral = 1;  // isVersionOf GO:0005615

  // Species:
  species IL6_serum in serum = 4.828306e-5;  // isVersionOf uniprot:P05231
  species sgp130_serum in serum = 3.9;  // isVersionOf PR:000001868; hasProperty PATO:0001537
  species sR_IL6_sgp130_serum in serum = 0.001585092;  // hasPart uniprot:P05231 uniprot:P08887 PR:000001868; hasProperty PATO:0001537
  species CRP_serum in serum = 40.19604;  // isVersionOf uniprot:P02741
  // nM Serum conc. of about 80 ng/ml and MW of 50 kDa.
  species sR_serum in serum = 1.055638;  // isVersionOf uniprot:P08887; hasProperty PATO:0001537
  species sR_IL6_serum in serum = 1.992152e-5;  // hasPart uniprot:P08887 uniprot:P05231; hasProperty PATO:0001537
  species Ab_serum in serum = 1e-26;  // FMA:62871
  species Ab_IL6_serum in serum = 9.877375e-28;  // hasPart uniprot:P05231 FMA:62871
  species Ab_sR_IL6_serum in serum = -1.15536e-26;  // hasPart uniprot:P05231 uniprot:P08887 FMA:62871; hasProperty PATO:0001537
  // nM 2000 molecules/cell in HepG2 cells with a volume of 2.8 pL
  species gp130_liver in liver = 0.4377815;  // isVersionOf PR:000001868
  species R_IL6_gp130_liver in liver = 1.377818e-6;  // hasPart uniprot:P08887 uniprot:P05231 PR:000001868
  species sR_IL6_liver in liver = 1.750274e-5;  // hasPart uniprot:P08887 uniprot:P05231; hasProperty PATO:0001537
  species R in liver = 0.4387686;  // isVersionOf uniprot:P08887
  species IL6_liver in liver = 5.880066e-5;  // isVersionOf uniprot:P05231
  species R_IL6 in liver = 8.800866e-7;  // hasPart uniprot:P05231 uniprot:P08887
  species Ractive_liver in liver = 0.01596102;  // hasPart uniprot:P08887 uniprot:P05231 PR:000001868; hasProperty PATO:0002354
  species STAT3_liver in liver = 9.069187;  // isVersionOf PR:000002089
  species pSTAT3_liver in liver = 0.9308133;  // isVersionOf PR:000002089
  species $CRP_liver in liver;  // isVersionOf uniprot:P02741
  species sR_liver in liver = 1.510634;  // isVersionOf uniprot:P08887; hasProperty PATO:0001537
  species CRPExtracellular in liver = 74.10394;  // isVersionOf uniprot:P02741
  species sgp130_liver in liver = 5.581135;  // hasProperty PATO:0001537; isVersionOf PR:000001868
  species sR_IL6_sgp130_liver in liver = 0.002095993;  // hasPart uniprot:P05231 uniprot:P08887 PR:000001868; hasProperty PATO:0001537
  species Ab_sR_IL6_liver in liver = -1.406277e-27;  // hasPart uniprot:P05231 uniprot:P08887 FMA:62871; hasProperty PATO:0001537
  species Ab_IL6_liver in liver = 1.082291e-27;  // hasPart uniprot:P05231 FMA:62871
  species Ab_liver in liver = 1e-26;  // isVersionOf FMA:62871
  species sR_IL6_gut in gut = 2.375928e-5;  // isVersionOf uniprot:P08887 uniprot:P05231; hasProperty PATO:0001537
  species gp130_gut in gut = 0.4374667;  // isVersionOf PR:000001868
  species R_IL6_gp130_gut in gut = 1.794861e-6;  // hasPart uniprot:P08887 uniprot:P05231 PR:000001868
  species Ractive_gut in gut = 0.02079233;  // hasProperty PATO:0002354; hasPart uniprot:P08887 uniprot:P05231 PR:000001868
  species STAT3_gut in gut = 8.769872;  // isVersionOf PR:000002089
  species pSTAT3_gut in gut = 1.230128;  // isVersionOf PR:000002089
  species $geneProduct in gut;  // isVersionOf CCO:U0000003
  species sR_gut in gut = 1.51018;  // hasProperty PATO:0001537; isVersionOf uniprot:P08887
  species IL6_gut in gut = 0.0007433068;  // isVersionOf uniprot:P05231
  species sgp130_gut in gut = 5.580753;  // hasProperty PATO:0001537; isVersionOf PR:000001868
  species sR_IL6_sgp130_gut in gut = 0.00247839;  // hasPart uniprot:P05231 uniprot:P08887 PR:000001868; hasProperty PATO:0001537
  species Ab_gut in gut = 1e-26;  // isVersionOf FMA:62871
  species Ab_IL6_gut in gut = 1.04408e-26;  // hasPart uniprot:P05231 FMA:62871
  species Ab_sR_IL6_gut in gut = -2.428217e-27;  // hasProperty PATO:0001537; hasPart uniprot:P05231 uniprot:P08887 FMA:62871
  species Ab_peripheral in peripheral = 1e-26;  // isVersionOf FMA:62871

  // Parameters:
  kRLOn = 0.384;
  // 1/hr Kd = 500 pM
  kRLOff = 1.92;
  kgp130On = 20.52;
  // 1/hr Kd = 50 pM
  kgp130Off = 1.026;
  kRAct = 155;
  // 1/hr (Estimated using the receptor internalization model)
  kRint = 1.96;
  // nM/hr Estimated at 115 receptor/cell/hr using the receptor model for HepG2 cells. With HepG2 cell volume of 2.8 pL/cell, this translates to 0.0685 nM/hr. Since this rate in terms of concentration is independent of cell volume, it can be used directly for cells with different volumes but similar receptor dynamics.
  kRsynth = 0.0685;
  kRdeg = 0.1561; kRdeg is "kRintBasal";
  kIL6Synth = 0.0011; kIL6Synth is "ksynthIL6";
  // 1/hr Estimated from drug PK models
  kIL6Decay = 34.82; kIL6Decay is "kdegIL6";
  kCRPDecay = 0.36; kCRPDecay is "kdegCRP";
  // nM
  KmSTATDephos = 5.34;
  VmSTATDephos = 0.62;
  // 18 nM/hr
  VmRDephos = 0.525;
  KmRDephos = 155.3;
  // 1/hr
  kcatSTATPhos = 145;
  KmSTATPhos = 219;
  KmProtSynth = 10;
  // nM Commonly used model of protein synthesis: mRNA: dm/dt = Sm*TF/(C + TF) - Dm*m Protein: dn/dt = Sn*m - Dn*n Solving for st. st: n(ss) = (Sn/Dn)*(Sm/Dm)*TF/(C+TF) VmProtSynth = (Sn/Dn)*(Sm/Dm) = 4875000 KmProtSynth = C = 108 The parameters are obtained from Moya et al. (2010), who estimate these parameters for IL6 signaling. The actual value used may be different, as it was optimized to fit the data
  VmProtSynth = 330;
  kCRPSecretion = 0.5;
  // nM/hr Calculated to maintain CRP level in HD at 40 nM in basal state.
  ksynthCRP = 0.42;
  ksynthsR = 0.1;
  // 1/hr Arbitrarily set to 1. The basal synthesis and CRP induced shedding ratesis adjusted to get the desired steady state value.
  kdegsR = 0.3;
  ksynthsgp130 = 3.9;
  // 1/hr Arbitrarily set to 1. The synthesis rate is adjusted to get the desired steady state value.
  kdegsgp130 = 1;
  ksynthIL6Gut = 0.0017;
  kdegIL6Gut = 1;
  kdistTissueToSerum = 0.8473;
  // au Value chosen to ensure that proteins distribute between serum and tissue in a manner that the tissue conc. is a fixed proportion of the serum conc.
  kdistSerumToTissue = 1.2125;
  kRShedding = 0.0054;
  kintActiveR = 0.01;
  kIL6AbBind = 1000;
  kIL6AbUnbind = 2.5;
  kAbSerumToLiver = QSerumLiver/VSerum;
  kAbLiverToSerum = QSerumLiver/VLiver;
  kAbSerumToGut = QSerumGut/VSerum;
  kAbGutToSerum = QSerumGut/VGut;
  VSerum = 2.88;
  VLiver = 2.88;
  VGut = 1.44;
  VPeriph = 0.576;
  QSerumLiver = 0.06;
  QSerumGut = 0.03;
  QSerumPeriph = 0.001;
  kAbSerumToPeriph = QSerumPeriph/VSerum;
  // Def: 0.0031
  kAbPeriphToSerum = QSerumPeriph/VPeriph;
  kdegAb = 0.0018;
  infusionTime = 1;
  Dose = 100;
  Initial_for_Ab = Ab_serum;
  Initial_for_Dose = Dose;

  // Assignment rules:
  geneProduct := VmProtSynth*pSTAT3_gut/(KmProtSynth + pSTAT3_gut);
  CRP_liver := VmProtSynth*pSTAT3_liver/(KmProtSynth + pSTAT3_liver);

  // Reactions:
  reaction_1: sR_serum + IL6_serum -> sR_IL6_serum; serum*Function_for_reaction_1(kRLOff, kRLOn, sR_IL6_serum, sR_serum, serum, IL6_serum);
  reaction_2: sR_IL6_serum + sgp130_serum -> sR_IL6_sgp130_serum; serum*Function_for_reaction_2(kgp130Off, kgp130On, sR_IL6_serum, serum, sR_IL6_sgp130_serum, sgp130_serum);
  reaction_3: => IL6_serum; serum*Function_for_reaction_3(kIL6Synth, serum);
  reaction_4: IL6_serum => ; serum*Function_for_reaction_4(kIL6Decay, serum, IL6_serum);
  reaction_5: CRP_serum => ; serum*Function_for_reaction_5(kCRPDecay, CRP_serum, serum);
  reaction_6: sR_IL6_liver + gp130_liver -> R_IL6_gp130_liver; liver*Function_for_reaction_6(kgp130Off, kgp130On, sR_IL6_liver, gp130_liver, liver, R_IL6_gp130_liver);
  reaction_7: R + IL6_liver -> R_IL6; liver*Function_for_reaction_7(kRLOff, kRLOn, IL6_liver, R, R_IL6, liver);
  reaction_8: R_IL6 + gp130_liver -> R_IL6_gp130_liver; liver*Function_for_reaction_8(kgp130Off, kgp130On, R_IL6, gp130_liver, liver, R_IL6_gp130_liver);
  reaction_16: R_IL6_gp130_liver => Ractive_liver; liver*Function_for_reaction_16(kRAct, liver, R_IL6_gp130_liver);
  reaction_9: STAT3_liver + Ractive_liver => pSTAT3_liver + Ractive_liver; liver*Function_for_reaction_9(Ractive_liver, STAT3_liver, liver, kcatSTATPhos, KmSTATPhos);
  reaction_10: pSTAT3_liver => STAT3_liver; liver*Function_for_reaction_10(pSTAT3_liver, liver, VmSTATDephos, KmSTATDephos);
  reaction_15: R => ; liver*Function_for_reaction_15(kRdeg, R, liver);
  reaction_11: R_IL6 => ; liver*Function_for_reaction_11(kRint, R_IL6, liver);
  reaction_12: R_IL6_gp130_liver => ; liver*Function_for_reaction_12(kRint, liver, R_IL6_gp130_liver);
  reaction_13: Ractive_liver => ; liver*Function_for_reaction_13(Ractive_liver, liver, kintActiveR);
  reaction_14: => R; liver*Function_for_reaction_14(kRsynth, liver);
  reaction_41: sR_IL6_gut + gp130_gut -> R_IL6_gp130_gut; gut*Function_for_reaction_41(kgp130Off, kgp130On, sR_IL6_gut, R_IL6_gp130_gut, gp130_gut, gut);
  reaction_46: R_IL6_gp130_gut => Ractive_gut; gut*Function_for_reaction_46(kRAct, R_IL6_gp130_gut, gut);
  reaction_42: STAT3_gut + Ractive_gut => pSTAT3_gut + Ractive_gut; gut*Function_for_reaction_42(STAT3_gut, Ractive_gut, kcatSTATPhos, KmSTATPhos, gut);
  reaction_43: pSTAT3_gut => STAT3_gut; gut*Function_for_reaction_43(pSTAT3_gut, VmSTATDephos, gut, KmSTATDephos);
  reaction_44: R_IL6_gp130_gut => ; gut*Function_for_reaction_44(kRint, R_IL6_gp130_gut, gut);
  reaction_45: Ractive_gut => ; gut*Function_for_reaction_45(Ractive_gut, gut, kintActiveR);
  reaction_119: Ractive_liver => R_IL6_gp130_liver; liver*function_23(Ractive_liver, VmRDephos, liver, KmRDephos);
  reaction_120: Ractive_gut => R_IL6_gp130_gut; gut*function_24(VmRDephos, Ractive_gut, gut, KmRDephos);
  reaction_121: => gp130_liver; liver*function_25(kRsynth, liver);
  reaction_122: gp130_liver => ; liver*function_26(kRdeg, gp130_liver, liver);
  reaction_123: => gp130_gut; gut*function_27(kRsynth, gut);
  reaction_124: gp130_gut => ; gut*function_28(kRdeg, gp130_gut, gut);
  reaction_125: sR_serum -> sR_gut; kdistSerumToTissue*sR_serum - kdistTissueToSerum*sR_gut;
  reaction_126: IL6_serum -> IL6_gut; kdistSerumToTissue*IL6_serum - kdistTissueToSerum*IL6_gut;
  reaction_127: sR_gut + IL6_gut -> sR_IL6_gut; gut*function_29(kRLOff, kRLOn, IL6_gut, sR_IL6_gut, sR_gut, gut);
  reaction_128: sR_IL6_serum -> sR_IL6_gut; kdistSerumToTissue*sR_IL6_serum - kdistTissueToSerum*sR_IL6_gut;
  reaction_129: sR_serum -> sR_liver; kdistSerumToTissue*sR_serum - kdistTissueToSerum*sR_liver;
  reaction_130: IL6_serum -> IL6_liver; kdistSerumToTissue*IL6_serum - kdistTissueToSerum*IL6_liver;
  reaction_131: sR_IL6_serum -> sR_IL6_liver; kdistSerumToTissue*sR_IL6_serum - kdistTissueToSerum*sR_IL6_liver;
  reaction_132: sR_liver + IL6_liver -> sR_IL6_liver; liver*function_30(kRLOff, kRLOn, IL6_liver, sR_liver, sR_IL6_liver, liver);
  reaction_133: $CRP_liver => CRPExtracellular; liver*function_31(kCRPSecretion, liver, CRP_liver);
  reaction_134: CRP_serum -> CRPExtracellular; kdistSerumToTissue*CRP_serum - kdistTissueToSerum*CRPExtracellular;
  reaction_135: => CRP_serum; serum*function_32(serum, ksynthCRP);
  reaction_136: sgp130_serum -> sgp130_gut; kdistSerumToTissue*sgp130_serum - kdistTissueToSerum*sgp130_gut;
  reaction_137: sgp130_serum -> sgp130_liver; kdistSerumToTissue*sgp130_serum - kdistTissueToSerum*sgp130_liver;
  reaction_138: sgp130_gut + sR_IL6_gut -> sR_IL6_sgp130_gut; gut*function_33(kgp130Off, kgp130On, sR_IL6_sgp130_gut, sR_IL6_gut, sgp130_gut, gut);
  reaction_139: sR_IL6_liver + sgp130_liver -> sR_IL6_sgp130_liver; liver*function_34(kgp130Off, kgp130On, sgp130_liver, sR_IL6_liver, liver, sR_IL6_sgp130_liver);
  reaction_140: sR_IL6_sgp130_serum -> sR_IL6_sgp130_gut; kdistSerumToTissue*sR_IL6_sgp130_serum - kdistTissueToSerum*sR_IL6_sgp130_gut;
  reaction_141: sR_IL6_sgp130_serum -> sR_IL6_sgp130_liver; kdistSerumToTissue*sR_IL6_sgp130_serum - kdistTissueToSerum*sR_IL6_sgp130_liver;
  reaction_142: => sR_serum; serum*function_35(serum, ksynthsR);
  reaction_143: sR_serum => ; serum*function_36(sR_serum, serum, kdegsR);
  reaction_144: => sgp130_serum; serum*function_37(ksynthsgp130, serum);
  reaction_145: sgp130_serum => ; serum*function_38(serum, sgp130_serum, kdegsgp130);
  reaction_146: => IL6_gut; gut*function_39(ksynthIL6Gut, gut);
  reaction_147: IL6_gut => ; gut*function_40(kdegIL6Gut, IL6_gut, gut);
  reaction_148: CRP_serum => sR_serum + CRP_serum; serum*function_41(CRP_serum, serum, kRShedding);
  reaction_149: Ab_serum -> Ab_peripheral; kAbSerumToPeriph*Ab_serum - kAbPeriphToSerum*Ab_peripheral;
  reaction_150: IL6_serum + Ab_serum -> Ab_IL6_serum; serum*function_42(kIL6AbUnbind, Ab_IL6_serum, serum, kIL6AbBind, Ab_serum, IL6_serum);
  reaction_151: Ab_IL6_serum => ; serum*function_43(Ab_IL6_serum, serum, kdegAb);
  reaction_152: Ab_sR_IL6_serum => ; serum*function_44(serum, Ab_sR_IL6_serum, kdegAb);
  reaction_153: Ab_serum => ; serum*function_45(serum, kdegAb, Ab_serum);
  reaction_154: Ab_sR_IL6_gut => ; gut*function_46(Ab_sR_IL6_gut, kdegAb, gut);
  reaction_155: Ab_IL6_gut => ; gut*function_47(Ab_IL6_gut, kdegAb, gut);
  reaction_156: Ab_gut + IL6_gut -> Ab_IL6_gut; gut*function_48(kIL6AbUnbind, IL6_gut, Ab_IL6_gut, kIL6AbBind, gut, Ab_gut);
  reaction_157: Ab_liver + IL6_liver -> Ab_IL6_liver; liver*function_49(IL6_liver, kIL6AbUnbind, Ab_liver, liver, kIL6AbBind, Ab_IL6_liver);
  reaction_158: Ab_IL6_liver => ; liver*function_50(liver, kdegAb, Ab_IL6_liver);
  reaction_159: Ab_sR_IL6_liver => ; liver*function_51(Ab_sR_IL6_liver, liver, kdegAb);
  reaction_160: Ab_serum -> Ab_liver; kAbSerumToLiver*Ab_serum - kAbLiverToSerum*Ab_liver;
  reaction_161: Ab_serum -> Ab_gut; kAbSerumToGut*Ab_serum - kAbGutToSerum*Ab_gut;
  reaction_162: Ab_IL6_serum -> Ab_IL6_liver; kAbSerumToLiver*Ab_IL6_serum - kAbLiverToSerum*Ab_IL6_liver;
  reaction_163: Ab_sR_IL6_serum -> Ab_sR_IL6_liver; kAbSerumToLiver*Ab_sR_IL6_serum - kAbLiverToSerum*Ab_sR_IL6_liver;
  reaction_164: Ab_IL6_serum -> Ab_IL6_gut; kAbSerumToGut*Ab_IL6_serum - kAbGutToSerum*Ab_IL6_gut;
  reaction_165: Ab_sR_IL6_serum -> Ab_sR_IL6_gut; kAbSerumToGut*Ab_sR_IL6_serum - kAbGutToSerum*Ab_sR_IL6_gut;
  reaction_166: Ab_liver => ; liver*function_52(Ab_liver, liver, kdegAb);
  reaction_167: Ab_gut => ; gut*function_53(kdegAb, gut, Ab_gut);

  // Events:
  Week0: at (time >= 0.1), fromTrigger=false: Ab_serum = Ab_serum + Initial_for_Dose*2.346;
  Week4: at (time >= 672), fromTrigger=false: Ab_serum = Ab_serum + Initial_for_Dose*2.346;
  Week8: at (time >= 1344), fromTrigger=false: Ab_serum = Ab_serum + Initial_for_Dose*2.346;
  Week12: at (time >= 2016), fromTrigger=false: Ab_serum = Initial_for_Ab + Initial_for_Dose*2.346;

  // Unit definitions:
  unit time = 3600 second;
  unit substance = 1e-9 mole;
end
