// SBML level 2 version 4
// This model was downloaded from BioModels Database
// http://www.ebi.ac.uk/biomodels/
// dcterms:bibliographicCitation: http://identifiers.org/pubmed/20865009

function function_4_cL_degr_1(c, cL, def, g3, m3, p3)
  (m3*cL + p3*cL^c/(cL^c + g3^c))/def;
end

function function_4_cL_m_trscr_1(L, a, b, cNI, cP, cP7, cP9, cTm, def, g1, g2, n0, n1, q1)
  (n0*L + L*q1*cP + n1*cTm^b/(cTm^b + g2^b))*g1^a/((cP9 + cP7 + cNI)^a + g1^a)/def;
end

function function_4_cL_m_degr_1(D, L, cL_m, def, m1, m2)
  (m1*L + m2*D)*cL_m/def;
end

function function_4_cL_trsl_1(D, L, cL_m, def, p1, p2)
  cL_m*(p1*L + p2*D)/def;
end

function function_4_cL_modif_1(c, cL, def, g3, p3)
  p3*cL^c/(cL^c + g3^c)/def;
end

function function_4_cLm_degr_1(cLm, def, m4)
  m4*cLm/def;
end

function function_4_cT_m_trscr_1(cL, cY, d, def, e, g4, g5, n2, n3)
  (n2*cY^d/(cY^d + g4^d) + n3)*g5^e/(cL^e + g5^e)/def;
end

function function_4_cT_m_degr_1(cT_m, def, m5)
  m5*cT_m/def;
end

function function_4_cT_trsl_1(cT_m, def, p4)
  p4*cT_m/def;
end

function function_4_cT_degr_1(D, L, cT, cZG, cZTL, def, m6, m7, m8, p5)
  ((m6*L + m7*D)*cT*(p5*cZTL + cZG) + m8*cT)/def;
end

function function_4_cT_modif_1(cT, def, f, g6, p15)
  p15*cT^f/(cT^f + g6^f)/def;
end

function function_4_cY_m_trscr_1(D, L, cL, cP, cT, def, g, g16, g7, n5, n6, q2, s)
  (L*q2*cP + (n5*L + n6*D)*g7^s/(cT^s + g7^s)*g16^g/(cL^g + g16^g))/def;
end

function function_4_cTm_degr_1(D, L, cTm, def, m25, m26)
  (m25*L + m26*D)*cTm/def;
end

function function_4_cY_m_degr_1(cY_m, def, m9)
  m9*cY_m/def;
end

function function_4_cY_trsl_1(cY_m, def, p6)
  p6*cY_m/def;
end

function function_4_cY_degr_1(cY, def, m10)
  m10*cY/def;
end

function function_4_cP_trsl_1(D, cP, def, p7)
  p7*D*(1 - cP)/def;
end

function function_4_cP_degr_1(L, cP, def, m11)
  m11*cP*L/def;
end

function function_4_cP9_m_trscr_1(L, cL, cP, cT, def, g8, g9, h, i, n4, n7, q3)
  (L*q3*cP + (n4*L + n7*cL^i/(cL^i + g9^i))*g8^h/(cT^h + g8^h))/def;
end

function function_4_cP9_m_degr_1(cP9_m, def, m12)
  m12*cP9_m/def;
end

function function_4_cP9_trsl_1(cP9_m, def, p8)
  p8*cP9_m/def;
end

function function_4_cP9_degr_1(D, L, cP9, def, m13, m22)
  (m13*L + m22*D)*cP9/def;
end

function function_4_cP7_m_trscr_1(cL, cLm, cP9, def, g10, g11, j, k, n8, n9)
  (n8*(cLm + cL)^j/((cLm + cL)^j + g10^j) + n9*cP9^k/(cP9^k + g11^k))/def;
end

function function_4_cP7_m_degr_1(cP7_m, def, m14)
  m14*cP7_m/def;
end

function function_4_cP7_trsl_1(cP7_m, def, p9)
  p9*cP7_m/def;
end

function function_4_cNI_m_trscr_1(cLm, cP7, def, g12, g13, l, m, n10, n11)
  (n10*cLm^l/(cLm^l + g12^l) + n11*cP7^m/(cP7^m + g13^m))/def;
end

function function_4_cP7_degr_1(D, L, cP7, def, m15, m23)
  (m15*L + m23*D)*cP7/def;
end

function function_4_cNI_m_degr_1(cNI_m, def, m16)
  m16*cNI_m/def;
end

function function_4_cNI_trsl_1(cNI_m, def, p10)
  p10*cNI_m/def;
end

function function_4_cG_m_trscr_1(L, cL, cP, cT, def, g14, g15, n, n12, o, q4)
  (L*q4*cP + n12*L*g15^o/(cL^o + g15^o)*g14^n/(cT^n + g14^n))/def;
end

function function_4_cNI_degr_1(D, L, cNI, def, m17, m24)
  (m17*L + m24*D)*cNI/def;
end

function function_4_cG_m_degr_1(cG_m, def, m18)
  m18*cG_m/def;
end

function function_4_cG_trsl_1(cG_m, def, p11)
  p11*cG_m/def;
end

function function_4_cG_degr_1(cG, def, m19)
  m19*cG/def;
end

function function_4_cG_cZTL_assoc_1(D, L, cG, cZG, cZTL, def, p12, p13)
  (p12*L*cZTL*cG - p13*D*cZG)/def;
end

function function_4_cZTL_trsl_1(def, p14)
  p14/def;
end

function function_4_cZTL_degr_1(cZTL, def, m20)
  m20*cZTL/def;
end

function function_4_cZG_degr_1(cZG, def, m21)
  m21*cZG/def;
end

model MODEL1410030000()
  // Gould2013 - Temperature Sensitive Circadian Clock
  // Gould2011 - Temperature Sensitive Circadian Clock
  // This model is a temperature sensitive version of Pokhilko et al. 2010 (PMID: 20865009), which is BIOMD0000000273 in BioModels.
  // This model is described in the article:
  // Network balance via CRY signalling controls the Arabidopsis circadian clock over ambient temperatures.
  // Gould PD, Ugarte N, Domijan M, Costa M, Foreman J, Macgregor D, Rose K, Griffiths J, Millar AJ, Finkenstädt B, Penfield S, Rand DA, Halliday KJ, Hall AJ.
  // Mol. Syst. Biol. 2013; 9: 650
  // Abstract:
  // Circadian clocks exhibit 'temperature compensation', meaning that they show only small changes in period over a broad temperature range. Several clock genes have been implicated in the temperature-dependent control of period in Arabidopsis. We show that blue light is essential for this, suggesting that the effects of light and temperature interact or converge upon common targets in the circadian clock. Our data demonstrate that two cryptochrome photoreceptors differentially control circadian period and sustain rhythmicity across the physiological temperature range. In order to test the hypothesis that the targets of light regulation are sufficient to mediate temperature compensation, we constructed a temperature-compensated clock model by adding passive temperature effects into only the light-sensitive processes in the model. Remarkably, this model was not only capable of full temperature compensation and consistent with mRNA profiles across a temperature range, but also predicted the temperature-dependent change in the level of LATE ELONGATED HYPOCOTYL, a key clock protein. Our analysis provides a systems-level understanding of period control in the plant circadian oscillator.
  // This model is hosted on BioModels Database and identified by: BIOMD0000000564.
  // To cite BioModels Database, please use: BioModels Database: An enhanced, curated and annotated resource for published quantitative kinetic models.
  // To the extent possible under law, all copyright and related or neighbouring rights to this encoded model have been dedicated to the public domain worldwide. Please refer to CC0 Public Domain Dedication for more information.
  // isDerivedFrom biomodels.db:BIOMD0000000089
  // biomodels.db:MODEL1410030000
  // biomodels.db:BIOMD0000000564
  // isDescribedBy pubmed:23511208
  // isDerivedFrom biomodels.db:BIOMD0000000273
  // isVersionOf GO:0007623

  // Compartments:
  compartment def = 1;  // isVersionOf GO:0005623

  // Species:
  species cG in def = 0.0238;  // isVersionOf uniprot:Q9SQI2
  species cG_m in def = 0.119;  // isVersionOf CHEBI:33699
  species cL in def = 0.416;  // isVersionOf uniprot:P92973; isVersionOf uniprot:Q6R0H1
  species cL_m in def = 1;  // isVersionOf CHEBI:33699
  species cLm in def = 0.054;  // isVersionOf uniprot:P92973; isVersionOf MOD:00000; isVersionOf uniprot:Q6R0H1
  species cNI in def = 0.044;  // isVersionOf CHEBI:35222
  species cNI_m in def = 0.0065;  // isVersionOf CHEBI:35222; isVersionOf CHEBI:33699
  species cP in def = 0.825;
  species cP7 in def = 0.019;  // isVersionOf uniprot:Q93WK5
  species cP7_m in def = 0.075;  // isVersionOf CHEBI:33699
  species cP9 in def = 0.056;  // isVersionOf uniprot:Q8L500
  species cP9_m in def = 0.35;  // isPartOf CHEBI:33699
  species cT in def = 0.393;  // isVersionOf uniprot:Q9LKL2
  species cT_m in def = 0.25;  // isVersionOf CHEBI:33699
  species cTm in def = 0.24;  // isVersionOf MOD:00000; isVersionOf uniprot:Q9LKL2
  species cY in def = 0.1;  // isVersionOf CHEBI:36080
  species cY_m in def = 0.093;  // CHEBI:33699; kegg.compound:C00046
  species cZG in def = 0.0774;  // hasPart uniprot:Q9SQI2; hasPart uniprot:Q94BT6
  species cZTL in def = 0.323;  // isVersionOf uniprot:Q94BT6

  // Parameters:
  n1 = 1.8;
  n2 = 0.7;
  n3 = 0.06;
  n4 = 0;
  n5 = 3.4;
  n6 = 1.25;
  n7 = 0.2;
  n8 = 0.42;
  n9 = 0.26;
  n10 = 0.18;
  n11 = 0.71;
  g1 = 0.1;
  g2 = 0.28;
  g3 = 0.4;
  g4 = 0.91;
  g5 = 0.3;
  g6 = 0.3;
  g7 = 0.18;
  g8 = 0.14;
  g9 = 0.3;
  g10 = 0.7;
  g11 = 0.7;
  g12 = 0.5;
  g13 = 0.6;
  g14 = 0.17;
  g15 = 0.4;
  g16 = 0.2;
  m2 = 0.24;
  m3 = 0.2;
  m4 = 0.2;
  m5 = 0.3;
  m7 = 0.5;
  m8 = 0.1;
  m9 = 1;
  m10 = 0.3;
  m11 = 1;
  m12 = 1;
  m13 = 0.32;
  m14 = 0.28;
  m16 = 0.5;
  m17 = 0.3;
  m18 = 1;
  m19 = 0.2;
  m20 = 1.2;
  m21 = 0.2;
  m22 = 2;
  m23 = 1;
  m24 = 0.405;
  m26 = 0.14;
  a = 2;
  b = 3;
  c = 3;
  d = 2.5;
  e = 2;
  f = 3;
  h = 2;
  g = 2;
  i = 3;
  j = 3;
  k = 3;
  l = 2;
  m = 2;
  n = 1;
  o = 2;
  s = 3;
  p2 = 0.27;
  p3 = 0.1;
  p4 = 0.268;
  p5 = 1;
  p6 = 0.44;
  p7 = 0.3;
  p8 = 0.7;
  p9 = 0.4;
  p10 = 0.36;
  p11 = 0.23;
  p12 = 30;
  p13 = 0.4;
  p14 = 0.45;
  p15 = 0.05;
  q1 = 0.8;
  q2 = 0.5;
  q3 = 2.9;
  q4 = 0.6;
  dawn = 0;
  dusk = 12;
  dawn1 = 0;
  dusk1 = 3;
  dawn2 = 9;
  dusk2 = 12;
  quantity = 0.5;
  An0 = 4638600;
  En0 = 40.5939;
  Temp = 300.15;
  Rgas = 0.0083145;
  Am1 = 2.3323;
  Em1 = 3.6511;
  Ap1 = 559910;
  Ep1 = 35.3172;
  Am6 = 1499400;
  Em6 = 38.9484;
  Am25 = 0.559;
  Em25 = 1.7253;
  Am15 = 1287;
  Em15 = 20.7914;
  An12 = 3.5369;
  En12 = 1.0203;

  // Assignment rules:
  n12 := An12*exp(-En12/(Rgas*Temp));
  n0 := An0*exp(-En0/(Rgas*Temp));
  m1 := Am1*exp(-Em1/(Rgas*Temp));
  m6 := Am6*exp(-Em6/(Rgas*Temp));
  m15 := Am15*exp(-Em15/(Rgas*Temp));
  m25 := Am25*exp(-Em25/(Rgas*Temp));
  p1 := Ap1*exp(-Ep1/(Rgas*Temp));
  L := 0.5*(1 + tanh((time - 24*floor(time/24))/0.5) - (1 + tanh((time - 24*floor(time/24) - 12)/0.5)) + 1 + tanh((time - 24*floor(time/24) - 24)/0.5));
  D := 1 - L;

  // Reactions:
  cL_m_trscr: => cL_m; def*function_4_cL_m_trscr_1(L, a, b, cNI, cP, cP7, cP9, cTm, def, g1, g2, n0, n1, q1);  // modifiers: cNI, cP, cP7, cP9, cTm; isVersionOf GO:0009299
  cL_m_degr: cL_m => ; def*function_4_cL_m_degr_1(D, L, cL_m, def, m1, m2);  // isVersionOf GO:0006402
  cL_trsl: => cL; def*function_4_cL_trsl_1(D, L, cL_m, def, p1, p2);  // modifiers: cL_m; isVersionOf GO:0006412
  cL_degr: cL => ; def*function_4_cL_degr_1(c, cL, def, g3, m3, p3);  // isVersionOf GO:0030163
  cL_modif: => cLm; def*function_4_cL_modif_1(c, cL, def, g3, p3);  // modifiers: cL; isVersionOf GO:0006464
  cLm_degr: cLm => ; def*function_4_cLm_degr_1(cLm, def, m4);  // isVersionOf GO:0030163
  cT_m_trscr: => cT_m; def*function_4_cT_m_trscr_1(cL, cY, d, def, e, g4, g5, n2, n3);  // modifiers: cL, cY; isVersionOf GO:0009299
  cT_m_degr: cT_m => ; def*function_4_cT_m_degr_1(cT_m, def, m5);  // isVersionOf GO:0006402
  cT_trsl: => cT; def*function_4_cT_trsl_1(cT_m, def, p4);  // modifiers: cT_m; isVersionOf GO:0006412
  cT_degr: cT => ; def*function_4_cT_degr_1(D, L, cT, cZG, cZTL, def, m6, m7, m8, p5);  // modifiers: cZG, cZTL; isVersionOf GO:0030163
  cT_modif: => cTm; def*function_4_cT_modif_1(cT, def, f, g6, p15);  // modifiers: cT; isVersionOf GO:0006464
  cTm_degr: cTm => ; def*function_4_cTm_degr_1(D, L, cTm, def, m25, m26);  // isVersionOf GO:0030163
  cY_m_trscr: => cY_m; def*function_4_cY_m_trscr_1(D, L, cL, cP, cT, def, g, g16, g7, n5, n6, q2, s);  // modifiers: cL, cP, cT; isVersionOf GO:0009299
  cY_m_degr: cY_m => ; def*function_4_cY_m_degr_1(cY_m, def, m9);  // isVersionOf GO:0006402
  cY_trsl: => cY; def*function_4_cY_trsl_1(cY_m, def, p6);  // modifiers: cY_m; isVersionOf GO:0006412
  cY_degr: cY => ; def*function_4_cY_degr_1(cY, def, m10);  // isVersionOf GO:0030163
  cP_trsl: => cP; def*function_4_cP_trsl_1(D, cP, def, p7);  // isVersionOf GO:0006412
  cP_degr: cP => ; def*function_4_cP_degr_1(L, cP, def, m11);  // isVersionOf GO:0030163
  cP9_m_trscr: => cP9_m; def*function_4_cP9_m_trscr_1(L, cL, cP, cT, def, g8, g9, h, i, n4, n7, q3);  // modifiers: cL, cP, cT; isVersionOf GO:0009299
  cP9_m_degr: cP9_m => ; def*function_4_cP9_m_degr_1(cP9_m, def, m12);  // isVersionOf GO:0006402
  cP9_trsl: => cP9; def*function_4_cP9_trsl_1(cP9_m, def, p8);  // modifiers: cP9_m; isVersionOf GO:0006412
  cP9_degr: cP9 => ; def*function_4_cP9_degr_1(D, L, cP9, def, m13, m22);  // isVersionOf GO:0030163
  cP7_m_trscr: => cP7_m; def*function_4_cP7_m_trscr_1(cL, cLm, cP9, def, g10, g11, j, k, n8, n9);  // modifiers: cL, cLm, cP9; isVersionOf GO:0009299
  cP7_m_degr: cP7_m => ; def*function_4_cP7_m_degr_1(cP7_m, def, m14);  // isVersionOf GO:0006402
  cP7_trsl: => cP7; def*function_4_cP7_trsl_1(cP7_m, def, p9);  // modifiers: cP7_m; isVersionOf GO:0006412
  cP7_degr: cP7 => ; def*function_4_cP7_degr_1(D, L, cP7, def, m15, m23);  // isPartOf GO:0030163
  cNI_m_trscr: => cNI_m; def*function_4_cNI_m_trscr_1(cLm, cP7, def, g12, g13, l, m, n10, n11);  // modifiers: cLm, cP7; isVersionOf GO:0009299
  cNI_m_degr: cNI_m => ; def*function_4_cNI_m_degr_1(cNI_m, def, m16);  // isVersionOf GO:0006402
  cNI_trsl: => cNI; def*function_4_cNI_trsl_1(cNI_m, def, p10);  // modifiers: cNI_m; isVersionOf GO:0006412
  cNI_degr: cNI => ; def*function_4_cNI_degr_1(D, L, cNI, def, m17, m24);  // isVersionOf GO:0030163
  cG_m_trscr: => cG_m; def*function_4_cG_m_trscr_1(L, cL, cP, cT, def, g14, g15, n, n12, o, q4);  // modifiers: cL, cP, cT; isVersionOf GO:0009299
  cG_m_degr: cG_m => ; def*function_4_cG_m_degr_1(cG_m, def, m18);  // isVersionOf GO:0006402
  cG_trsl: => cG; def*function_4_cG_trsl_1(cG_m, def, p11);  // modifiers: cG_m; isVersionOf GO:0006412
  cG_degr: cG => ; def*function_4_cG_degr_1(cG, def, m19);  // isVersionOf GO:0030163
  cG_cZTL_assoc: cG + cZTL -> cZG; def*function_4_cG_cZTL_assoc_1(D, L, cG, cZG, cZTL, def, p12, p13);  // isVersionOf GO:0006461
  cZTL_trsl: => cZTL; def*function_4_cZTL_trsl_1(def, p14);  // isVersionOf GO:0006412
  cZTL_degr: cZTL => ; def*function_4_cZTL_degr_1(cZTL, def, m20);  // isVersionOf GO:0030163
  cZG_degr: cZG => ; def*function_4_cZG_degr_1(cZG, def, m21);  // isVersionOf GO:0030163

  // Unit definitions:
  unit substance = item;
end
