// SBML level 3 version 2

model MODEL1406060000()
  // Machado2014 - Curcumin production pathway in Escherichia coli
  // This model is described in the article:
  // A kinetic model for curcumin production in Escherichia coli.
  // Machado D, Rodrigues LR, Rocha I.
  // BioSystems 2014 Nov; 125: 16-21
  // Abstract:
  // Curcumin is a natural compound obtained from turmeric, and is well known for its pharmacological effects. In this work, we design a heterologous pathway for industrial production of curcumin in Escherichia coli. A kinetic model of the pathway is then developed and connected to a kinetic model of the central carbon metabolism of E. coli. This model is used for optimization of the mutant strain through a rational design approach, and two manipulation targets are identified for overexpression. Dynamic simulations are then performed to compare the curcumin production profiles of the different mutant strains. Our results show that it is possible to obtain a significant improvement in the curcumin production rates with the proposed mutants. The kinetic model here developed can be an important framework to optimize curcumin production at an industrial scale and add value to its biomedical potential.
  // This model is hosted on BioModels Database and identified by: BIOMD0000000565.
  // To cite BioModels Database, please use: BioModels Database: An enhanced, curated and annotated resource for published quantitative kinetic models.
  // To the extent possible under law, all copyright and related or neighbouring rights to this encoded model have been dedicated to the public domain worldwide. Please refer to CC0 Public Domain Dedication for more information.
  // biomodels.db:MODEL1406060000
  // biomodels.db:BIOMD0000000565
  // isDescribedBy pubmed:25218090
  // isDerivedFrom biomodels.db:BIOMD0000000051
  // isVersionOf GO:0036039
  // hasTaxon taxonomy:562
  // model units - substance: substance, time: second, volume: volume, area: area, length: metre, extent: substance

  // Compartments:
  compartment extracellular = 65 volume;  // isVersionOf GO:0005576
  compartment cytosol = 1 volume;  // isVersionOf GO:0005829

  // Species:
  species cpep in cytosol = 2.67; cpep is "Phosphoenol pyruvate";  // isVersionOf CHEBI:44897
  species cglcex in extracellular = 55.5; cglcex is "Extracellular Glucose";  // isVersionOf CHEBI:17234
  species cg6p in cytosol = 3.48; cg6p is "Glucose-6-Phosphate";  // isVersionOf CHEBI:14314
  species cpyr in cytosol = 2.67; cpyr is "Pyruvate";  // isVersionOf CHEBI:32816
  species cf6p in cytosol = 0.6; cf6p is "Fructose-6-Phosphate";  // isVersionOf CHEBI:78697
  species cg1p in cytosol = 0.653; cg1p is "Glucose-1-Phosphate";  // isVersionOf CHEBI:16077
  species cpg in cytosol = 0.808; cpg is "6-Phosphogluconate";  // isVersionOf CHEBI:48928
  species cfdp in cytosol = 0.272; cfdp is "Fructose-1,6-bisphosphate";  // isVersionOf CHEBI:40595
  species csed7p in cytosol = 0.276; csed7p is "sedoheptulose-7-phosphate";  // isVersionOf CHEBI:15721
  species cgap in cytosol = 0.218; cgap is "Glyceraldehyde-3-Phosphate";  // isVersionOf CHEBI:17138
  species ce4p in cytosol = 0.098; ce4p is "Erythrose-4-phosphate";  // isVersionOf CHEBI:48153
  species cxyl5p in cytosol = 0.138; cxyl5p is "Xylulose-5-phosphate";  // isVersionOf CHEBI:57737
  species crib5p in cytosol = 0.398; crib5p is "Ribose-5-phosphate";  // isVersionOf CHEBI:58273
  species cdhap in cytosol = 0.167; cdhap is "Dihydroxyacetonephosphate";  // isVersionOf CHEBI:57642
  species cpgp in cytosol = 0.008; cpgp is "1,3-diphosphosphoglycerate";  // isVersionOf pubchem.compound:683
  species cpg3 in cytosol = 2.13; cpg3 is "3-Phosphoglycerate";  // isVersionOf CHEBI:17794
  species cpg2 in cytosol = 0.399; cpg2 is "2-Phosphoglycerate";  // isVersionOf CHEBI:24344
  species cribu5p in cytosol = 0.111; cribu5p is "Ribulose-5-phosphate";  // isVersionOf CHEBI:58121
  species accoa in cytosol = 1;  // isVersionOf CHEBI:15351
  species malcoa in cytosol = 1;  // isVersionOf CHEBI:15531
  species fer in cytosol = 0;  // isVersionOf CHEBI:17620
  species fer_ext in extracellular = 271.5;  // isVersionOf CHEBI:17620
  species fercoa in cytosol = 0;  // isVersionOf CHEBI:14261
  species ferdicoa in cytosol = 0;  // isVersionOf CHEBI:71236
  species cur in cytosol = 0;  // isVersionOf CHEBI:3962
  species cur_ext in extracellular = 0;  // isVersionOf CHEBI:3962

  // Parameters:
  catp = 4.27 mM;
  cadp = 0.595 mM;
  camp = 0.955 mM;
  cnadp = 0.195 mM;
  cnadph = 0.062 mM;
  cnad = 1.47 mM;
  cnadh = 0.1 mM;
  Dil = 0 second_inverse;

  // Reactions:
  vPTS: cglcex + cpep => cg6p + cpyr; extracellular*rmaxPTS*cglcex*(cpep/cpyr)/((KPTSa1 + KPTSa2*(cpep/cpyr) + KPTSa3*cglcex + cglcex*(cpep/cpyr))*(1 + cg6p^nPTSg6p/KPTSg6p)); vPTS is "Phosphotransferase system";
    rmaxPTS = 7829.78 mM_per_second; KPTSa1 = 3082.3 mM; KPTSa2 = 0.01 mM; KPTSa3 = 245.3 dimensionless; nPTSg6p = 3.66 dimensionless; KPTSg6p = 2.15 mM;
  vPGI: cg6p -> cf6p; cytosol*rmaxPGI*(cg6p - cf6p/KPGIeq)/(KPGIg6p*(1 + cf6p/(KPGIf6p*(1 + cpg/KPGIf6ppginh)) + cpg/KPGIg6ppginh) + cg6p); vPGI is "Glucose-6-phosphate isomerase";  // modifiers: cpg
    rmaxPGI = 650.9879 mM_per_second; KPGIeq = 0.1725 dimensionless; KPGIg6p = 2.9 mM; KPGIf6p = 0.266 mM; KPGIf6ppginh = 0.2 mM; KPGIg6ppginh = 0.2 mM;
  vPGM: cg6p -> cg1p; cytosol*rmaxPGM*(cg6p - cg1p/KPGMeq)/(KPGMg6p*(1 + cg1p/KPGMg1p) + cg6p); vPGM is "Phosphoglucomutase";
    rmaxPGM = 0.8398243 mM_per_second; KPGMeq = 0.196 dimensionless; KPGMg6p = 1.038 mM; KPGMg1p = 0.0136 mM;
  vG6PDH: cg6p => cpg; cytosol*rmaxG6PDH*cg6p*cnadp/((cg6p + KG6PDHg6p)*(1 + cnadph/KG6PDHnadphg6pinh)*(KG6PDHnadp*(1 + cnadph/KG6PDHnadphnadpinh) + cnadp)); vG6PDH is "Glucose-6-phosphate dehydrogenase";
    rmaxG6PDH = 1.380197 mM_per_second; KG6PDHg6p = 14.4 mM; KG6PDHnadphg6pinh = 6.43 mM; KG6PDHnadp = 0.0246 mM; KG6PDHnadphnadpinh = 0.01 mM;
  vPFK: cf6p => cfdp; cytosol*rmaxPFK*catp*cf6p/((catp + KPFKatps*(1 + cadp/KPFKadpc))*(cf6p + KPFKf6ps*(1 + cpep/KPFKpep + cadp/KPFKadpb + camp/KPFKampb)/(1 + cadp/KPFKadpa + camp/KPFKampa))*(1 + LPFK/(1 + cf6p*(1 + cadp/KPFKadpa + camp/KPFKampa)/(KPFKf6ps*(1 + cpep/KPFKpep + cadp/KPFKadpb + camp/KPFKampb)))^nPFK)); vPFK is "Phosphofructokinase";  // modifiers: cpep
    rmaxPFK = 1840.585 mM_per_second; KPFKatps = 0.123 mM; KPFKadpc = 4.14 mM; KPFKf6ps = 0.325 mM; KPFKpep = 3.26 mM; KPFKadpb = 3.89 mM; KPFKampb = 3.2 mM; KPFKadpa = 128 mM; KPFKampa = 19.1 mM; LPFK = 5629067 dimensionless; nPFK = 11.1 dimensionless;
  vTA: cgap + csed7p -> cf6p + ce4p; cytosol*rmaxTA*(cgap*csed7p - ce4p*cf6p/KTAeq); vTA is "Transaldolase";
    rmaxTA = 10.87164 per_mM_per_second; KTAeq = 1.05 dimensionless;
  vTKA: crib5p + cxyl5p -> cgap + csed7p; cytosol*rmaxTKa*(crib5p*cxyl5p - csed7p*cgap/KTKaeq); vTKA is "Transketolase a";
    rmaxTKa = 9.473385 per_mM_per_second; KTKaeq = 1.2 dimensionless;
  vTKB: ce4p + cxyl5p -> cgap + cf6p; cytosol*rmaxTKb*(cxyl5p*ce4p - cf6p*cgap/KTKbeq); vTKB is "Transketolase b";
    rmaxTKb = 86.55856 per_mM_per_second; KTKbeq = 10 dimensionless;
  vMURSyNTH: 2 cf6p => ; cytosol*rmaxMurSynth; vMURSyNTH is "Mureine synthesis";
    rmaxMurSynth = 0 mM_per_second;
  vALDO: cfdp -> cdhap + cgap; cytosol*rmaxALDO*(cfdp - cgap*cdhap/kALDOeq)/(kALDOfdp + cfdp + kALDOgap*cdhap/(kALDOeq*VALDOblf) + kALDOdhap*cgap/(kALDOeq*VALDOblf) + cfdp*cgap/kALDOgapinh + cgap*cdhap/(VALDOblf*kALDOeq)); vALDO is "Aldolase";
    rmaxALDO = 17.41464 mM_per_second; kALDOeq = 0.144 mM; kALDOfdp = 1.75 mM; kALDOgap = 0.088 mM; VALDOblf = 2 dimensionless; kALDOdhap = 0.088 mM; kALDOgapinh = 0.6 mM;
  vGAPDH: cgap -> cpgp; cytosol*rmaxGAPDH*(cgap*cnad - cpgp*cnadh/KGAPDHeq)/((KGAPDHgap*(1 + cpgp/KGAPDHpgp) + cgap)*(KGAPDHnad*(1 + cnadh/KGAPDHnadh) + cnad)); vGAPDH is "Glyceraldehyde-3-phosphate dehydrogenase";
    rmaxGAPDH = 921.5943 mM_per_second; KGAPDHeq = 0.63 dimensionless; KGAPDHgap = 0.683 mM; KGAPDHpgp = 1.04e-5 mM; KGAPDHnad = 0.252 mM; KGAPDHnadh = 1.09 mM;
  vTIS: cdhap -> cgap; cytosol*rmaxTIS*(cdhap - cgap/kTISeq)/(kTISdhap*(1 + cgap/kTISgap) + cdhap); vTIS is "Triosephosphate isomerase";
    rmaxTIS = 68.67474 mM_per_second; kTISeq = 1.39 dimensionless; kTISdhap = 2.8 mM; kTISgap = 0.3 mM;
  vTRPSYNTH: => cpyr + cgap; cytosol*rmaxTrpSynth; vTRPSYNTH is "Tryptophan synthesis";
    rmaxTrpSynth = 0.001037 mM_per_second;
  vG3PDH: cdhap => ; cytosol*rmaxG3PDH*cdhap/(KG3PDHdhap + cdhap); vG3PDH is "Glycerol-3-phosphate dehydrogenase";
    rmaxG3PDH = 0.01162043 mM_per_second; KG3PDHdhap = 1 mM;
  vPGK: cpgp -> cpg3; cytosol*rmaxPGK*(cadp*cpgp - catp*cpg3/KPGKeq)/((KPGKadp*(1 + catp/KPGKatp) + cadp)*(KPGKpgp*(1 + cpg3/KPGKpg3) + cpgp)); vPGK is "Phosphoglycerate kinase";
    rmaxPGK = 3021.774 mM_per_second; KPGKeq = 1934.4 dimensionless; KPGKadp = 0.185 mM; KPGKatp = 0.653 mM; KPGKpgp = 0.0468 mM; KPGKpg3 = 0.473 mM;
  vsersynth: cpg3 => ; cytosol*rmaxSerSynth*cpg3/(KSerSynthpg3 + cpg3); vsersynth is "Serine synthesis";
    rmaxSerSynth = 0.025712107 mM_per_second; KSerSynthpg3 = 1 mM;
  vrpGluMu: cpg3 -> cpg2; cytosol*rmaxPGluMu*(cpg3 - cpg2/KPGluMueq)/(KPGluMupg3*(1 + cpg2/KPGluMupg2) + cpg3); vrpGluMu is "Phosphoglycerate mutase";
    rmaxPGluMu = 89.04965 mM_per_second; KPGluMueq = 0.188 dimensionless; KPGluMupg3 = 0.2 mM; KPGluMupg2 = 0.369 mM;
  vENO: cpg2 -> cpep; cytosol*rmaxENO*(cpg2 - cpep/KENOeq)/(KENOpg2*(1 + cpep/KENOpep) + cpg2); vENO is "Enolase";
    rmaxENO = 330.4476 mM_per_second; KENOeq = 6.73 mM; KENOpg2 = 0.1 mM; KENOpep = 0.135 mM;
  vPK: cpep => cpyr; cytosol*rmaxPK*cpep*(cpep/KPKpep + 1)^(nPK - 1)*cadp/(KPKpep*(LPK*((1 + catp/KPKatp)/(cfdp/KPKfdp + camp/KPKamp + 1))^nPK + (cpep/KPKpep + 1)^nPK)*(cadp + KPKadp)); vPK is "Pyruvate kinase";  // modifiers: cfdp
    rmaxPK = 0.0611315 mM_per_second; KPKpep = 0.31 mM; nPK = 4 dimensionless; LPK = 1000 dimensionless; KPKatp = 22.5 mM; KPKfdp = 0.19 mM; KPKamp = 0.2 mM; KPKadp = 0.26 mM;
  vpepCxylase: cpep => ; cytosol*rmaxpepCxylase*cpep*(1 + (cfdp/KpepCxylasefdp)^npepCxylasefdp)/(KpepCxylasepep + cpep); vpepCxylase is "PEP carboxylase";  // modifiers: cfdp
    rmaxpepCxylase = 0.1070206 mM_per_second; KpepCxylasefdp = 0.7 mM; npepCxylasefdp = 4.21 dimensionless; KpepCxylasepep = 4.07 mM;
  vSynth1: cpep => ; cytosol*rmaxSynth1*cpep/(KSynth1pep + cpep); vSynth1 is "Synthesis 1";
    rmaxSynth1 = 0.01953897 mM_per_second; KSynth1pep = 1 mM;
  vSynth2: cpyr => ; cytosol*rmaxSynth2*cpyr/(KSynth2pyr + cpyr); vSynth2 is "Synthesis 2";
    rmaxSynth2 = 0.07361855 mM_per_second; KSynth2pyr = 1 mM;
  vDAHPS: ce4p + cpep => ; cytosol*rmaxDAHPS*ce4p^nDAHPSe4p*cpep^nDAHPSpep/((KDAHPSe4p + ce4p^nDAHPSe4p)*(KDAHPSpep + cpep^nDAHPSpep)); vDAHPS is "DAHP synthesis";
    rmaxDAHPS = 0.1079531 mM_per_second; nDAHPSe4p = 2.6 dimensionless; nDAHPSpep = 2.2 dimensionless; KDAHPSe4p = 0.035 mM; KDAHPSpep = 0.0053 mM;
  vPDH: cpyr => accoa; cytosol*rmaxPDH*cpyr^nPDH/(KPDHpyr*(1 + accoa/Ki_PDH_accoa) + cpyr^nPDH); vPDH is "Pyruvate dehydrogenase";
    rmaxPDH = 270.27734 mM_per_second; nPDH = 3.68 dimensionless; KPDHpyr = 1159 mM; Ki_PDH_accoa = 0.0222222 mM;
  vMethSynth: => cpyr; cytosol*rmaxMetSynth; vMethSynth is "Methionine synthesis";
    rmaxMetSynth = 0.0022627 mM_per_second;
  vPGDH: cpg => cribu5p; cytosol*rmaxPGDH*cpg*cnadp/((cpg + KPGDHpg)*(cnadp + KPGDHnadp*(1 + cnadph/KPGDHnadphinh)*(1 + catp/KPGDHatpinh))); vPGDH is "6-Phosphogluconate dehydrogenase";
    rmaxPGDH = 16.23236 mM_per_second; KPGDHpg = 37.5 mM; KPGDHnadp = 0.0506 mM; KPGDHnadphinh = 0.0138 mM; KPGDHatpinh = 208 mM;
  vR5PI: cribu5p -> crib5p; cytosol*rmaxR5PI*(cribu5p - crib5p/KR5PIeq); vR5PI is "Ribose-phosphate isomerase";
    rmaxR5PI = 4.83841193 second_inverse; KR5PIeq = 4 dimensionless;
  vRu5P: cribu5p -> cxyl5p; cytosol*rmaxRu5P*(cribu5p - cxyl5p/KRu5Peq); vRu5P is "Ribulose-phosphate epimerase";
    rmaxRu5P = 6.739029 second_inverse; KRu5Peq = 1.4 dimensionless;
  vPPK: crib5p => ; cytosol*rmaxRPPK*crib5p/(KRPPKrib5p + crib5p); vPPK is "Ribose phosphate pyrophosphokinase";
    rmaxRPPK = 0.01290045 mM_per_second; KRPPKrib5p = 0.1 mM;
  vG1PAT: cg1p => ; cytosol*rmaxG1PAT*cg1p*catp*(1 + (cfdp/KG1PATfdp)^nG1PATfdp)/((KG1PATatp + catp)*(KG1PATg1p + cg1p)); vG1PAT is "Glucose-1-phosphate adenyltransferase";  // modifiers: cfdp
    rmaxG1PAT = 0.007525458 mM_per_second; KG1PATfdp = 0.119 mM; nG1PATfdp = 1.2 mM; KG1PATatp = 4.42 mM; KG1PATg1p = 3.2 mM;
  vG6P: cg6p -> ; cytosol*Dil*cg6p; vG6P is "G6P degradation";
  vf6P: cf6p -> ; cytosol*Dil*cf6p; vf6P is "F6P degradation";
  vfdP: cfdp -> ; cytosol*Dil*cfdp; vfdP is "FDP degradation";
  vGAP: cgap -> ; cytosol*Dil*cgap; vGAP is "GAP degradation";
  vDHAP: cdhap -> ; cytosol*Dil*cdhap; vDHAP is "DHAP degradation";
  vPGP: cpgp -> ; cytosol*Dil*cpgp; vPGP is "PGP degradation";
  vPG3: cpg3 -> ; cytosol*Dil*cpg3; vPG3 is "PG3 degradation";
  vpg2: cpg2 -> ; cytosol*Dil*cpg2; vpg2 is "PG2 degradation";
  vPEP: cpep -> ; cytosol*Dil*cpep; vPEP is "PEP degradation";
  vRibu5p: cribu5p -> ; cytosol*Dil*cribu5p; vRibu5p is "Ribu5P dilution";
  vRIB5P: crib5p -> ; cytosol*Dil*crib5p; vRIB5P is "Rib5P dilution";
  vXYL5P: cxyl5p -> ; cytosol*Dil*cxyl5p; vXYL5P is "XYL5P dilution";
  vSED7P: csed7p -> ; cytosol*Dil*csed7p; vSED7P is "SED7P dilution";
  vpyr: cpyr -> ; cytosol*Dil*cpyr; vpyr is "Pyruvate dilution";
  vPG: cpg -> ; cytosol*Dil*cpg; vPG is "PG dilution";
  vE4P: ce4p -> ; cytosol*Dil*ce4p; vE4P is "E4P dilution";
  vGLP: cg1p -> ; cytosol*Dil*cg1p; vGLP is "GLP dilution";
  vEXTER: => cglcex; extracellular*Dil*(cfeed_glc - cglcex); vEXTER is "Extracellular glucose kinetics";
    cfeed_glc = 110.96 mM;
  ACCOAC: accoa => malcoa; cytosol*rmaxACCOAC*accoa/(K_ACCOAC_accoa*(1 + malcoa/Ki_ACCOAC_malcoa) + accoa);
    rmaxACCOAC = 0.04634 mM_per_second; K_ACCOAC_accoa = 0.0003 mM; Ki_ACCOAC_malcoa = 0.1 mM;
  Synth3: accoa => ; cytosol*rmaxSynth3*accoa/(KSynth3accoa + accoa); Synth3 is "Synthesis 3";
    rmaxSynth3 = 0.284 mM_per_second; KSynth3accoa = 1 mM;
  Synth4: malcoa => ; cytosol*rmaxSynth4*malcoa/(KSynth4malcoa + malcoa); Synth4 is "Synthesis 4";
    rmaxSynth4 = 0.092372 mM_per_second; KSynth4malcoa = 1 mM;
  R4CL: fer => fercoa; E_4CL*kcat_4CL*fer/(Km_4CL + fer);
    E_4CL = 100; kcat_4CL = 9.572; Km_4CL = 0.026;
  DCS: fercoa + malcoa => ferdicoa; E_DCS*kcat_DCS*(fercoa^n_DCS_fercoa/(Km_DCS_fercoa^n_DCS_fercoa + fercoa^n_DCS_fercoa))*(malcoa/(Km_DCS_malcoa + malcoa));
    E_DCS = 100; kcat_DCS = 0.01343; Km_DCS_fercoa = 0.046; Km_DCS_malcoa = 0.0084; n_DCS_fercoa = 1.8;
  CURS: fercoa + ferdicoa => cur; E_CURS*kcat_CURS*(fercoa/(Km_CURS_fercoa + fercoa))*(ferdicoa/(Km_CURS_ferdicoa + ferdicoa));
    E_CURS = 100; kcat_CURS = 0.02163; Km_CURS_fercoa = 0.018; Km_CURS_ferdicoa = 0.018;
  FER_t: fer_ext -> fer; extracellular*k_FER_t*(fer_ext - fer/Keq_FER_t);
    k_FER_t = 1000 second_inverse; Keq_FER_t = 1 dimensionless;
  CUR_t: cur -> cur_ext; cytosol*k_CUR_t*(cur - cur_ext/Keq_CUR_t);
    k_CUR_t = 1000 second_inverse; Keq_CUR_t = 1 dimensionless;
  EX_FER: => fer_ext; extracellular*Dil*(cfeed_fer - fer_ext);
    cfeed_fer = 500 mM;
  EX_CUR: cur_ext => ; extracellular*Dil*cur_ext;
  vACCOA: accoa -> ; cytosol*Dil*accoa; vACCOA is "ACCOA dilution";
  vMALCOA: malcoa -> ; cytosol*Dil*malcoa; vMALCOA is "MALCOA dilution";
  vFER: fer -> ; cytosol*Dil*fer; vFER is "FER dilution";
  vFERCOA: fercoa -> ; cytosol*Dil*fercoa; vFERCOA is "FERCOA dilution";
  vFERDICOA: ferdicoa -> ; cytosol*Dil*ferdicoa; vFERDICOA is "FERDICOA dilution";
  vCUR: cur -> ; cytosol*Dil*cur; vCUR is "CUR dilution";

  // Unit definitions:
  unit substance = 1e-3 mole; substance is "millimole";
  unit mM = 1e-3 mole / litre; mM is "milli Molar";
  unit second_inverse = 1 / second;
  unit mM_per_second = 1e-3 mole / (litre * second);
  unit per_mM_per_second = litre / (1e-3 mole * second);
  unit volume = litre;
  unit area = metre^2;
end
