// SBML level 3 version 2

function mRNA(S_RNA, Activator, Ka)
  Ka*S_RNA*Activator;
end

function ptotein(Ka, S_PROT, Activator)
  Ka*S_PROT*Activator;
end

function LigandDegrOld(Act, Vm, S1, Kms1, S2, Kms2, S3, Kms3)
  Act*(Vm*S1/Kms1/(1 + S1/Kms1 + S2/Kms2 + S3/Kms3));
end

model MODEL1506290000()
  // Kolodkin2013 - Nuclear receptor-mediated cortisol signalling network
  // This model is described in the article:
  // Optimization of stress response through the nuclear receptor-mediated cortisol signalling network.
  // Kolodkin A, Sahin N, Phillips A, Hood SR, Bruggeman FJ, Westerhoff HV, Plant N.
  // Nat Commun 2013; 4: 1792
  // Abstract:
  // It is an accepted paradigm that extended stress predisposes an individual to pathophysiology. However, the biological adaptations to minimize this risk are poorly understood. Using a computational model based upon realistic kinetic parameters we are able to reproduce the interaction of the stress hormone cortisol with its two nuclear receptors, the high-affinity glucocorticoid receptor and the low-affinity pregnane X-receptor. We demonstrate that regulatory signals between these two nuclear receptors are necessary to optimize the body's response to stress episodes, attenuating both the magnitude and duration of the biological response. In addition, we predict that the activation of pregnane X-receptor by multiple, low-affinity endobiotic ligands is necessary for the significant pregnane X-receptor-mediated transcriptional response observed following stress episodes. This integration allows responses mediated through both the high and low-affinity nuclear receptors, which we predict is an important strategy to minimize the risk of disease from chronic stress.
  // This model is hosted on BioModels Database and identified by: BIOMD0000000576.
  // To cite BioModels Database, please use: BioModels Database: An enhanced, curated and annotated resource for published quantitative kinetic models.
  // To the extent possible under law, all copyright and related or neighbouring rights to this encoded model have been dedicated to the public domain worldwide. Please refer to CC0 Public Domain Dedication for more information.
  // biomodels.db:MODEL1506290000
  // biomodels.db:BIOMD0000000576
  // isDescribedBy pubmed:23653204
  // hasTaxon taxonomy:9606
  // occursIn BTO:0000575
  // isVersionOf GO:0051414
  // model units - substance: substance, time: time, volume: volume, area: area, length: metre, extent: substance

  // Compartments:
  compartment default = 1 volume;  // GO:0005623
  compartment blood = 5 volume;  // BTO:0000089

  // Species:
  species $S_RNA in default = 1;  // CHEBI:33699
  species $S_PROT in default = 1;  // CHEBI:16541
  species PXR_GENE in default = 0.7800002;  // encodes uniprot:O75469; isVersionOf ensembl:ENSG00000144852
  species PXR_RNA in default = 0.007000002;  // encodes uniprot:O75469; isVersionOf ensembl:ENST00000337940
  species PXR_PROT in default = 99.90003;  // isVersionOf uniprot:O75469
  species $P in default = 0;
  species GR_GENE in default = 0.5000001;  // isVersionOf ensembl:ENSG00000113580; encodes uniprot:P04150
  species GR_RNA in default = 0.0008000002;  // isVersionOf ensembl:ENST00000343796; encodes uniprot:P04150
  species GR_PROT in default = 47.24001;  // isVersionOf uniprot:P04150
  species Cort in default = 1.14;  // isVersionOf CHEBI:17650
  species CYP_GENE in default = 0.8297602;  // encodes uniprot:P08684; isVersionOf ensembl:ENSG00000160868
  species CYP_PROT in default = 104;  // isVersionOf uniprot:P08684
  species CYP_RNA in default = 0.07500002;  // encodes uniprot:P08684; isVersionOf ensembl:ENST00000336411
  species TAT_RNA in default = 0.1;  // isVersionOf ensembl:ENST00000355962; encodes uniprot:P17735
  species GRgene_GRprot_Cort in default = 0.3300001;  // hasPart CHEBI:17650 ensembl:ENSG00000113580 uniprot:P04150
  species CYPgene_PXRprot_Cort in default = 0.0002400001;  // hasPart CHEBI:17650 ensembl:ENSG00000160868 uniprot:O75469
  species PXRgene_GRprot_Cort in default = 0.05000001;  // hasPart CHEBI:17650 ensembl:ENSG00000144852 uniprot:P04150
  species GRprot_Cort in default = 32.36001;  // hasPart CHEBI:17650 uniprot:P04150
  species PXRprot_Cort in default = 0.01;  // hasPart CHEBI:17650 uniprot:O75469
  species TATgene_GRprot_Cort in default = 0.02000001;  // hasPart CHEBI:17650 ensembl:ENSG00000198650 uniprot:P04150
  species TAT_GENE in default = 0.8100002;  // encodes uniprot:P17735; isVersionOf ensembl:ENSG00000198650
  species $Cort_degr in default = 0;
  species $Cortisone in default = 24.00001;  // isVersionOf CHEBI:16962
  species TAT_PROT in default = 0.4620281;  // isVersionOf uniprot:P17735
  species Ligand2 in default = 100;
  species PXRprot_Ligand2 in default = 0.001;  // hasPart uniprot:O75469
  species CYPgene_PXRprot_Ligand2 in default = 2.400001e-5;  // hasPart ensembl:ENSG00000160868 uniprot:O75469
  species DEX in default = 0;  // isVersionOf CHEBI:41879
  species GRprot_DEX in default = 0;  // hasPart CHEBI:41879 uniprot:P04150
  species PXRprot_DEX in default = 0;  // hasPart CHEBI:41879 uniprot:O75469
  species $DEX_degr in default = 0;
  species CYPgene_PXRprot_DEX in default = 0;  // hasPart CHEBI:41879 ensembl:ENSG00000160868 uniprot:O75469
  species PXRgene_GRprot_DEX in default = 0;  // hasPart CHEBI:41879 ensembl:ENSG00000144852 uniprot:P04150
  species GRgene_GRprot_DEX in default = 0;  // hasPart CHEBI:41879 ensembl:ENSG00000113580 uniprot:P04150
  species TATgene_GRprot_DEX in default = 0;  // hasPart CHEBI:41879 ensembl:ENSG00000198650 uniprot:P04150
  species CortOUT in blood = 0;  // isVersionOf CHEBI:17650
  species $DEXout in blood = 0;  // isVersionOf CHEBI:41879
  species CBG in blood = 550.0002;  // isVersionOf uniprot:P08185
  species CBG_CortOUT in blood = 0;  // hasPart CHEBI:17650 uniprot:P08185
  species Alb in blood = 60000.02;  // isVersionOf uniprot:P02768
  species Alb_CortOUT in blood = 0;  // hasPart CHEBI:17650 uniprot:P02768
  species $CortAdded in blood = 0;  // isVersionOf CHEBI:17650

  // Parameters:
  GeneProteinBinding_diff_limited = 60;
  cypGene_PXRprotein = 1;
  cypMrna_synt = 0.05;
  PXRGene_GRprotein = 200;
  TATGene_GRprotein = 300;
  GRGene_GRprotein = 60;
  grMrna_synt = 1.2e-6;
  tatMrna_synt = 0.005;
  pxrMrna_synt = 0.00011;

  // Assignment rules:
  GRprotein := GR_PROT + GRgene_GRprot_Cort + PXRgene_GRprot_Cort + GRprot_Cort + TATgene_GRprot_Cort + GRprot_DEX + PXRgene_GRprot_DEX + GRgene_GRprot_DEX + TATgene_GRprot_DEX;
  PXRprotein := PXR_PROT + CYPgene_PXRprot_Cort + PXRprot_Cort + PXRprot_Ligand2 + CYPgene_PXRprot_Ligand2 + PXRprot_DEX + CYPgene_PXRprot_DEX;

  // Reactions:
  re1: $S_RNA => CYP_RNA; default*mRNA(S_RNA, CYP_GENE, re1_Ka);  // modifiers: CYP_GENE
    re1_Ka = 0.00321;
  re2: CYP_RNA => $P; default*re2_k1*CYP_RNA;
    re2_k1 = 0.04;
  re3: $S_PROT => CYP_PROT; default*ptotein(re3_Ka, S_PROT, CYP_RNA);  // modifiers: CYP_RNA
    re3_Ka = 2.5;
  re4: CYP_PROT => $P; default*re4_k1*CYP_PROT;
    re4_k1 = 0.0015;
  re5: $S_RNA => PXR_RNA; default*mRNA(S_RNA, PXR_GENE, re5_Ka);  // modifiers: PXR_GENE
    re5_Ka = 5.52e-5;
  re6: PXR_RNA => $P; default*re6_k1*PXR_RNA;
    re6_k1 = 0.006;
  re7: $S_PROT => PXR_PROT; default*ptotein(re7_Ka, S_PROT, PXR_RNA);  // modifiers: PXR_RNA
    re7_Ka = 10;
  re8: PXR_PROT => $P; default*re8_k1*PXR_PROT;
    re8_k1 = 0.003;
  re9: $S_RNA => GR_RNA; default*mRNA(S_RNA, GR_GENE, re9_Ka);  // modifiers: GR_GENE
    re9_Ka = 3.2e-6;
  re10: GR_RNA => $P; default*re10_k1*GR_RNA;
    re10_k1 = 0.003;
  re11: $S_PROT => GR_PROT; default*ptotein(re11_Ka, S_PROT, GR_RNA);  // modifiers: GR_RNA
    re11_Ka = 19.98;
  re12: GR_PROT => $P; default*re12_k1*GR_PROT;
    re12_k1 = 0.001;
  re13: $S_RNA => TAT_RNA; default*mRNA(S_RNA, TAT_GENE, re13_Ka);  // modifiers: TAT_GENE
    re13_Ka = 0.000855;
  re14: TAT_RNA => $P; default*re14_k1*TAT_RNA;
    re14_k1 = 0.064;
  re15: Cort + GR_PROT -> GRprot_Cort; default*(re15_k1*Cort*GR_PROT - re15_k2*GRprot_Cort);
    re15_k1 = 60; re15_k2 = 600;
  re16: GRprot_Cort => Cort + $P; default*re16_k1*GRprot_Cort;
    re16_k1 = 0.001;
  re17: PXR_PROT + Cort -> PXRprot_Cort; default*(re17_k1*PXR_PROT*Cort - re17_k2*PXRprot_Cort);
    re17_k1 = 60; re17_k2 = 600000;
  re18: PXRprot_Cort => Cort + $P; default*re18_k1*PXRprot_Cort;
    re18_k1 = 0.0015;
  re19: Cort => $Cort_degr; default*LigandDegrOld(CYP_PROT, re19_Vm, Cort, re19_Kms1, Ligand2, re19_Kms2, DEX, re19_Kms3);  // modifiers: CYP_PROT, Ligand2, DEX
    re19_Vm = 0.083; re19_Kms1 = 15000; re19_Kms2 = 15000; re19_Kms3 = 23000;
  re20: CYP_GENE + PXRprot_Cort -> CYPgene_PXRprot_Cort; default*(GeneProteinBinding_diff_limited*CYP_GENE*PXRprot_Cort - cypGene_PXRprotein*CYPgene_PXRprot_Cort);
  re21: $S_RNA => CYP_RNA; default*mRNA(S_RNA, CYPgene_PXRprot_Cort, cypMrna_synt);  // modifiers: CYPgene_PXRprot_Cort
  re22: PXR_GENE + GRprot_Cort -> PXRgene_GRprot_Cort; default*(GeneProteinBinding_diff_limited*PXR_GENE*GRprot_Cort - PXRGene_GRprotein*PXRgene_GRprot_Cort);
  re23: $S_RNA => PXR_RNA; default*mRNA(S_RNA, PXRgene_GRprot_Cort, pxrMrna_synt);  // modifiers: PXRgene_GRprot_Cort
  re24: GR_GENE + GRprot_Cort -> GRgene_GRprot_Cort; default*(GeneProteinBinding_diff_limited*GR_GENE*GRprot_Cort - GRGene_GRprotein*GRgene_GRprot_Cort);
  re25: $S_RNA => GR_RNA; default*mRNA(S_RNA, GRgene_GRprot_Cort, grMrna_synt);  // modifiers: GRgene_GRprot_Cort
  re26: TAT_GENE + GRprot_Cort -> TATgene_GRprot_Cort; default*(GeneProteinBinding_diff_limited*TAT_GENE*GRprot_Cort - TATGene_GRprotein*TATgene_GRprot_Cort);
  re27: $S_RNA => TAT_RNA; default*mRNA(S_RNA, TATgene_GRprot_Cort, tatMrna_synt);  // modifiers: TATgene_GRprot_Cort
  re42: $Cortisone -> Cort; default*(re42_k1*Cortisone - re42_k2*Cort);
    re42_k1 = 0.016; re42_k2 = 0.016;
  re44: TAT_PROT => $P; default*re44_k1*TAT_PROT;
    re44_k1 = 0.012;
  re43: $S_PROT => TAT_PROT; default*ptotein(re43_Ka, S_PROT, TAT_RNA);  // modifiers: TAT_RNA
    re43_Ka = 0.5;
  cortisolTransport: CortOUT -> Cort; cortisolTransport_k1*CortOUT - cortisolTransport_k2*Cort;
    cortisolTransport_k1 = 1000; cortisolTransport_k2 = 1000;
  L2_PXR_binding: PXR_PROT + Ligand2 -> PXRprot_Ligand2; default*(L2_PXR_binding_k1*PXR_PROT*Ligand2 - L2_PXR_binding_k2*PXRprot_Ligand2);
    L2_PXR_binding_k1 = 60; L2_PXR_binding_k2 = 600000;
  L2_PXR_deg: PXRprot_Ligand2 => Ligand2 + $P; default*L2_PXR_deg_k1*PXRprot_Ligand2;
    L2_PXR_deg_k1 = 0.0015;
  CYPmRNA_synt_PXR_L2: $S_RNA => CYP_RNA; default*mRNA(S_RNA, CYPgene_PXRprot_Ligand2, cypMrna_synt);  // modifiers: CYPgene_PXRprot_Ligand2
  CYPmRNA_PXR_L2_binding: CYP_GENE + PXRprot_Ligand2 -> CYPgene_PXRprot_Ligand2; default*(GeneProteinBinding_diff_limited*CYP_GENE*PXRprot_Ligand2 - cypGene_PXRprotein*CYPgene_PXRprot_Ligand2);
  re28: GR_PROT + DEX -> GRprot_DEX; default*(re28_k1*GR_PROT*DEX - re28_k2*GRprot_DEX);
    re28_k1 = 60; re28_k2 = 60;
  re29: GRprot_DEX => $P + DEX; default*re29_k1*GRprot_DEX;
    re29_k1 = 0.001;
  re30: PXR_PROT + DEX -> PXRprot_DEX; default*(re30_k1*PXR_PROT*DEX - re30_k2*PXRprot_DEX);
    re30_k1 = 60; re30_k2 = 60000;
  re31: PXRprot_DEX => DEX + $P; default*re31_k1*PXRprot_DEX;
    re31_k1 = 0.0015;
  re32: DEX => $DEX_degr; default*LigandDegrOld(CYP_PROT, re32_Vm, DEX, re32_Kms1, Ligand2, re32_Kms2, Cort, re32_Kms3);  // modifiers: CYP_PROT, Ligand2, Cort
    re32_Vm = 0.00425; re32_Kms1 = 23000; re32_Kms2 = 15000; re32_Kms3 = 15000;
  re33: CYP_GENE + PXRprot_DEX -> CYPgene_PXRprot_DEX; default*(GeneProteinBinding_diff_limited*CYP_GENE*PXRprot_DEX - cypGene_PXRprotein*CYPgene_PXRprot_DEX);
  re34: $S_RNA => CYP_RNA; default*mRNA(S_RNA, CYPgene_PXRprot_DEX, cypMrna_synt);  // modifiers: CYPgene_PXRprot_DEX
  re35: GRprot_DEX + PXR_GENE -> PXRgene_GRprot_DEX; default*(GeneProteinBinding_diff_limited*GRprot_DEX*PXR_GENE - PXRGene_GRprotein*PXRgene_GRprot_DEX);
  re36: $S_RNA => PXR_RNA; default*mRNA(S_RNA, PXRgene_GRprot_DEX, pxrMrna_synt);  // modifiers: PXRgene_GRprot_DEX
  re37: GRprot_DEX + GR_GENE -> GRgene_GRprot_DEX; default*(GeneProteinBinding_diff_limited*GRprot_DEX*GR_GENE - GRGene_GRprotein*GRgene_GRprot_DEX);
  re38: $S_RNA => GR_RNA; default*mRNA(S_RNA, GRgene_GRprot_DEX, grMrna_synt);  // modifiers: GRgene_GRprot_DEX
  re39: GRprot_DEX + TAT_GENE -> TATgene_GRprot_DEX; default*(GeneProteinBinding_diff_limited*GRprot_DEX*TAT_GENE - TATGene_GRprotein*TATgene_GRprot_DEX);
  re40: $S_RNA => TAT_RNA; default*mRNA(S_RNA, TATgene_GRprot_DEX, tatMrna_synt);  // modifiers: TATgene_GRprot_DEX
  re41: $DEXout -> DEX; re41_k1*DEXout - re41_k2*DEX;
    re41_k1 = 100; re41_k2 = 100;
  Cortisol_CBG: CortOUT + CBG -> CBG_CortOUT; blood*(Cortisol_CBG_k1*CortOUT*CBG - Cortisol_CBG_k2*CBG_CortOUT);
    Cortisol_CBG_k1 = 60; Cortisol_CBG_k2 = 270;
  Cort_Alb: Alb + CortOUT -> Alb_CortOUT; blood*(Cort_Alb_k1*Alb*CortOUT - Cort_Alb_k2*Alb_CortOUT);
    Cort_Alb_k1 = 60; Cort_Alb_k2 = 900000;
  cort_distribution: $CortAdded => CortOUT; blood*cort_distribution_k1*CortAdded;
    cort_distribution_k1 = 1000;

  // Unit definitions:
  unit time = 60 second;
  unit substance = 1e-9 mole;
  unit volume = litre;
  unit area = metre^2;
end
