// SBML level 2 version 4
// This model was downloaded from BioModels Database
// http://www.ebi.ac.uk/biomodels/
// dcterms:bibliographicCitation: http://identifiers.org/pubmed/22051045
// dcterms:bibliographicCitation: The regulation of inhibitory Smads promotes bone morphometric protein signaling. http://identifiers.org/pubmed/11483516
// dcterms:bibliographicCitation: http://identifiers.org/pubmed/17895977
// dcterms:bibliographicCitation: http://identifiers.org/pubmed/19254534
// dcterms:bibliographicCitation: http://identifiers.org/pubmed/18706811
// dcterms:bibliographicCitation: http://identifiers.org/pubmed/18443295
// dcterms:bibliographicCitation: http://identifiers.org/pubmed/17186703
// dcterms:bibliographicCitation: How the Smads regulate transcription. http://identifiers.org/pubmed/PMID: 18061509
// dcterms:bibliographicCitation: How the Smads regulate transcription. http://identifiers.org/pubmed/18061509
// dcterms:bibliographicCitation: Smad transcription factors and translation. http://identifiers.org/doi/10.1101/gad.1350705
// dcterms:bibliographicCitation: The high-affinity binding of TGF-beta to the type II TGF-beta receptor. http://identifiers.org/pubmed/PMID:12729750
// dcterms:bibliographicCitation: TGF-beta signaling mechanisms. http://identifiers.org/pubmed/12809600
// dcterms:bibliographicCitation: Smad protein shuttling between the nucleus and the cytoplasm. http://identifiers.org/doi/10.1038/cr.2008.325
// dcterms:bibliographicCitation: Smad protein shuttling between the nucleus and the cytoplasm. http://identifiers.org/doi/ 10.1038/cr.2008.325
// dcterms:bibliographicCitation: Smad dephosphorylation and nuclear export are coupled during TGF-beta signaling. http://identifiers.org/doi/10.1007/978-1-60761-738-9_7
// dcterms:bibliographicCitation: The formation of Smad transcriptional complexes is affected by mono-ubiquitinated Smad4. http://identifiers.org/doi/10.1016/j.bbrc.2008.08.143

function Function_for_r25__1(Smad_P_CoSmad_N, h, k14, k15)
  k14*Smad_P_CoSmad_N^h/(Smad_P_CoSmad_N^h + k15^h);
end
Function_for_r25__1 is "Function for r25 [1]";

function Function_for_r16__1(Smad_P_Smad_P, k12, k8)
  k12*k8*Smad_P_Smad_P;
end
Function_for_r16__1 is "Function for r16 [1]";

function Function_for_r28__1(I_Smad_mRNA2, k18)
  k18*I_Smad_mRNA2;
end
Function_for_r28__1 is "Function for r28 [1]";

function Function_for_r7__1(k7, Smad, TGFb_TGFbR_P)
  k7*Smad*TGFb_TGFbR_P;
end
Function_for_r7__1 is "Function for r7 [1]";

model Celli_re2011___Plasticity_of_TGF___Signalling()
  // Cellière2011 - Plasticity of TGF-β Signalling
  // Transforming growth factor beta (TGF-β) signalling has been implicated as an important regulator of almost all major cell behaviours, including proliferation, differentiation, cell death, and motility. It remains unclear that how the TGF-β signalling pathway accomplishes the flexibility in its responses. What and how many parameters have to be altered for cells to respond differently to perform complex tasks? This canonical response has been explored in this model, by considering the core signalling architecture of TGF-β pathway.
  // This model is described in the article:
  // Plasticity of TGF-β signaling
  // Cellière G, Fengos G, Hervé M, Iber D.
  // BMC Syst Biol. 2011 Nov 3;5:184.
  // Abstract:
  // The family of TGF-β ligands is large and its members are involved in many different signaling processes. These signaling processes strongly differ in type with TGF-β ligands eliciting both sustained or transient responses. Members of the TGF-β family can also act as morphogen and cellular responses would then be expected to provide a direct read-out of the extracellular ligand concentration. A number of different models have been proposed to reconcile these different behaviours. We were interested to define the set of minimal modifications that are required to change the type of signal processing in the TGF-β signaling network. RESULTS: To define the key aspects for signaling plasticity we focused on the core of the TGF-β signaling network. With the help of a parameter screen we identified ranges of kinetic parameters and protein concentrations that give rise to transient, sustained, or oscillatory responses to constant stimuli, as well as those parameter ranges that enable a proportional response to time-varying ligand concentrations (as expected in the read-out of morphogens). A combination of a strong negative feedback and fast shuttling to the nucleus biases signaling to a transient rather than a sustained response, while oscillations were obtained if ligand binding to the receptor is weak and the turn-over of the I-Smad is fast. A proportional read-out required inefficient receptor activation in addition to a low affinity of receptor-ligand binding. We find that targeted modification of single parameters suffices to alter the response type. The intensity of a constant signal (i.e. the ligand concentration), on the other hand, affected only the strength but not the type of the response. CONCLUSIONS: The architecture of the TGF-β pathway enables the observed signaling plasticity. The observed range of signaling outputs to TGF-β ligand in different cell types and under different conditions can be explained with differences in cellular protein concentrations and with changes in effective rate constants due to cross-talk with other signaling pathways. It will be interesting to uncover the exact cellular differences as well as the details of the cross-talks in future work.
  // This model is hosted on BioModels Database and identified by: MODEL1208280000 .
  // To cite BioModels Database, please use: BioModels Database: An enhanced, curated and annotated resource for published quantitative kinetic models. PMID: 20587024 .
  // To the extent possible under law, all copyright and related or neighbouring rights to this encoded model have been dedicated to the public domain worldwide. Please refer to [CC0 Public Domain Dedication>http://creativecommons.org/publicdomain/zero/1.0/] for more information.
  // biomodels.db:MODEL1208280000
  // biomodels.db:BIOMD0000000600
  // isDescribedBy pubmed:22051045
  // isVersionOf GO:0007179
  // isDescribedBy pubmed:22051045

  // Compartments:
  // Defined by provided Gene Ontology annotation.
  compartment c = 2.3; c is "cytoplasm";  // GO:0005737
  // Gene Ontology GO:0005634 encompasses the term information for the nucleus compartment of the cell.
  compartment n = 1; n is "nucleus";  // GO:0005634
  // Defined by provided Gene Ontology annotation.
  compartment extracellular = 1;  // GO:0005576

  // Species:
  // Authors specified the receptor in the model is TGF-Beta type 1 receptor.
  species TGFbR in c = 1010;  // isVersionOf interpro:IPR000333
  // A complex of a ligand withing the TGF-Beta family and TGF-Beta type 1 receptor.
  // The authors did not specify the exact ligand that they wanted in their model and only refered to it as TGF-Beta. They do specify that the receptor is type 1.
  species TGFb_TGFbR in c = 0;  // hasPart interpro:IPR000333 interpro:IPR016319
  // A complex of a ligand withing the TGF-Beta family and TGF-Beta type 1 receptor.
  // Receptor is phosphorylated.
  // The authors did not specify the exact ligand that they wanted in their model and only refered to it as TGF-Beta. They do specify that the receptor is type 1.
  species TGFb_TGFbR_P in c = 0;  // hasPart interpro:IPR000333 interpro:IPR016319
  // This complex consists of an inhibitory Smad with a SMAD domain, a TGF-beta ligand and a phosphorylated TGF-beta receptor.
  species I_Smad_TGFb_TGFbR_P in c = 0;  // hasPart interpro:IPR017855 interpro:IPR016319 interpro:IPR000333
  // InterPro annotation gives details on and source information for general Smads (including R-Smad).
  // GeneOntology GO:0070412 reference outlines terms associated with R-Smad binding, which is the major element associated with this reaction.
  // Gene Ontology GO:0010862 reference outlines terms associated with SMAD protein phosphorylation, a critical element of setting up SMAD_P elements.
  // Most annotations are generalized as the model details general TGFb pathway dynamics across relevant species (i.e. Homo sapiens, Drosophila, etc.)
  species Smad in c = 7000;  // isVersionOf interpro:IPR008984
  // InterPro annotation gives details on and source information for general Smads (including R-Smad and Co-Smad, as utilized in this reaction).
  // GeneOntology GO:0070412 reference outlines terms associated with R-Smad binding, which is the major element associated with this reaction.
  // Gene Ontology GO:0010862 reference outlines terms associated with SMAD protein phosphorylation, a critical element of setting up SMAD_P elements.
  // Most annotations are generalized as the model details general TGFb pathway dynamics across relevant species (i.e. Homo sapiens, Drosophila, etc.)
  species Smad_P in c = 0;  // isVersionOf interpro:IPR008984
  // Annotation provides information on the general Smad family.
  species CoSmad in c = 12000;  // isVersionOf interpro:IPR008984
  // Phosphorylated version of Smad 2 or 3 complex (either homomer or heteromer).
  // Localized to the cytoplasm.
  // The authors were interested in Smad 2 and 3, since they are involved in the TGF-Beta pathway. So this any combination of the Smads binding to form a homodimer (ex. Smad 2 dimerizing with anouther Smad 2 molecule) or a heterodimer of Smad 2 and Smad 3.
  species Smad_P_Smad_P in c = 0;  // isVersionOf interpro:IPR008984
  // InterPro annotation gives details on and source information for general Smads (including R-Smad and Co-Smad, as utilized in this reaction).
  // GeneOntology GO:0070412 reference outlines terms associated with R-Smad binding, which is the major element associated with this reaction.
  // Gene Ontology GO:0010862 reference outlines terms associated with SMAD protein phosphorylation, a critical element of setting up SMAD_P elements.
  // Gene Ontology GO:0070410 references outlines terms associated with Co-Smad binding, a major element in this reaction.
  // Uniprot Q13485 is a Homo sapien version of Smad4, the Smad indicated as a Co-Smad used by the model authors.
  // Most annotations are generalized as the model details general TGFb pathway dynamics across relevant species (i.e. Homo sapiens, Drosophila, etc.)
  species Smad_P_CoSmad in c = 0;  // isVersionOf interpro:IPR008984; isVersionOf uniprot:Q13485
  // Annotation provides information on the general Smad family.
  // mRNA coding for I_Smad localized to the cytoplasm.
  species I_Smad_mRNA2 in c = 0;  // isVersionOf interpro:IPR008984
  // Annotation provides information on the general Smad family.
  species I_Smad in c = 0;  // isVersionOf interpro:IPR008984
  // InterPro annotation gives details on and source information for general Smads (including R-Smad).
  // GeneOntology GO:0070412 reference outlines terms associated with R-Smad binding, which is the major element associated with this reaction.
  // Gene Ontology GO:0010862 reference outlines terms associated with SMAD protein phosphorylation, a critical element of setting up SMAD_P elements.
  // Most annotations are generalized as the model details general TGFb pathway dynamics across relevant species (i.e. Homo sapiens, Drosophila, etc.)
  species Smad_N in n = 82000;  // isVersionOf interpro:IPR008984
  // Phosphorylated version of Smad 2 or 3 complex (either homomer or heteromer).
  // Localized to the nucleus.
  // The authors were interested in Smad 2 and 3, since they are involved in the TGF-Beta pathway. So this any combination of the Smads binding to form a homodimer (ex. Smad 2 dimerizing with anouther Smad 2 molecule) or a heterodimer of Smad 2 and Smad 3.
  species Smad_P_Smad_P_N in n = 0;  // isVersionOf interpro:IPR008984
  // InterPro annotation gives details on and source information for general Smads (including R-Smad and Co-Smad, as utilized in this reaction).
  // GeneOntology GO:0070412 reference outlines terms associated with R-Smad binding, which is the major element associated with this reaction.
  // Gene Ontology GO:0010862 reference outlines terms associated with SMAD protein phosphorylation, a critical element of setting up SMAD_P elements.
  // Most annotations are generalized as the model details general TGFb pathway dynamics across relevant species (i.e. Homo sapiens, Drosophila, etc.)
  species Smad_P_N in n = 0;  // isVersionOf interpro:IPR008984; isVersionOf uniprot:Q13485
  // InterPro annotation gives details on and source information for general Smads (including R-Smad and Co-Smad, as utilized in this reaction).
  // GeneOntology GO:0070412 reference outlines terms associated with R-Smad binding, which is the major element associated with this reaction.
  // Gene Ontology GO:0010862 reference outlines terms associated with SMAD protein phosphorylation, a critical element of setting up SMAD_P elements.
  // Gene Ontology GO:0070410 references outlines terms associated with Co-Smad binding, a major element in this reaction.
  // Uniprot Q13485 is a Homo sapien version of Smad4, the Smad indicated as the Co-Smad used by the model authors.
  // Most annotations are generalized as the model details general TGFb pathway dynamics across relevant species (i.e. Homo sapiens, Drosophila, etc.)
  species Smad_P_CoSmad_N in n = 0;  // isVersionOf interpro:IPR008984; isVersionOf uniprot:Q13485
  // Annotation provides information on the general Smad family.
  // CoSmad localized to the nucleus.
  species CoSmad_N in n = 135000;  // isVersionOf interpro:IPR008984
  // Annotation provides information on the general Smad family.
  // mRNA coding for I_Smad localized to the nucleus.
  species I_Smad_mRNA1 in n = 0;  // isVersionOf interpro:IPR008984
  // TGF-Beta ligand.
  // Pulled from the paper Constraint-based modeling and kinetic analysis of the Smad dependent TGF-beta signaling pathway.
  // Deviated from published value.
  species $TGFb in extracellular = 460;  // isVersionOf interpro:P36897

  // Parameters:
  // Assigned the range 1 to 4 by the authors.
  // No data from previous literature, values were estimated.
  h = 2.06;
  // Assigned the range 10e-5 to 10e-2 by the authors.
  // Data obtained from provided literature.
  k1 = 0.00446;  // isDescribedBy pubmed:18706811; isDescribedBy pubmed:19254534
  // k2 describes the rate of TGFb binding with TGFbR.
  // Assigned the range of 10E-7 to 10E-3 by the model authors. This range encompasses the reported values from the annotated references.
  k2 = 4.39e-6;  // isDescribedBy pubmed:18706811; isDescribedBy pubmed:19254534
  // k3 describes the rate of phosphorylation of TGFb:TGFbR.
  // Assigned the range of 10E-3 to 1 by the model authors as there were no previously reported parameter values.
  k3 = 0.324;
  // k4 describes the rate of dephosphorylation of TGFb:TGFbR.
  // Assigned the range of 10E-3 to 1 by the model authors as there were no previously reported parameter values.
  k4 = 0.00192;
  // Assigned the range 10e-7 to 10e-5 by the authors.
  // Data obtained from provided literature.
  k7 = 9.35e-6;  // isDescribedBy pubmed:18443295; isDescribedBy pubmed:19254534
  // Rate of nuclear import.
  // Pulled from the paper Mathematical modeling identifies Smad nucleocytoplasmic shuttling as a dynamic signal-interpreting system.
  // Pulled from the paper Quantitative modeling and analysis of the transforming growth factor beta signaling pathway.
  // Pulled from the paper Systems theory of Smad signalling.
  k8 = 0.0104;  // isDescribedBy pubmed:18443295; isDescribedBy pubmed:17186703; isDescribedBy pubmed:19254534
  // Rate of nuclear export.
  // Pulled from the paper Mathematical modeling identifies Smad nucleocytoplasmic shuttling as a dynamic signal-interpreting system.
  // Pulled from the paper Quantitative modeling and analysis of the transforming growth factor beta signaling pathway.
  // Pulled from the paper Systems theory of Smad signalling.
  k9 = 0.00075;  // isDescribedBy pubmed:18443295; isDescribedBy pubmed:19254534; isDescribedBy pubmed:17186703
  // Assigned the range 10e-8 to 10e-4 by the authors.
  // Data obtained from provided literature.
  k10 = 5.12e-8;  // isDescribedBy pubmed:17186703; isDescribedBy pubmed:18443295; isDescribedBy pubmed:19254534
  // Assigned the range 10e-4 to 1 by the authors.
  // Data obtained from provided literature.
  k11 = 0.00923;  // isDescribedBy pubmed:19254534; isDescribedBy pubmed:17186703; isDescribedBy pubmed:18443295
  // Assigned the range 10e-2 to 10 by the authors.
  // Data obtained from provided literature.
  k12 = 0.0513;  // isDescribedBy pubmed:18443295
  // Assigned the range 10e-3 to 10e-1 by the authors.
  // Data obtained from provided literature.
  k13 = 0.00164;  // isDescribedBy pubmed:19254534
  // k5 describes the rate at which TGFb:TGFbR_P associates into a TGFb:TGFbR:I-Smad complex.
  // Assigned the range of 10E-4 to 1 by the model authors as there were no previously reported parameter values.
  k5 = 0.000549;
  // k6 describes the rate of TGFb:TGFbR dissociation from its complex with I-Smad.
  // Assigned the range of 10E-6 to 1 by the model authors as there were no previously reported parameter values.
  k6 = 1.29e-5;
  // Nuclear Smad/Co-Smad complexes trigger transcription of I-Smad mRNA. The I-Smad expression rate was varied over 5 orders of magnitude by the authors to determine the appropriate value for the model. Annotations are for the regulation of gene expression, the Smad complex which binds to chromatin and the SMAD domain, which the I-Smad mRNA codes for.
  k14 = 0.038;  // encodes interpro:IPR008984; hasPart GO:0071141; isVersionOf GO:0010468; isDescribedBy pubmed:18061509
  // k15 describes the phosphorylated Smad/Co-Smad complex binding to chromatin and facilitating gene transcription, particularly the transcription of I-Smad. The I-Smad expression rate was varied over 5 orders of magnitude by the authors to determine the appropriate value for the model. Annotations are for the regulation of gene expression, the Smad complex which binds to chromatin and the SMAD domain, which the I-Smad mRNA codes for.
  k15 = 28.52;  // hasPart GO:0071141; isPartOf interpro:IPR008984; isVersionOf GO:0010468; isDescribedBy pubmed:18061509
  // k16 describes the shuttling of inhibitory Smad mRNA from the nucleus to the cytoplasm. Annotations are for nuclear export and for the SMAD domain, which is encoded by the I-Smad mRNA.
  k16 = 0.0214;  // encodes interpro:IPR008984; isVersionOf GO:0051168; isDescribedBy doi:10.1101/1350705
  // k17 describes the degradation of inhibitory Smad mRNA. Annotations are for the SMAD domain, which is encoded by the I-Smad mRNA, and for an mRNA catabolic process.
  k17 = 8.05e-5;  // encodes interpro:IPR008984; isVersionOf GO:0006402; isDescribedBy doi:10.1101/gad.1350705
  // k18 describes the translation of inhibitory Smad mRNA, a component of the TGF-beta signaling pathway. This is annotated with the SMAD domain.
  k18 = 0.0434;  // encodes interpro:IPR008984; isVersionOf GO:0006412; isDescribedBy doi:10.1101/gad.1350705
  // k19 describes the rate of degradation of I-Smad in the cytoplasm.
  // Assigned the range of 10E-5 to 10E-1 by the model authors as there were no previously reported parameter values.
  k19 = 0.000412;

  // Reactions:
  // This reaction represents dissociation of the ligand TGF-beta from the TGF-beta receptor.
  r1: TGFb_TGFbR => TGFbR; c*k1*TGFb_TGFbR;  // hasPart interpro:IPR000333; hasPart interpro:IPR016319; GO:0043241
  // TGF-beta binds to the TGF-beta receptor. Annotations are for TGF-beta receptor binding, the TGF-beta family and the TGF-beta receptor family.
  r2: TGFbR + $TGFb => TGFb_TGFbR; k2*TGFbR*TGFb;  // hasPart interpro:IPR016319; hasPart interpro:IPR000333; GO:0005160; isDescribedBy PMID:12729750
  // Phosphorylation of TGF-Beta type 1 receptor bound to TGF-Beta by protein serine/threonine kinase activity.
  r3: TGFb_TGFbR => TGFb_TGFbR_P; c*k3*TGFb_TGFbR;  // hasPart interpro:IPR000333; hasPart interpro:IPR016319; isVersionOf GO:0004674
  // Dephosphorylation of TGF-Beta type 1 receptor bound to TGF-Beta.
  r4: TGFb_TGFbR_P => TGFb_TGFbR; c*k4*TGFb_TGFbR_P;  // hasVersion interpro:IPR016319; hasVersion interpro:IPR000333; isVersionOf GO:0016311
  // I-Smad sequestering and dephosphorylating TGF-Beta type 1 receptor.
  r5: TGFb_TGFbR_P + I_Smad => I_Smad_TGFb_TGFbR_P; c*k5*TGFb_TGFbR_P*I_Smad;  // hasPart interpro:IPR000333; hasPart interpro:IPR008984; hasPart interpro:IPR016319; hasVersion GO:0070411
  // I-Smad and TGF-Beta type 1 receptor dissociate from each other.
  r6: I_Smad_TGFb_TGFbR_P => TGFb_TGFbR + I_Smad; c*k6*I_Smad_TGFb_TGFbR_P;  // hasPart interpro:IPR000333; hasPart interpro:IPR008984; hasPart interpro:IPR016319; isVersionOf GO:0043241
  // Phosphorylation of Smad 2 or Smad 3.
  r7: Smad => Smad_P; c*Function_for_r7__1(k7, Smad, TGFb_TGFbR_P);  // modifiers: TGFb_TGFbR_P; hasPart interpro:IPR000333; hasPart interpro:IPR008984; hasPart interpro:IPR016319; isVersionOf GO:0060389
  // Unphosphorylated Smad 2 or Smad 3 import into the nucleus.
  r8: Smad => Smad_N; k8*Smad;  // hasPart interpro:IPR008984; isVersionOf GO:0007184
  // Unphosphorylated Smad 2 or Smad 3 export from the nucleus.
  r9: Smad_N => Smad; k9*Smad_N;  // hasPart interpro:IPR008984; isVersionOf GO:0051168
  // Smad_P represents phosphorylated Smad.
  // Smad_P_Smad_P represents a homodimer of phosporylated Smads.
  // This reaction represents homodimerization of phosphorylated Smads.
  r10: 2 Smad_P => Smad_P_Smad_P; c*k10*Smad_P^2;  // hasPart interpro:IPR008984; GO:0042803
  // Smad_P represents phosphorylated Smad.
  // Smad_P_Smad_P represents a homodimer of phosporylated Smads.
  // This reaction represents dissociation of the homodimer Smad_P_Smad_P into two phosphorylated Smads.
  r11: Smad_P_Smad_P => 2 Smad_P; c*k11*Smad_P_Smad_P;  // hasPart interpro:IPR008984; isPartOf GO:0043241
  // Smad_P represents phosphorylated Smad.
  // Smad_P_CoSmad represents the heterodimer containing Smad_P and CoSmad.
  // This reaction represents the binding of Smad_P and CoSmad to form the heterodimer Smad_P_CoSmad.
  r12: Smad_P + CoSmad => Smad_P_CoSmad; c*k10*Smad_P*CoSmad;  // hasPart interpro:IPR008984; GO:0070410; GO:0070412; GO:0042803
  // Smad_P represents phosphorylated Smad.
  // Smad_P_CoSmad represents the heterodimer containing Smad_P and CoSmad.
  // This reaction represents the dissociation of the Smad_P_CoSmad heterodimer into Smad_P and CoSmad.
  r13: Smad_P_CoSmad => Smad_P + CoSmad; c*k11*Smad_P_CoSmad;  // hasPart interpro:IPR008984; GO:0043241
  // CoSmad_N represents CoSmad located in the nucleus.
  // This reaction represents the transport of CoSmad to the nucleus from the cytoplasm.
  r14: CoSmad => CoSmad_N; k8*CoSmad;  // hasPart interpro:IPR008984; GO:0007184
  // CoSmad_N represents CoSmad located in the nucleus.
  // This reaction represents the transport of CoSmad from the nucleus to the cytoplasm.
  r15: CoSmad_N => CoSmad; k9*CoSmad_N;  // hasPart interpro:IPR008984; GO:0051168
  // The phosphorylated Smad complex is shuttled into the nucleus. GO annotation corresponds to Smad protein import into nucleus.
  r16: Smad_P_Smad_P => Smad_P_Smad_P_N; Function_for_r16__1(Smad_P_Smad_P, k12, k8);  // hasPart interpro:IPR008984; isVersionOf GO:0007184; isDescribedBy pubmed:12809600; isDescribedBy doi:10.1038/cr.2008.325
  // Phosphorylated Smad is shuttled into the nucleus. Annotations correspond to the SMAD domain (contained within the phosphorylated Smad) and the activity of nuclear shuttling.
  r17: Smad_P => Smad_P_N; k8*Smad_P;  // hasPart interpro:IPR008984; isVersionOf GO:0007184; isDescribedBy doi:10.1038/cr.2008.325
  // Phosphorylated Smad is shuttled from the nucleus and the cytoplasm. Annotations are for the SMAD domain present within the phosphorylated Smad and nuclear export.
  r18: Smad_P_N => Smad_P; k9*Smad_P_N;  // hasPart interpro:IPR008984; isVersionOf GO:0051168; isDescribedBy doi:10.1038/cr.2008.325
  // The phosphorylated Smad/Co-Smad complex is shuttled into the nucleus. Annotations are for the SMAD domain and for Smad protein import into the nucleus.
  r19: Smad_P_CoSmad => Smad_P_CoSmad_N; Function_for_r16__1(Smad_P_CoSmad, k12, k8);  // hasPart interpro:IPR008984; isVersionOf GO:0007184; isDescribedBy doi:10.1038/cr.2008.325
  // Nuclear Smad is dephosphorylated. Annotations are for the SMAD domain and for protein dephosphorylation.
  r20: Smad_P_N => Smad_N; n*k13*Smad_P_N;  // hasPart interpro:IPR008984; isVersionOf GO:0006470; isDescribedBy doi:10.1007/978-1-60761-738-9_7
  // Phosphorylated nuclear Smads form a dimer. Annotations are for Smad protein complex assembly and for the SMAD domain contained in both Smad proteins.
  r21: 2 Smad_P_N => Smad_P_Smad_P_N; n*k10*Smad_P_N^2;  // hasPart interpro:IPR008984; isVersionOf GO:0007183; isDescribedBy doi:10.1016/j.bbrc.2008.08.143
  // Nuclear phosphorylated Smad homodimer dissociated into nuclear phosphorylated Smad monomers.
  // InterPro annotation gives details on and source information for general Smads (including R-Smad and Co-Smad, as utilized in this reaction).
  // Gene Ontology GO:0043241 reference outlines terms associated with protein complex disassembly.
  // Gene Ontology GO:0010862 reference outlines terms associated with SMAD protein phosphorylation, a critical element of setting up SMAD_P elements.
  // This reaction occurs in the nucleus.
  // All annotations are generalized as the model details general TGFb pathway dynamics across relevant species (i.e. Homo sapiens, Drosophila, etc.)
  r22: Smad_P_Smad_P_N => 2 Smad_P_N; n*k11*Smad_P_Smad_P_N;  // hasPart GO:0010862; hasVersion interpro:IPR008984; isPartOf GO:0043241
  // Nuclear phosphorylated Smad and Co-Smad heterodimerize.
  // InterPro annotation gives details on and source information for general Smads (including R-Smad and Co-Smad, as utilized in this reaction).
  // GeneOntology GO:0070412 reference outlines terms associated with R-Smad binding, which is the major element associated with this reaction.
  // Gene Ontology GO:0010862 reference outlines terms associated with SMAD protein phosphorylation, a critical element of setting up SMAD_P elements.
  // Gene Ontology GO:0070410 references outlines terms associated with Co-Smad binding, a major element in this reaction.
  // Uniprot Q13485 is a Homo sapien version of Smad4, the Smad indicated as a Co-Smad by the model authors.
  // This reaction occurs in the nucleus.
  // Most annotations are generalized as the model details general TGFb pathway dynamics across relevant species (i.e. Homo sapiens, Drosophila, etc.)
  r23: Smad_P_N + CoSmad_N => Smad_P_CoSmad_N; n*k10*Smad_P_N*CoSmad_N;  // hasVersion interpro:IPR008984; hasVersion uniprot.isoform:Q13485; GO:0070410; GO:0010862
  // Nuclear phosphorylated Smad and Co-Smad disocciate into phosphorylated Smad and Co-Smad monomers.
  // InterPro annotation gives details on and source information for general Smads (including R-Smad and Co-Smad, as utilized in this reaction).
  // Gene Ontology GO:0043241 reference outlines terms associated with protein complex disassembly.
  // Gene Ontology GO:0010862 reference outlines terms associated with SMAD protein phosphorylation, a critical element of setting up SMAD_P elements.
  // Gene Ontology GO:0070410 references outlines terms associated with Co-Smad binding, a major element in this reaction (though unbinding is focus of reaction).
  // Uniprot Q13485 is a Homo sapien version of Smad4, the Smad indicated as a Co-Smad by the model authors.
  // This reaction occurs in nucleus.
  // All annotations are generalized as the model details general TGFb pathway dynamics across relevant species (i.e. Homo sapiens, Drosophila, etc.).
  r24: Smad_P_CoSmad_N => Smad_P_N + CoSmad_N; n*k11*Smad_P_CoSmad_N;  // hasVersion uniprot.isoform:Q13485; hasVersion interpro:IPR008984; GO:0070410; GO:0010862
  // I-Smad mRNA is created in the nucleus, a process which is inhibited by the nuclear phosphorylated Smad and Co-Smad heterodimer.
  // InterPro annotation gives details on and source information for general Smads (including I-Smads, as encoded for by the product of this reaction).
  // This reaction occurs in the nucleus.
  // All annotations are generalized as the model details general TGFb pathway dynamics across relevant species (i.e. Homo sapiens, Drosophila, etc.)
  r25: => I_Smad_mRNA1; n*Function_for_r25__1(Smad_P_CoSmad_N, h, k14, k15);  // modifiers: Smad_P_CoSmad_N; encodes interpro:IPR008984
  // Nuclear I-Smad mRNA is shuttled to the cytoplasm.
  // InterPro annotation gives details on and source information for general Smads (including I-Smads, as encoded for by the product of this reaction).
  // Gene Ontology GO:0006913 gives terms associated with nuclear export; this reaction involves, specifically, nucleus to cytoplasm transport.
  // All annotations are generalized as the model details general TGFb pathway dynamics across relevant species (i.e. Homo sapiens, Drosophila, etc.)
  r26: I_Smad_mRNA1 => I_Smad_mRNA2; k16*I_Smad_mRNA1;  // encodes interpro:IPR008984; GO:0051168
  // Cytoplasmic I-Smad mRNA is degraded.
  // InterPro annotation gives details on and source information for general Smads (including I-Smads, as encoded for by the reactant of this reaction if not degraded as shown).
  // Gene Ontology GO:0006401 gives the terms associated with RNA catabolic processes; this reaction specifically utilizes RNA breakdown/decay/degradation in the cytoplasm.
  // This reaction occurs in the cytoplasm.
  // All annotations are generalized as the model details general TGFb pathway dynamics across relevant species (i.e. Homo sapiens, Drosophila, etc.)
  r27: I_Smad_mRNA2 => ; c*k17*I_Smad_mRNA2;  // encodes interpro:IPR008984; GO:0006401
  // I-Smad is generated, a process which is limited by cytoplasmi I-Smad mRNA.
  // InterPro annotation gives details on and source information for general Smads (including I-Smads, which are given rise to in this reaction).
  // This reaction occurs in the cytoplasm.
  // All annotations are generalized as the model details general TGFb pathway dynamics across relevant species (i.e. Homo sapiens, Drosophila, etc.)
  r28: => I_Smad; c*Function_for_r28__1(I_Smad_mRNA2, k18);  // modifiers: I_Smad_mRNA2; hasVersion interpro:IPR008984
  // Degradation of I-Smad.
  r29: I_Smad => ; c*k19*I_Smad;  // hasPart interpro:IPR008984; isVersionOf GO:0030163

  // Unit definitions:
  unit substance = 1e-12 mole;
end
