// SBML level 3 version 2

model BIOMD0000000019()
  // Schoeberl2002 - EGF MAPK
  // Computational model that offers an integrated quantitative, dynamic, and topological representation of intracellular signal networks, based on known components of epidermal growth factor (EGF) receptor signal pathways.
  // The initial model was constructed by Ken Lau from the MATLAB source code.
  // This model is described in the article:
  // Computational modeling of the dynamics of the MAP kinase cascade activated by surface and internalized EGF receptors.
  // Schoeberl B, Eichler-Jonsson C, Gilles ED, Müller G
  // Nat. Biotechnol. 2002 Apr; 20(4): 370-375
  // Abstract:
  // We present a computational model that offers an integrated quantitative, dynamic, and topological representation of intracellular signal networks, based on known components of epidermal growth factor (EGF) receptor signal pathways. The model provides insight into signal-response relationships between the binding of EGF to its receptor at the cell surface and the activation of downstream proteins in the signaling cascade. It shows that EGF-induced responses are remarkably stable over a 100-fold range of ligand concentration and that the critical parameter in determining signal efficacy is the initial velocity of receptor activation. The predictions of the model agree well with experimental analysis of the effect of EGF on two downstream responses, phosphorylation of ERK-1/2 and expression of the target gene, c-fos.
  // This model does not exactly reproduce the results given in the original publication. It has, though, the same reaction graph and gives very similar time courses for the conditions depicted in the article.
  // Several corrections were applied to the parameters described in the paper's supplementary materials. Some parameter names were replaced by the corresponding identical ones: k(r)26 by k(r)18, k(r)27 by k(r)19, k(r)30 by k(r)20, k(r)38 by k(r)24, k(r)39 by k(r)37, k(r)46 by k(r)44, k51 by k49, k(r)54 by k(r)52 and k62 by k62. In particular the parameter values described in the column "remark" of supplementary table 1 override the values explicitely written in the numerical columns:
  // name in suppl. value used in model value used remarks
  // kr16 0.055 0.275
  // k30 7.9e6 2.1e6 as k20
  // kr30 0.3 0.4 as kr24
  // k38 3e7 1e7 as k20
  // kr38 0.055 0.55 as kr24
  // k52 1.1e5 5.34e7
  // k5 was used for v116, v119, v122 and v125 in addition of v107, v110 and v113 as listed in the legend of supplementary figure 2. k5 is calculated using th eformula from the matlab file not given in the supplements.
  // All rate constants were rescaled to minutes (k[min] = 60*k[sec]) and all second order rate constants additionally to molecules/cell with a cell volume of 1 picolitre (k[molecs/cell] = k[M]/(Vc*Na), with Vc=1e-12 l and Na = 6e23).
  // The association constant of internalized EGF was rescaled to molecules/endosome using an endosomal volume of 4.3 al (= 4.3*10 -18 litre).
  // The extracellular EGF concentration was converted to molecules per picolitre with a MW of 6045 Da.
  // [ng/ml] [numb/pl]
  // 50 4962
  // 0.5 49.6
  // 0.125 12.4
  // With the initial conditions given in the paper, the results could not be reproduced at all. Therefore the initial conditions used in the MATLAB file were adopted for SHC (1.01 * 10 5 instead of 1.01 * 10 6 ) and Ras_GDP. (7.2 * 10 4 instead of 1.14 * 10 7 )
  // This model is hosted on BioModels Database and identified by: BIOMD0000000019.
  // To cite BioModels Database, please use: BioModels Database: An enhanced, curated and annotated resource for published quantitative kinetic models.
  // To the extent possible under law, all copyright and related or neighbouring rights to this encoded model have been dedicated to the public domain worldwide. Please refer to CC0 Public Domain Dedication for more information.
  // biomodels.db:MODEL6617455076
  // biomodels.db:BIOMD0000000019
  // isDescribedBy pubmed:11923843
  // hasTaxon taxonomy:9606
  // isVersionOf reactome:REACT_9417.3 GO:0007173
  // hasVersion GO:0007265 GO:0000165
  // model units - substance: substance, time: time, volume: volume, area: area, length: metre, extent: substance

  // Compartments:
  compartment extracellular_volume = 1 volume;  // GO:0005615
  compartment cytoplasm = 1 volume;  // GO:0005737
  compartment endosomal_volume = 4.3e-6 volume;  // GO:0005768

  // Species:
  // 4962 molecules correspond roughly to 50 ng/ml, concentration used throughout the article (MW~6045 Da, vol=1e-12l)
  substanceOnly species $EGF in extracellular_volume = 4962;
  substanceOnly species EGFR in extracellular_volume = 50000;
  substanceOnly species EGF_EGFR in cytoplasm = 0; EGF_EGFR is "EGF-EGFR";  // isVersionOf reactome:REACT_9893; hasVersion uniprot:P01133 uniprot:P00533
  substanceOnly species x4 in cytoplasm = 0; x4 is "EGF-EGFR^2";  // isVersionOf reactome:REACT_9820; hasVersion uniprot:P01133 uniprot:P00533
  substanceOnly species x5 in cytoplasm = 0; x5 is "EGF-EGFR*^2";  // isVersionOf kegg.compound:C00562; hasVersion uniprot:P00533 uniprot:P01133
  substanceOnly species EGFRi in cytoplasm = 0;  // isVersionOf uniprot:P00533
  substanceOnly species EGF_EGFR_2_GAP_Grb2_Prot in cytoplasm = 0; EGF_EGFR_2_GAP_Grb2_Prot is "EGF-EGFR*^2-GAP-Grb2-Prot";  // hasVersion uniprot:P20936 uniprot:P62993 uniprot:P00533 uniprot:P01133
  substanceOnly species x8 in cytoplasm = 0; x8 is "EGF-EGFRi*^2";  // hasVersion uniprot:P00533 uniprot:P01133
  substanceOnly species Proti in cytoplasm = 0;  // isVersionOf GO:0030119
  substanceOnly species EGF_EGFRi in cytoplasm = 0; EGF_EGFRi is "EGF-EGFRi";  // hasVersion uniprot:P01133 uniprot:P00533
  substanceOnly species x11 in cytoplasm = 0; x11 is "EGF-EGFRi^2";
  substanceOnly species Prot in cytoplasm = 81000;
  substanceOnly species EGFideg in endosomal_volume = 0;
  substanceOnly species GAP in cytoplasm = 12000;  // isVersionOf interpro:IPR001936; isVersionOf uniprot:P20936; isDescribedBy omim:139150
  substanceOnly species EGF_EGFR_2_GAP in endosomal_volume = 0; EGF_EGFR_2_GAP is "EGF-EGFR*^2-GAP";
  substanceOnly species EGFi in cytoplasm = 0;
  substanceOnly species EGF_EGFRi_2_GAP in cytoplasm = 0; EGF_EGFRi_2_GAP is "EGF-EGFRi*^2-GAP";
  substanceOnly species EGF_EGFRi_2_GAP_Grb2 in cytoplasm = 0; EGF_EGFRi_2_GAP_Grb2 is "EGF-EGFRi*^2-GAP-Grb2";
  substanceOnly species EGF_EGFRi_2_GAP_Grb2_Sos in cytoplasm = 0; EGF_EGFRi_2_GAP_Grb2_Sos is "EGF-EGFRi*^2-GAP-Grb2-Sos";
  substanceOnly species EGF_EGFRi_2_GAP_Grb2_Sos_Ras_GDP in cytoplasm = 0; EGF_EGFRi_2_GAP_Grb2_Sos_Ras_GDP is "EGF-EGFRi*^2-GAP-Grb2-Sos-Ras-GDP";
  substanceOnly species EGF_EGFRi_2_GAP_Grb2_Sos_Ras_GTP in cytoplasm = 0; EGF_EGFRi_2_GAP_Grb2_Sos_Ras_GTP is "EGF-EGFRi*^2-GAP-Grb2-Sos-Ras-GTP";
  substanceOnly species Grb2 in cytoplasm = 11000;  // isVersionOf uniprot:P62993; isDescribedBy omim:108355
  substanceOnly species EGF_EGFR_2_GAP_Grb2 in cytoplasm = 0; EGF_EGFR_2_GAP_Grb2 is "EGF-EGFR*^2-GAP-Grb2";
  substanceOnly species Sos in cytoplasm = 26300;  // isVersionOf uniprot:Q07889; isDescribedBy omim:182530
  substanceOnly species EGF_EGFR_2_GAP_Grb2_Sos in cytoplasm = 0; EGF_EGFR_2_GAP_Grb2_Sos is "EGF-EGFR*^2-GAP-Grb2-Sos";
  substanceOnly species Ras_GDP in cytoplasm = 72000; Ras_GDP is "Ras-GDP";  // hasPart CHEBI:17552 uniprot:P01112
  substanceOnly species EGF_EGFR_2_GAP_Grb2_Sos_Ras_GDP in cytoplasm = 0; EGF_EGFR_2_GAP_Grb2_Sos_Ras_GDP is "EGF-EGFR*^2-GAP-Grb2-Sos-Ras-GDP";
  substanceOnly species x28 in cytoplasm = 0; x28 is "Ras-GTP";  // hasPart CHEBI:15996 uniprot:P01112
  substanceOnly species EGF_EGFR_2_GAP_Grb2_Sos_Ras_GTP in cytoplasm = 0; EGF_EGFR_2_GAP_Grb2_Sos_Ras_GTP is "EGF-EGFR*^2-GAP-Grb2-Sos-Ras-GTP";
  substanceOnly species Grb2_Sos in cytoplasm = 40000; Grb2_Sos is "Grb2-Sos";
  substanceOnly species x31 in cytoplasm = 101000; x31 is "Shc";  // isVersionOf uniprot:P98077; isDescribedBy omim:605217
  substanceOnly species x32 in cytoplasm = 0; x32 is "EGF-EGFR*^2-GAP-Shc";
  substanceOnly species x33 in cytoplasm = 0; x33 is "EGF-EGFR*^2-GAP-Shc*";
  substanceOnly species EGF_EGFR_2_GAP_Shc_Grb2 in cytoplasm = 0; EGF_EGFR_2_GAP_Shc_Grb2 is "EGF-EGFR*^2-GAP-Shc*-Grb2";
  substanceOnly species EGF_EGFR_2_GAP_Shc_Grb2_Sos in cytoplasm = 0; EGF_EGFR_2_GAP_Shc_Grb2_Sos is "EGF-EGFR*^2-GAP-Shc*-Grb2-Sos";
  substanceOnly species x36 in cytoplasm = 0; x36 is "EGF-EGFR*^2-GAP-Shc*-Grb2-Sos-Ras-GDP";
  substanceOnly species x37 in cytoplasm = 0; x37 is "EGF-EGFR*^2-GAP-Shc*-Grb2-Sos-Ras-GTP";
  substanceOnly species Shc_Grb2_Sos in cytoplasm = 0; Shc_Grb2_Sos is "Shc*-Grb2-Sos";
  substanceOnly species Shc_Grb2 in cytoplasm = 0; Shc_Grb2 is "Shc*-Grb2";
  substanceOnly species x40 in cytoplasm = 0; x40 is "Shc*";
  substanceOnly species x41 in cytoplasm = 40000; x41 is "Raf";  // isVersionOf uniprot:P04049; isDescribedBy omim:164760
  substanceOnly species Raf_Ras_GTP in cytoplasm = 0; Raf_Ras_GTP is "Raf-Ras-GTP";
  substanceOnly species x43 in cytoplasm = 0; x43 is "Ras-GTP*";
  substanceOnly species Phosphotase1 in cytoplasm = 40000;
  substanceOnly species x45 in cytoplasm = 0; x45 is "Raf*";
  substanceOnly species Raf_P_ase in cytoplasm = 0; Raf_P_ase is "Raf*-P'ase";
  substanceOnly species MEK in cytoplasm = 22000000;  // isVersionOf uniprot:Q02750 uniprot:A4QPA9; isDescribedBy omim:176872
  substanceOnly species MEK_Raf in cytoplasm = 0; MEK_Raf is "MEK-Raf*";
  substanceOnly species MEK_P in cytoplasm = 0; MEK_P is "MEK-P";  // isVersionOf uniprot:Q02750 uniprot:A4QPA9 kegg.compound:C00562; isDescribedBy omim:176872
  substanceOnly species MEK_P_Raf in cytoplasm = 0; MEK_P_Raf is "MEK-P-Raf*";
  substanceOnly species x51 in cytoplasm = 0; x51 is "MEK-PP";
  substanceOnly species MEK_PP_P_ase2 in cytoplasm = 0; MEK_PP_P_ase2 is "MEK-PP-P'ase2";
  substanceOnly species Phosphatase2 in cytoplasm = 40000;
  substanceOnly species MEK_P_P_ase2 in cytoplasm = 0; MEK_P_P_ase2 is "MEK-P-P'ase2";
  substanceOnly species ERK in cytoplasm = 21000000;  // isVersionOf uniprot:P28482; isDescribedBy omim:176948
  substanceOnly species ERK_MEK_PP in cytoplasm = 0; ERK_MEK_PP is "ERK-MEK-PP";
  substanceOnly species ERK_P in cytoplasm = 0; ERK_P is "ERK-P";
  substanceOnly species ERK_P_MEK_PP in cytoplasm = 0; ERK_P_MEK_PP is "ERK-P-MEK-PP";
  substanceOnly species x59 in cytoplasm = 0; x59 is "ERK-PP";
  substanceOnly species Phosphotase3 in cytoplasm = 10000000;
  substanceOnly species ERK_PP_P_ase3 in cytoplasm = 0; ERK_PP_P_ase3 is "ERK-PP-P'ase3";
  substanceOnly species ERK_P_P_ase3 in cytoplasm = 0; ERK_P_P_ase3 is "ERK-P-P'ase3";
  substanceOnly species x63 in cytoplasm = 0; x63 is "EGF-EGFRi*^2-GAP-Shc";
  substanceOnly species x64 in cytoplasm = 0; x64 is "EGF-EGFRi*^2-GAP-Shc*";
  substanceOnly species EGF_EGFRi_2_GAP_Shc_Grb2 in cytoplasm = 0; EGF_EGFRi_2_GAP_Shc_Grb2 is "EGF-EGFRi*^2-GAP-Shc*-Grb2";
  substanceOnly species EGF_EGFRi_2_GAP_Shc_Grb2_Sos in cytoplasm = 0; EGF_EGFRi_2_GAP_Shc_Grb2_Sos is "EGF-EGFRi*^2-GAP-Shc*-Grb2-Sos";
  substanceOnly species x67 in cytoplasm = 0; x67 is "EGF-EGFRi*^2-GAP-Shc*-Grb2-Sos-Ras-GDP";
  substanceOnly species x68 in cytoplasm = 0; x68 is "EGF-EGFRi*^2-GAP-Shc*-Grb2-Sos-Ras-GTP";
  substanceOnly species x69 in cytoplasm = 0; x69 is "Rasi-GTP";
  substanceOnly species Rafi_Rasi_GTP in cytoplasm = 0; Rafi_Rasi_GTP is "Rafi-Rasi-GTP";
  substanceOnly species x71 in cytoplasm = 0; x71 is "Rasi-GTP*";
  substanceOnly species Rafi in cytoplasm = 0; Rafi is "Rafi*";
  substanceOnly species Rafi_P_ase in cytoplasm = 0; Rafi_P_ase is "Rafi*-P'ase";
  substanceOnly species MEKi_Rafi in cytoplasm = 0; MEKi_Rafi is "MEKi-Rafi*";
  substanceOnly species MEKi_P in cytoplasm = 0; MEKi_P is "MEKi-P";
  substanceOnly species MEKi_P_Rafi in cytoplasm = 0; MEKi_P_Rafi is "MEKi-P-Rafi*";
  substanceOnly species MEKi_PP in cytoplasm = 0; MEKi_PP is "MEKi-PP";
  substanceOnly species MEKi_PP_P_ase2i in cytoplasm = 0; MEKi_PP_P_ase2i is "MEKi-PP-P'ase2i";
  substanceOnly species MEKi_P_P_ase2i in cytoplasm = 0; MEKi_P_P_ase2i is "MEKi-P-P'ase2i";
  substanceOnly species ERKi_MEKi_PP in cytoplasm = 0; ERKi_MEKi_PP is "ERKi-MEKi-PP";
  substanceOnly species ERKi_P in cytoplasm = 0; ERKi_P is "ERKi-P";
  substanceOnly species ERKi_P_MEKi_PP in cytoplasm = 0; ERKi_P_MEKi_PP is "ERKi-P-MEKi-PP";
  substanceOnly species ERKi_PP in cytoplasm = 0; ERKi_PP is "ERKi-PP";
  substanceOnly species ERKi_PP_P_ase3i in cytoplasm = 0; ERKi_PP_P_ase3i is "ERKi-PP-P'ase3i";
  substanceOnly species ERKi_P_P_ase3i in cytoplasm = 0; ERKi_P_P_ase3i is "ERKi-P-P'ase3i";
  substanceOnly species EGFRideg in cytoplasm = 0;
  substanceOnly species EGF_EGFRi_2deg in cytoplasm = 0; EGF_EGFRi_2deg is "EGF-EGFRi*^2deg";
  substanceOnly species EGF_EGFR_2_GAP_Grb2_Sos_Prot in cytoplasm = 0; EGF_EGFR_2_GAP_Grb2_Sos_Prot is "EGF-EGFR*^2-GAP-Grb2-Sos-Prot";
  substanceOnly species x89 in cytoplasm = 0; x89 is "EGF-EGFR*^2-GAP-Grb2-Sos-Ras-GDP-Prot";
  substanceOnly species x90 in cytoplasm = 0; x90 is "EGF-EGFR*^2-GAP-Grb2-Sos-Ras-GTP-Prot";
  substanceOnly species EGF_EGFR_2_GAP_Shc_Grb2_Prot in cytoplasm = 0; EGF_EGFR_2_GAP_Shc_Grb2_Prot is "EGF-EGFR*^2-GAP-Shc*-Grb2-Prot";
  substanceOnly species EGF_EGFR_2_GAP_Shc_Grb2_Sos_Prot in cytoplasm = 0; EGF_EGFR_2_GAP_Shc_Grb2_Sos_Prot is "EGF-EGFR*^2-GAP-Shc*-Grb2-Sos-Prot";
  substanceOnly species x93 in cytoplasm = 0; x93 is "EGF-EGFR*^2-GAP-Shc*-Grb2-Sos-Ras-GDP-Prot";
  substanceOnly species x94 in cytoplasm = 0; x94 is "EGF-EGFR*^2-GAP-Shc*-Grb2-Sos-Ras-GTP-Prot";
  substanceOnly species $Raf_act in cytoplasm; Raf_act is "t_Raf*";
  substanceOnly species $Ras_GTP in cytoplasm; Ras_GTP is "t_Ras_GTP";
  substanceOnly species $MEK_PP in cytoplasm; MEK_PP is "t_MEK_PP";
  substanceOnly species $ERK_PP in cytoplasm; ERK_PP is "t_ERK_PP";
  substanceOnly species $SHC_P_t in cytoplasm; SHC_P_t is "t_SHC_P_t";
  substanceOnly species $EGF_EGFR_act in cytoplasm; EGF_EGFR_act is "t_EGF_EGFR*";

  // Parameters:
  k1 = 0.003 pipmin;
  kr1 = 0.228 pmin;
  kr2 = 6 pmin;
  k2 = 0.001 pipmin;
  k3 = 60 pmin;
  kr3 = 0.6 pmin;
  k4 = 1.038e-5 pipmin;
  kr4 = 0.0996 pmin;
  k5 has pmin;
  k6 = 0.003 pmin;
  kr6 = 0.3 pmin;
  k7 = 0.003 pmin;
  k8 = 0.0001 pipmin;
  kr8 = 12 pmin;
  k10 = 3.25581 pipmin;
  kr10 = 0.66 pmin;
  kr11 = 6 pmin;
  k11 = 0.001 pipmin;
  kr12 = 0.6 pmin;
  k12 = 60 pmin;
  k13 = 130.2 ipmin;
  k14 = 0.0001 pipmin;
  kr14 = 12 pmin;
  k15 = 600000 pmin;
  kr16 = 16.5 pmin;
  k16 = 0.001 pipmin;
  kr17 = 3.6 pmin;
  k17 = 0.001 pipmin;
  kr18 = 78 pmin;
  k18 = 0.0015 pipmin;
  kr19 = 1e-5 pipmin;
  k19 = 30 pmin;
  kr20 = 24 pmin;
  k20 = 0.00021 pipmin;
  k21 = 1.38 pmin;
  kr21 = 2.2e-5 pipmin;
  k22 = 0.0021 pipmin;
  kr22 = 6 pmin;
  k23 = 360 pmin;
  kr23 = 36 pmin;
  k24 = 0.001 pipmin;
  kr24 = 33 pmin;
  kr25 = 1.284 pmin;
  k25 = 0.001 pipmin;
  k28 = 0.0001 pipmin;
  kr28 = 0.318 pmin;
  k29 = 60 pmin;
  kr29 = 7e-5 pipmin;
  kr32 = 2.4e-5 pipmin;
  k32 = 6 pmin;
  k33 = 12 pmin;
  kr33 = 0.0021 pipmin;
  k34 = 1.8 pmin;
  kr34 = 0.00045 pipmin;
  k35 = 0.09 pmin;
  kr35 = 0.00045 pipmin;
  Vm36 = 61200 ipmin;
  Km36 = 200000000000000 substance;
  k37 = 18 pmin;
  kr37 = 9e-5 pipmin;
  k40 = 0.003 pipmin;
  kr40 = 3.84 pmin;
  kr41 = 2.574 pmin;
  k41 = 0.003 pipmin;
  k42 = 0.0071 pipmin;
  kr42 = 12 pmin;
  k43 = 60 pmin;
  kr44 = 1.0998 pmin;
  k44 = 0.00111 pipmin;
  k45 = 210 pmin;
  k47 = 174 pmin;
  kr48 = 48 pmin;
  k48 = 0.00143 pipmin;
  k49 = 3.48 pmin;
  kr50 = 30 pmin;
  k50 = 2.5e-5 pipmin;
  k52 = 0.00534 pipmin;
  kr52 = 1.98 pmin;
  k53 = 960 pmin;
  k55 = 342 pmin;
  kr56 = 36 pmin;
  k56 = 0.00145 pipmin;
  k57 = 16.2 pmin;
  kr58 = 30 pmin;
  k58 = 0.0005 pipmin;
  k59 = 18 pmin;
  k60 = 0.04002 pmin;
  k61 = 0.01002 pmin;
  var C; C is "C_internalization";
  RT = 50000 substance; RT is "total_Receptors";

  // Assignment rules:
  Ras_GTP := Raf_Ras_GTP + x28 + Rafi_Rasi_GTP + x69;
  MEK_PP := x51 + MEKi_PP;
  ERK_PP := x59 + ERKi_PP;
  Raf_act := x45 + Raf_P_ase + MEK_Raf + MEK_P_Raf + Rafi + Rafi_P_ase + MEKi_Rafi + MEKi_P_Rafi;
  SHC_P_t := x33 + EGF_EGFR_2_GAP_Shc_Grb2 + EGF_EGFR_2_GAP_Shc_Grb2_Sos + x36 + x37 + Shc_Grb2_Sos + Shc_Grb2 + x40 + EGF_EGFR_2_GAP_Shc_Grb2_Prot + EGF_EGFR_2_GAP_Shc_Grb2_Sos_Prot + x93 + x94 + x64 + EGF_EGFRi_2_GAP_Shc_Grb2 + EGF_EGFRi_2_GAP_Shc_Grb2_Sos + x67 + x68;
  EGF_EGFR_act := x5 + EGF_EGFR_2_GAP_Grb2_Prot + EGF_EGFR_2_GAP + EGF_EGFR_2_GAP_Grb2 + EGF_EGFR_2_GAP_Grb2_Sos + EGF_EGFR_2_GAP_Grb2_Sos_Ras_GDP + EGF_EGFR_2_GAP_Grb2_Sos_Ras_GTP + x32 + x33 + EGF_EGFR_2_GAP_Shc_Grb2 + EGF_EGFR_2_GAP_Shc_Grb2_Sos + x36 + x37 + EGF_EGFR_2_GAP_Grb2_Sos_Prot + x89 + x90 + EGF_EGFR_2_GAP_Shc_Grb2_Prot + EGF_EGFR_2_GAP_Shc_Grb2_Sos_Prot + x93 + x94 + x8 + x11 + EGF_EGFRi_2_GAP + EGF_EGFRi_2_GAP_Grb2 + EGF_EGFRi_2_GAP_Grb2_Sos + EGF_EGFRi_2_GAP_Grb2_Sos_Ras_GDP + EGF_EGFRi_2_GAP_Grb2_Sos_Ras_GTP + x63 + x64 + EGF_EGFRi_2_GAP_Shc_Grb2 + EGF_EGFRi_2_GAP_Shc_Grb2_Sos + x67 + x68;
  C := RT/(kr1/(k1*EGF) + 1);
  k5 := piecewise(1.55, C < 3100, 0.2, C > 100000, C*(-1.35e-5) + 1.55);

  // Reactions:
  v1: $EGF + EGFR -> EGF_EGFR; k1*EGF*EGFR - kr1*EGF_EGFR;  // isVersionOf GO:0005154 GO:0048408; isVersionOf reactome:REACT_9481
  v2: 2 EGF_EGFR -> x4; k2*EGF_EGFR*EGF_EGFR - kr2*x4;  // isVersionOf GO:0007171 GO:0046983; isVersionOf reactome:REACT_9397
  v3: x4 -> x5; k3*x4 - kr3*x5;  // isVersionOf GO:0007171 GO:0046777 GO:0004713; isVersionOf reactome:REACT_9388
  v4: EGF_EGFR_2_GAP_Grb2 + Prot -> EGF_EGFR_2_GAP_Grb2_Prot; k4*EGF_EGFR_2_GAP_Grb2*Prot - kr4*EGF_EGFR_2_GAP_Grb2_Prot;
  v5: EGF_EGFR_2_GAP_Grb2_Prot -> EGF_EGFRi_2_GAP_Grb2 + Proti; k5*EGF_EGFR_2_GAP_Grb2_Prot;
  v6: EGFR -> EGFRi; k6*EGFR - kr6*EGFRi;  // isVersionOf GO:0031623
  v7: x5 => x8; k7*x5;  // isVersionOf GO:0031623
  v8: x5 + GAP -> EGF_EGFR_2_GAP; k8*x5*GAP - kr8*EGF_EGFR_2_GAP;
  v9: EGF_EGFR_2_GAP_Grb2 => EGF_EGFRi_2_GAP_Grb2; k7*EGF_EGFR_2_GAP_Grb2;
  v10: EGFRi + EGFi -> EGF_EGFRi; k10*EGFRi*EGFi - kr10*EGF_EGFRi;  // isVersionOf GO:0031623
  v11: 2 EGF_EGFRi -> x11; k2*EGF_EGFRi*EGF_EGFRi - kr2*x11;
  v12: x11 -> x8; k3*x11 - kr3*x8;
  v13: => EGFR; k13;
  v14: x8 + GAP -> EGF_EGFRi_2_GAP; k14*x8*GAP - kr14*EGF_EGFRi_2_GAP;
  v15: Proti => Prot; k15*Proti;
  v16: Grb2 + EGF_EGFR_2_GAP -> EGF_EGFR_2_GAP_Grb2; k16*Grb2*EGF_EGFR_2_GAP - kr16*EGF_EGFR_2_GAP_Grb2;
  v17: Sos + EGF_EGFR_2_GAP_Grb2 -> EGF_EGFR_2_GAP_Grb2_Sos; k17*Sos*EGF_EGFR_2_GAP_Grb2 - kr17*EGF_EGFR_2_GAP_Grb2_Sos;
  v18: Ras_GDP + EGF_EGFR_2_GAP_Grb2_Sos -> EGF_EGFR_2_GAP_Grb2_Sos_Ras_GDP; k18*Ras_GDP*EGF_EGFR_2_GAP_Grb2_Sos - kr18*EGF_EGFR_2_GAP_Grb2_Sos_Ras_GDP;
  v19: EGF_EGFR_2_GAP_Grb2_Sos_Ras_GDP -> x28 + EGF_EGFR_2_GAP_Grb2_Sos; k19*EGF_EGFR_2_GAP_Grb2_Sos_Ras_GDP - kr19*x28*EGF_EGFR_2_GAP_Grb2_Sos;
  v20: EGF_EGFR_2_GAP_Grb2_Sos + x43 -> EGF_EGFR_2_GAP_Grb2_Sos_Ras_GTP; k20*EGF_EGFR_2_GAP_Grb2_Sos*x43 - kr20*EGF_EGFR_2_GAP_Grb2_Sos_Ras_GTP;
  v21: EGF_EGFR_2_GAP_Grb2_Sos_Ras_GTP -> EGF_EGFR_2_GAP_Grb2_Sos + Ras_GDP; k21*EGF_EGFR_2_GAP_Grb2_Sos_Ras_GTP - kr21*EGF_EGFR_2_GAP_Grb2_Sos*Ras_GDP;
  v22: x31 + EGF_EGFR_2_GAP -> x32; k22*x31*EGF_EGFR_2_GAP - kr22*x32;
  v23: x32 -> x33; k23*x32 - kr23*x33;
  v24: Grb2 + x33 -> EGF_EGFR_2_GAP_Shc_Grb2; k24*Grb2*x33 - kr24*EGF_EGFR_2_GAP_Shc_Grb2;
  v25: Sos + EGF_EGFR_2_GAP_Shc_Grb2 -> EGF_EGFR_2_GAP_Shc_Grb2_Sos; k25*Sos*EGF_EGFR_2_GAP_Shc_Grb2 - kr25*EGF_EGFR_2_GAP_Shc_Grb2_Sos;
  v26: Ras_GDP + EGF_EGFR_2_GAP_Shc_Grb2_Sos -> x36; k18*Ras_GDP*EGF_EGFR_2_GAP_Shc_Grb2_Sos - kr18*x36;
  v27: x36 -> EGF_EGFR_2_GAP_Shc_Grb2_Sos + x28; k19*x36 - kr19*EGF_EGFR_2_GAP_Shc_Grb2_Sos*x28;
  v28: x28 + x41 -> Raf_Ras_GTP; k28*x28*x41 - kr28*Raf_Ras_GTP;
  v29: Raf_Ras_GTP -> x43 + x45; k29*Raf_Ras_GTP - kr29*x43*x45;
  v30: EGF_EGFR_2_GAP_Shc_Grb2_Sos + x43 -> x37; k20*EGF_EGFR_2_GAP_Shc_Grb2_Sos*x43 - kr20*x37;
  v31: x37 -> EGF_EGFR_2_GAP_Shc_Grb2_Sos + Ras_GDP; k21*x37 - kr21*EGF_EGFR_2_GAP_Shc_Grb2_Sos*Ras_GDP;
  v32: EGF_EGFR_2_GAP_Shc_Grb2_Sos -> EGF_EGFR_2_GAP + Shc_Grb2_Sos; k32*EGF_EGFR_2_GAP_Shc_Grb2_Sos - kr32*EGF_EGFR_2_GAP*Shc_Grb2_Sos;
  v33: Shc_Grb2_Sos -> x40 + Grb2_Sos; k33*Shc_Grb2_Sos - kr33*x40*Grb2_Sos;
  v34: EGF_EGFR_2_GAP_Grb2_Sos -> EGF_EGFR_2_GAP + Grb2_Sos; k34*EGF_EGFR_2_GAP_Grb2_Sos - kr34*EGF_EGFR_2_GAP*Grb2_Sos;
  v35: Grb2_Sos -> Sos + Grb2; k35*Grb2_Sos - kr35*Sos*Grb2;
  v36: x40 => x31; Vm36*x40/(Km36 + x40);
  v37: x33 -> EGF_EGFR_2_GAP + x40; k37*x33 - kr37*EGF_EGFR_2_GAP*x40;
  v38: Grb2 + x40 -> Shc_Grb2; k24*Grb2*x40 - kr24*Shc_Grb2;
  v39: EGF_EGFR_2_GAP_Shc_Grb2 -> EGF_EGFR_2_GAP + Shc_Grb2; k37*EGF_EGFR_2_GAP_Shc_Grb2 - kr37*EGF_EGFR_2_GAP*Shc_Grb2;
  v40: Sos + Shc_Grb2 -> Shc_Grb2_Sos; k40*Sos*Shc_Grb2 - kr40*Shc_Grb2_Sos;
  v41: Grb2_Sos + x33 -> EGF_EGFR_2_GAP_Shc_Grb2_Sos; k41*Grb2_Sos*x33 - kr41*EGF_EGFR_2_GAP_Shc_Grb2_Sos;
  v42: Phosphotase1 + x45 -> Raf_P_ase; k42*Phosphotase1*x45 - kr42*Raf_P_ase;
  v43: Raf_P_ase -> x41 + Phosphotase1; k43*Raf_P_ase;
  v44: MEK + x45 -> MEK_Raf; k44*MEK*x45 - kr44*MEK_Raf;
  v45: MEK_Raf -> MEK_P + x45; k45*MEK_Raf;
  v46: MEK_P + x45 -> MEK_P_Raf; k44*MEK_P*x45 - kr44*MEK_P_Raf;
  v47: MEK_P_Raf -> x51 + x45; k47*MEK_P_Raf;
  v48: x51 + Phosphatase2 -> MEK_PP_P_ase2; k48*x51*Phosphatase2 - kr48*MEK_PP_P_ase2;
  v49: MEK_PP_P_ase2 -> MEK_P + Phosphatase2; k49*MEK_PP_P_ase2;
  v50: Phosphatase2 + MEK_P -> MEK_P_P_ase2; k50*Phosphatase2*MEK_P - kr50*MEK_P_P_ase2;
  v51: MEK_P_P_ase2 -> MEK + Phosphatase2; k49*MEK_P_P_ase2;
  v52: ERK + x51 -> ERK_MEK_PP; k52*ERK*x51 - kr52*ERK_MEK_PP;
  v53: ERK_MEK_PP -> x51 + ERK_P; k53*ERK_MEK_PP;
  v54: x51 + ERK_P -> ERK_P_MEK_PP; k52*x51*ERK_P - kr52*ERK_P_MEK_PP;
  v55: ERK_P_MEK_PP -> x59 + x51; k55*ERK_P_MEK_PP;
  v56: x59 + Phosphotase3 -> ERK_PP_P_ase3; k56*x59*Phosphotase3 - kr56*ERK_PP_P_ase3;
  v57: ERK_PP_P_ase3 -> ERK_P + Phosphotase3; k57*ERK_PP_P_ase3;
  v58: Phosphotase3 + ERK_P -> ERK_P_P_ase3; k58*Phosphotase3*ERK_P - kr58*ERK_P_P_ase3;
  v59: ERK_P_P_ase3 -> ERK + Phosphotase3; k59*ERK_P_P_ase3;
  v60: EGFRi => EGFRideg; k60*EGFRi;
  v61: EGFi => EGFideg; k61*EGFi;
  v62: x8 => EGF_EGFRi_2deg; k60*x8;
  v63: EGF_EGFRi_2_GAP + Grb2 -> EGF_EGFRi_2_GAP_Grb2; k16*EGF_EGFRi_2_GAP*Grb2 - kr16*EGF_EGFRi_2_GAP_Grb2;
  v64: Sos + EGF_EGFRi_2_GAP_Grb2 -> EGF_EGFRi_2_GAP_Grb2_Sos; k17*Sos*EGF_EGFRi_2_GAP_Grb2 - kr17*EGF_EGFRi_2_GAP_Grb2_Sos;
  v65: Ras_GDP + EGF_EGFRi_2_GAP_Grb2_Sos -> EGF_EGFRi_2_GAP_Grb2_Sos_Ras_GDP; k18*Ras_GDP*EGF_EGFRi_2_GAP_Grb2_Sos - kr18*EGF_EGFRi_2_GAP_Grb2_Sos_Ras_GDP;
  v66: EGF_EGFRi_2_GAP_Grb2_Sos_Ras_GDP -> x69 + EGF_EGFRi_2_GAP_Grb2_Sos; k19*EGF_EGFRi_2_GAP_Grb2_Sos_Ras_GDP - kr19*x69*EGF_EGFRi_2_GAP_Grb2_Sos;
  v67: x71 + EGF_EGFRi_2_GAP_Grb2_Sos -> EGF_EGFRi_2_GAP_Grb2_Sos_Ras_GTP; k20*x71*EGF_EGFRi_2_GAP_Grb2_Sos - kr20*EGF_EGFRi_2_GAP_Grb2_Sos_Ras_GTP;
  v68: EGF_EGFRi_2_GAP_Grb2_Sos_Ras_GTP -> EGF_EGFRi_2_GAP_Grb2_Sos + Ras_GDP; k21*EGF_EGFRi_2_GAP_Grb2_Sos_Ras_GTP - kr21*EGF_EGFRi_2_GAP_Grb2_Sos*Ras_GDP;
  v69: x31 + EGF_EGFRi_2_GAP -> x63; k22*x31*EGF_EGFRi_2_GAP - kr22*x63;
  v70: x63 -> x64; k23*x63 - kr23*x64;
  v71: Grb2 + x64 -> EGF_EGFRi_2_GAP_Shc_Grb2; k24*Grb2*x64 - kr24*EGF_EGFRi_2_GAP_Shc_Grb2;
  v72: Sos + EGF_EGFRi_2_GAP_Shc_Grb2 -> EGF_EGFRi_2_GAP_Shc_Grb2_Sos; k25*Sos*EGF_EGFRi_2_GAP_Shc_Grb2 - kr25*EGF_EGFRi_2_GAP_Shc_Grb2_Sos;
  v73: Ras_GDP + EGF_EGFRi_2_GAP_Shc_Grb2_Sos -> x67; k18*Ras_GDP*EGF_EGFRi_2_GAP_Shc_Grb2_Sos - kr18*x67;
  v74: x67 -> EGF_EGFRi_2_GAP_Shc_Grb2_Sos + x69; k19*x67 - kr19*EGF_EGFRi_2_GAP_Shc_Grb2_Sos*x69;
  v75: x69 + x41 -> Rafi_Rasi_GTP; k28*x69*x41 - kr28*Rafi_Rasi_GTP;
  v76: Rafi_Rasi_GTP -> x71 + Rafi; k29*Rafi_Rasi_GTP - kr29*x71*Rafi;
  v77: x71 + EGF_EGFRi_2_GAP_Shc_Grb2_Sos -> x68; k20*x71*EGF_EGFRi_2_GAP_Shc_Grb2_Sos - kr20*x68;
  v78: x68 -> EGF_EGFRi_2_GAP_Shc_Grb2_Sos + Ras_GDP; k21*x68 - kr21*EGF_EGFRi_2_GAP_Shc_Grb2_Sos*Ras_GDP;
  v79: EGF_EGFRi_2_GAP_Shc_Grb2_Sos -> EGF_EGFRi_2_GAP + Shc_Grb2_Sos; k32*EGF_EGFRi_2_GAP_Shc_Grb2_Sos - kr32*EGF_EGFRi_2_GAP*Shc_Grb2_Sos;
  v80: EGF_EGFRi_2_GAP_Grb2_Sos -> EGF_EGFRi_2_GAP + Grb2_Sos; k34*EGF_EGFRi_2_GAP_Grb2_Sos - kr34*EGF_EGFRi_2_GAP*Grb2_Sos;
  v81: x64 -> EGF_EGFRi_2_GAP + x40; k37*x64 - kr37*EGF_EGFRi_2_GAP*x40;
  v82: EGF_EGFRi_2_GAP_Shc_Grb2 -> EGF_EGFRi_2_GAP + Shc_Grb2; k37*EGF_EGFRi_2_GAP_Shc_Grb2 - kr37*EGF_EGFRi_2_GAP*Shc_Grb2;
  v83: Grb2_Sos + x64 -> EGF_EGFRi_2_GAP_Shc_Grb2_Sos; k41*Grb2_Sos*x64 - kr41*EGF_EGFRi_2_GAP_Shc_Grb2_Sos;
  v84: Phosphotase1 + Rafi -> Rafi_P_ase; k42*Phosphotase1*Rafi - kr42*Rafi_P_ase;
  v85: Rafi_P_ase -> x41 + Phosphotase1; k43*Rafi_P_ase;
  v86: MEK + Rafi -> MEKi_Rafi; k44*MEK*Rafi - kr44*MEKi_Rafi;
  v87: MEKi_Rafi -> MEKi_P + Rafi; k45*MEKi_Rafi;
  v88: Rafi + MEKi_P -> MEKi_P_Rafi; k44*Rafi*MEKi_P - kr44*MEKi_P_Rafi;
  v89: MEKi_P_Rafi -> Rafi + MEKi_PP; k47*MEKi_P_Rafi;
  v90: MEKi_PP + Phosphatase2 -> MEKi_PP_P_ase2i; k48*MEKi_PP*Phosphatase2 - kr48*MEKi_PP_P_ase2i;
  v91: MEKi_PP_P_ase2i -> MEKi_P + Phosphatase2; k49*MEKi_PP_P_ase2i;
  v92: Phosphatase2 + MEKi_P -> MEKi_P_P_ase2i; k50*Phosphatase2*MEKi_P - kr50*MEKi_P_P_ase2i;
  v93: MEKi_P_P_ase2i -> MEK + Phosphatase2; k49*MEKi_P_P_ase2i;
  v94: ERK + MEKi_PP -> ERKi_MEKi_PP; k52*ERK*MEKi_PP - kr52*ERKi_MEKi_PP;
  v95: ERKi_MEKi_PP -> ERKi_P + MEKi_PP; k53*ERKi_MEKi_PP;
  v96: MEKi_PP + ERKi_P -> ERKi_P_MEKi_PP; k52*MEKi_PP*ERKi_P - kr52*ERKi_P_MEKi_PP;
  v97: ERKi_P_MEKi_PP -> ERKi_PP + MEKi_PP; k55*ERKi_P_MEKi_PP;
  v98: ERKi_PP + Phosphotase3 -> ERKi_PP_P_ase3i; k56*ERKi_PP*Phosphotase3 - kr56*ERKi_PP_P_ase3i;
  v99: ERKi_PP_P_ase3i -> ERKi_P + Phosphotase3; k57*ERKi_PP_P_ase3i;
  v100: Phosphotase3 + ERKi_P -> ERKi_P_P_ase3i; k58*Phosphotase3*ERKi_P - kr58*ERKi_P_P_ase3i;  // isDescribedBy omim:164760
  v101: ERKi_P_P_ase3i -> ERK + Phosphotase3; k59*ERKi_P_P_ase3i;  // isDescribedBy omim:164760
  v102: EGF_EGFR_2_GAP -> EGF_EGFRi_2_GAP; k6*EGF_EGFR_2_GAP - kr6*EGF_EGFRi_2_GAP;
  v103: x32 -> x63; k6*x32 - kr6*x63;
  v104: x33 -> x64; k6*x33 - kr6*x64;
  v105: EGF_EGFR_2_GAP_Grb2_Sos -> EGF_EGFRi_2_GAP_Grb2_Sos; k6*EGF_EGFR_2_GAP_Grb2_Sos - kr6*EGF_EGFRi_2_GAP_Grb2_Sos;
  v106: EGF_EGFR_2_GAP_Grb2_Sos + Prot -> EGF_EGFR_2_GAP_Grb2_Sos_Prot; k4*EGF_EGFR_2_GAP_Grb2_Sos*Prot - kr4*EGF_EGFR_2_GAP_Grb2_Sos_Prot;
  v107: EGF_EGFR_2_GAP_Grb2_Sos_Prot -> Proti + EGF_EGFRi_2_GAP_Grb2_Sos; k5*EGF_EGFR_2_GAP_Grb2_Sos_Prot;
  v108: EGF_EGFR_2_GAP_Grb2_Sos_Ras_GDP -> EGF_EGFRi_2_GAP_Grb2_Sos_Ras_GDP; k6*EGF_EGFR_2_GAP_Grb2_Sos_Ras_GDP - kr6*EGF_EGFRi_2_GAP_Grb2_Sos_Ras_GDP;
  v109: EGF_EGFR_2_GAP_Grb2_Sos_Ras_GDP + Prot -> x89; k4*EGF_EGFR_2_GAP_Grb2_Sos_Ras_GDP*Prot - kr4*x89;
  v110: x89 -> Proti + EGF_EGFRi_2_GAP_Grb2_Sos_Ras_GDP; k5*x89;
  v111: EGF_EGFR_2_GAP_Grb2_Sos_Ras_GTP -> EGF_EGFRi_2_GAP_Grb2_Sos_Ras_GTP; k6*EGF_EGFR_2_GAP_Grb2_Sos_Ras_GTP - kr6*EGF_EGFRi_2_GAP_Grb2_Sos_Ras_GTP;
  v112: EGF_EGFR_2_GAP_Grb2_Sos_Ras_GTP + Prot -> x90; k4*EGF_EGFR_2_GAP_Grb2_Sos_Ras_GTP*Prot - kr4*x90;
  v113: x90 -> Proti + EGF_EGFRi_2_GAP_Grb2_Sos_Ras_GTP; k5*x90;
  v114: EGF_EGFR_2_GAP_Shc_Grb2 -> EGF_EGFRi_2_GAP_Shc_Grb2; k6*EGF_EGFR_2_GAP_Shc_Grb2 - kr6*EGF_EGFRi_2_GAP_Shc_Grb2;
  v115: EGF_EGFR_2_GAP_Shc_Grb2 + Prot -> EGF_EGFR_2_GAP_Shc_Grb2_Prot; k4*EGF_EGFR_2_GAP_Shc_Grb2*Prot - kr4*EGF_EGFR_2_GAP_Shc_Grb2_Prot;
  v116: EGF_EGFR_2_GAP_Shc_Grb2_Prot -> Proti + EGF_EGFRi_2_GAP_Shc_Grb2; k5*EGF_EGFR_2_GAP_Shc_Grb2_Prot;
  v117: EGF_EGFR_2_GAP_Shc_Grb2_Sos -> EGF_EGFRi_2_GAP_Shc_Grb2_Sos; k6*EGF_EGFR_2_GAP_Shc_Grb2_Sos - kr6*EGF_EGFRi_2_GAP_Shc_Grb2_Sos;
  v118: EGF_EGFR_2_GAP_Shc_Grb2_Sos + Prot -> EGF_EGFR_2_GAP_Shc_Grb2_Sos_Prot; k4*EGF_EGFR_2_GAP_Shc_Grb2_Sos*Prot - kr4*EGF_EGFR_2_GAP_Shc_Grb2_Sos_Prot;
  v119: EGF_EGFR_2_GAP_Shc_Grb2_Sos_Prot -> Proti + EGF_EGFRi_2_GAP_Shc_Grb2_Sos; k5*EGF_EGFR_2_GAP_Shc_Grb2_Sos_Prot;
  v120: x36 -> x67; k6*x36 - kr6*x67;
  v121: x36 + Prot -> x93; k4*x36*Prot - kr4*x93;
  v122: x93 -> Proti + x67; k5*x93;
  v123: x37 -> x68; k6*x37 - kr6*x68;
  v124: x37 + Prot -> x94; k4*x37*Prot - kr4*x94;
  v125: x94 -> x68 + Proti; k5*x94;

  // Unit definitions:
  unit substance = item; substance is "items";
  unit time = 60 second; time is "min";
  unit volume = 1e-12 litre; volume is "pl";
  unit pmin = 1 / (60 second); pmin is "permin";
  unit ipmin = item / (60 second); ipmin is "itemspermin";
  unit pipmin = 1 / (60 second * item); pipmin is "peritempermin";
  unit piplpmin = 1e-12 litre / (item * 60 second); piplpmin is "plperitempermin";
  unit area = metre^2;
end
