// SBML level 2 version 4
// This model was downloaded from BioModels Database
// http://www.ebi.ac.uk/biomodels/

model Teusink1998_Glycolysis_TurboDesign()
  // This is the model described in the article:
  // The danger of metabolic pathways with turbo design
  // Teusink B, Walsh MC, van Dam K, Westerhoff HV Trends Biochem. Sci. 1998 May; Volume: 23 (Issue: 5 ): 162-9 9612078 ,
  // Abstract:
  // Many catabolic pathways begin with an ATP-requiring activation step, after which further metabolism yields a surplus of ATP. Such a 'turbo' principle is useful but also contains an inherent risk. This is illustrated by a detailed kinetic analysis of a paradoxical Saccharomyces cerevisiae mutant; the mutant fails to grow on glucose because of overactive initial enzymes of glycolysis, but is defective only in an enzyme (trehalose 6-phosphate synthase) that appears to have little relevance to glycolysis. The ubiquity of pathways that possess an initial activation step, suggests that there might be many more genes that, when deleted, cause rather paradoxical regulation phenotypes (i.e. growth defects caused by enhanced utilization of growth substrate).
  // The model represents the wild-type cell: 'guarded' glycolysis, which is the inhibition of the HK module by hexose monophosphate. The model reproduces figures 3c and 3d of the reference publication.
  // To reproduce unguarded glycolysis, set parameter wild_type to '0'.
  // This model originates from BioModels Database: A Database of Annotated Published Models (http://www.ebi.ac.uk/biomodels/). It is copyright (c) 2005-2010 The BioModels.net Team.
  // For more information see the terms of use .
  // To cite BioModels Database, please use: Li C, Donizelli M, Rodriguez N, Dharuri H, Endler L, Chelliah V, Li L, He E, Henry A, Stefan MI, Snoep JL, Hucka M, Le Novère N, Laibe C (2010) BioModels Database: An enhanced, curated and annotated resource for published quantitative kinetic models. BMC Syst Biol., 4:92.
  // biomodels.db:MODEL1007200002
  // biomodels.db:BIOMD0000000253
  // isDescribedBy pubmed:9612078
  // hasTaxon taxonomy:4932
  // isHomologTo reactome:REACT_1383
  // isVersionOf kegg.pathway:sce00010

  // Compartments:
  compartment cell = 1;  // GO:0005622

  // Species:
  species HMP in cell = 0.1; HMP is "hexose monophosphate";  // hasPart CHEBI:16084 CHEBI:17665
  species Fru16P2 in cell = 1; Fru16P2 is "fructose 1,6-bisphosphate";  // CHEBI:16905
  species ATP in cell = 4;  // CHEBI:15422
  species $Glc in cell = 10; Glc is "glucose";  // CHEBI:17925
  species $Tre6P in cell; Tre6P is "trehalose 6-phosphate";  // CHEBI:18283
  species $ADP in cell;  // CHEBI:16761

  // Parameters:
  KRHMP = 1 mM;
  gR = 10;
  c1 = 0.0005;
  L0 = 1000;
  KRATP = 0.06 mM;
  gT = 1;
  c2 = 1;
  KiATP = 10 mM;
  ci = 10;

  // Assignment rules:
  Tre6P := HMP^2;
  ADP := 5 - ATP;
  lambda1 := HMP/KRHMP;
  lambda2 := ATP/KRATP;
  lambda3 := ATP/KiATP;
  R := 1 + lambda1 + lambda2 + gR*lambda1*lambda2;
  T := 1 + c1*lambda1 + c2*lambda2 + gT*c1*lambda1*c2*lambda2;
  L := L0*((1 + ci*lambda3)/(1 + lambda3))^2;

  // Reactions:
  HK: $Glc + ATP => HMP; cell*VHK*Glc*ATP/(KGlc*HK_KATP)/((1 + Glc/KGlc + wild_type*Tre6P/KiTre6P)*(1 + ATP/HK_KATP)); HK is "hexokinase";  // modifiers: Tre6P; isHomologTo reactome:REACT_1318; isVersionOf GO:0004396; isVersionOf kegg.reaction:R02848; isVersionOf ec-code:2.7.1.1
    VHK = 68 mM_per_min; HK_KATP = 0.15 mM; KGlc = 1 mM; KiTre6P = 4.422 mM; wild_type = 1 dimensionless;
  PFK: HMP + ATP => Fru16P2; cell*VPFK*gR*lambda1*lambda2*R/(R^2 + L*T^2); PFK is "phosphofructokinase";  // isHomologTo reactome:REACT_1840; isVersionOf GO:0008662; isVersionOf ec-code:2.7.1.11; isVersionOf kegg.reaction:R00756
    VPFK = 30 mM_per_min;
  lower: Fru16P2 + 4 $ADP => 4 ATP; cell*Vlower*Fru16P2*ADP/(KFru16P2*KADP)/((1 + Fru16P2/KFru16P2)*(1 + ADP/KADP));  // hasVersion ec-code:4.1.2.13 ec-code:5.3.1.1 ec-code:4.2.1.11 ec-code:5.4.2.1; hasVersion kegg.reaction:R01070 kegg.reaction:R01061 kegg.reaction:R01015 kegg.reaction:R01512
    Vlower = 20 mM_per_min; KFru16P2 = 1 mM; KADP = 0.1 mM;
  ATPase: ATP => $ADP; cell*VATPase*ATP/(ATPase_KATP + ATP);  // isVersionOf GO:0016887; isVersionOf ec-code:3.6.1.3
    VATPase = 68 mM_per_min; ATPase_KATP = 3 mM;

  // Unit definitions:
  unit substance = 1e-3 mole; substance is "mmol";
  unit time = 60 second; time is "min";
  unit mM = 1e-3 mole / litre;
  unit mM_per_min = 1e-3 mole / (litre * 60 second);
end
