// SBML level 3 version 2

function MM(Vmax, Km, S)
  Vmax*S/(Km + S);
end

function MM_twosubst(Vmax, Km1, Km2, S1, S2)
  Vmax*S1*S2/((Km1 + S1)*(Km2 + S2));
end

model Reed2008()
  // Reed2008_Glutathione_Metabolism
  // This is the model described in the article:
  // A mathematical model of glutathione metabolism.
  // Michael C Reed, Rachel L Thomas, Jovana Pavisic, S. Jill James, Cornelia M Ulrich and H. Frederik Nijhout, Theor Biol Med Model 2008,5:8; PubmedID:18442411 ; DOI:10.1186/1742-4682-5-8;
  // Abstract:
  // BACKGROUND: Glutathione (GSH) plays an important role in anti-oxidant defense and detoxification reactions. It is primarily synthesized in the liver by the transsulfuration pathway and exported to provide precursors for in situ GSH synthesis by other tissues. Deficits in glutathione have been implicated in aging and a host of diseases including Alzheimer's disease, Parkinson's disease, cardiovascular disease, cancer, Down syndrome and autism.
  // APPROACH: We explore the properties of glutathione metabolism in the liver by experimenting with a mathematical model of one-carbon metabolism, the transsulfuration pathway, and glutathione synthesis, transport, and breakdown. The model is based on known properties of the enzymes and the regulation of those enzymes by oxidative stress. We explore the half-life of glutathione, the regulation of glutathione synthesis, and its sensitivity to fluctuations in amino acid input. We use the model to simulate the metabolic profiles previously observed in Down syndrome and autism and compare the model results to clinical data.
  // CONCLUSION: We show that the glutathione pools in hepatic cells and in the blood are quite insensitive to fluctuations in amino acid input and offer an explanation based on model predictions. In contrast, we show that hepatic glutathione pools are highly sensitive to the level of oxidative stress. The model shows that overexpression of genes on chromosome 21 and an increase in oxidative stress can explain the metabolic profile of Down syndrome. The model also correctly simulates the metabolic profile of autism when oxidative stress is substantially increased and the adenosine concentration is raised. Finally, we discuss how individual variation arises and its consequences for one-carbon and glutathione metabolism.
  // parameter orig. article this model
  // Vm_CBS 700000 420000
  // Vm_GNMT 245 260
  // K_sam_GNMT 32 63
  // Vr_MTD(mito) 600000 595000
  // V_CBS kinetic law rearranged
  // V_bmetc 913 913.4
  // Vm_GR 8925 892.5
  // This version of the model contains a feeding rhythm as used in figure 5 of the original article. Four parameters, breakfast, lunch dinner and fasting, describe the relative level of amino acids, described by the parameter aa_input or Aminoacid_input, in the blood. To remove the daily feeding rhythm, either set the parameters for meals and fasting to 1 (or for figure 3 to 0.333), or remove the assignment rule for the Aminoacid_input. For the steady state evaluations for figure 6, the mealtime parameters were set to one, which, while making Copasi complain about explicit time dependency, still gives valid results.
  // This version of the model differs slightly from the version described in the supplement, in which contains some typos. It was corrected using the version of JWS-online, created using the original matlab files, thankfully provided by the articles authors. Many thanks to Jacky Snoep for his help and support.
  // In the SBML version of the model the volumes of the mitochondrion, the cytoplasm and the cell were all set to one to obtain the same equations as described in the supplemental materials of the article. The total folate is equally split between the cytosol and the mitochondrion and divided by 3/4 for the cytosol and 1/4 for the mitochondrion, respectively. To obtain an SBML model in which the volumes of the compartments, cytosol and mito, are used, the model needs to be altered as follows:
  // for the initial distribution of folate the terms 3/4 and 1/4 have to be replaced by volumes of cytosol and mitochondria respectively
  // in the transport reactions between mitochondrion and cytosol the stoichiometry of the mitochondrial reactants has to be set from 3 to 1 and in the first part of the according rate laws the factor mito/3 should simply be replaced with mito.
  // the stoichiometries of src and dmg have to be changed to cell/mito for mitchondrial and cell/cytosol for cytosolic reactions involving these two species (for the relative volumes used in the article this would be 4 for mitochondrial reactions and 1.33333 for cytosolic ones).
  // While the concentrations stay the same after these alteration, the reaction fluxes change by a factor of cytosol and mito for cytosolic and mitchondrial reactions, respectively.
  // Originally created by libAntimony v1.3 (using libSBML 3.4.1)
  // biomodels.db:MODEL1007200001
  // biomodels.db:BIOMD0000000268
  // isDescribedBy pubmed:18442411
  // isDerivedFrom biomodels.db:MODEL1007200000
  // hasTaxon taxonomy:9606 BTO:0000575
  // isVersionOf GO:0006749
  // model units - substance: substance, time: time, volume: volume, area: area, length: metre, extent: substance

  // Compartments:
  compartment blood = 1 volume;  // isVersionOf BTO:0000089
  compartment cytosol = 1 volume;  // isVersionOf GO:0005829
  compartment mito = 1 volume; mito is "mitochondrion";  // isVersionOf GO:0005739
  compartment cell = 1 volume;  // isVersionOf GO:0005623

  // Species:
  species $b_met in blood; b_met is "b_Met";  // isVersionOf CHEBI:16811 kegg.compound:C01733
  species $b_ser in blood; b_ser is "b_Ser";  // isVersionOf CHEBI:17822 kegg.compound:C00716
  species $GAR in cytosol = 10;  // isVersionOf CHEBI:18349 kegg.compound:C003838
  species $NADPH in cytosol = 50;  // isVersionOf CHEBI:16474 kegg.compound:C00005
  species $BET in cytosol = 50; BET is "Betaine";  // CHEBI:17750 kegg.compound:C00719
  species $DUMP in cytosol = 20; DUMP is "dUMP";  // isVersionOf CHEBI:17622 kegg.compound:C00365
  species $Fol in cell = 20.1; Fol is "Folate";  // isVersionOf CHEBI:27470 kegg.compound:C00504
  species $H2O2 in cytosol = 0.01;  // isVersionOf CHEBI:16240 kegg.compound:C00027
  species $CO in mito = 0; CO is "CO2";  // isVersionOf CHEBI:16526 kegg.compound:C00011
  species $HCHO in cell = 500; HCHO is "Formaldehyde";  // isVersionOf CHEBI:16842 kegg.compound:C00067
  species c_thf in cytosol = Fol/(2*3/4) - (c_5mf + c_2cf + c_1cf + c_10f + c_dhf); c_thf is "c_THF";  // isVersionOf CHEBI:15635 kegg.compound:C00101
  species m_thf in mito = Fol/(2*1/4) - (m_2cf + m_1cf + m_10f); m_thf is "m_THF";  // isVersionOf CHEBI:15635 kegg.compound:C00101
  species c_5mf in cytosol = 4.496534; c_5mf is "c_5-methyl-THF";  // isVersionOf CHEBI:15641 kegg.compound:C00440
  species c_2cf in cytosol = 0.5062781; c_2cf is "c_5-10-methylene-THF";  // isVersionOf CHEBI:1989 kegg.compound:C00143
  species c_1cf in cytosol = 0.2786027; c_1cf is "c_5-10-methenyl-THF";  // isVersionOf pubchem.compound:644350
  species c_10f in cytosol = 3.409071; c_10f is "c_10-formyl-THF";  // isVersionOf CHEBI:15637 kegg.compound:C00234
  species c_dhf in cytosol = 0.03859523; c_dhf is "c_DHF";  // isVersionOf CHEBI:15633 kegg.compound:C00415
  species m_2cf in mito = 1.666109; m_2cf is "m_5-10-methylene-THF";  // isVersionOf CHEBI:1989 kegg.compound:C00143
  species m_1cf in mito = 1.549291; m_1cf is "m_5-10-methenyl-THF";  // isVersionOf pubchem.compound:644350
  species m_10f in mito = 15.9088; m_10f is "m_10-formyl-THF";  // isVersionOf CHEBI:15637 kegg.compound:C00234
  species b_gly in blood = 221.1011; b_gly is "b_Glycine";  // isVersionOf CHEBI:15428 kegg.compound:C00037
  species b_glu in blood = 60.43309; b_glu is "b_Glutamate";  // isVersionOf CHEBI:18237 kegg.compound:C00302
  species b_cys in blood = 185.5038; b_cys is "b_Cysteine";  // isVersionOf CHEBI:15356 kegg.compound:C00736
  species b_gsg in blood = 0.4843285; b_gsg is "b_GSSG";  // isVersionOf CHEBI:17858 kegg.compound:C00127
  species b_gsh in blood = 12.6996; b_gsh is "b_GSH";  // isVersionOf CHEBI:16856 kegg.compound:C00051
  species aic in cytosol = 0.9427504; aic is "AICAR";  // isVersionOf CHEBI:18406 kegg.compound:C04677
  species c_glu in cytosol = 3219.398; c_glu is "c_Glutamate";  // isVersionOf CHEBI:18237 kegg.compound:C00302
  species c_cys in cytosol = 194.9674; c_cys is "c_Cysteine";  // isVersionOf CHEBI:15356 kegg.compound:C00736
  species glc in cytosol = 9.808425; glc is "Glutamyl-Cysteine";  // isVersionOf CHEBI:17515 kegg.compound:C00669
  species c_gly in cytosol = 924.4298; c_gly is "c_Glycine";  // isVersionOf CHEBI:15428 kegg.compound:C00037
  species c_gsg in cytosol = 61.30196; c_gsg is "c_GSSG";  // isVersionOf CHEBI:17858 kegg.compound:C00127
  species c_gsh in cytosol = 6590.568; c_gsh is "c_GSH";  // isVersionOf CHEBI:16856 kegg.compound:C00051
  species cyt in cytosol = 36.88259; cyt is "Cystathione";  // isVersionOf pubchem.compound:834
  species hcy in cytosol = 1.122484; hcy is "Homocysteine";  // isVersionOf CHEBI:17230 kegg.compound:C05330
  species c_ser in cytosol = 562.8344; c_ser is "c_Serine";  // isVersionOf CHEBI:17822 kegg.compound:C00716
  species sah in cytosol = 19.14328; sah is "S-adenosylhomocysteine";  // isVersionOf CHEBI:16680 kegg.compound:C00021
  species sam in cytosol = 81.16846; sam is "S-adenosylmethionine";  // isVersionOf CHEBI:15414 kegg.compound:C00019
  species met in cytosol = 49.18682; met is "c_Methionine";  // CHEBI:16811 kegg.compound:C01733
  species c_coo in cytosol = 13.08882; c_coo is "c_formate";  // isVersionOf CHEBI:15740 kegg.compound:C00058
  species m_ser in mito = 2114.871; m_ser is "m_Serine";  // isVersionOf CHEBI:17822 kegg.compound:C00716
  species m_gly in mito = 2040.434; m_gly is "m_Glycine";  // isVersionOf CHEBI:15428 kegg.compound:C00037
  species m_coo in mito = 55.82012; m_coo is "m_Formate";  // isVersionOf CHEBI:15740 kegg.compound:C00058
  species src in cell = 9.162459; src is "Sarcosine";  // isVersionOf CHEBI:15611 kegg.compound:C00213
  species dmg in cell = 0.7073827; dmg is "Dimethylglycine";  // isVersionOf CHEBI:17724 kegg.compound:C01026

  // Parameters:
  tot_cfol has uM;
  tot_mfol has uM;
  V_oCys_b has uM_per_h;
  V_oGly_b has uM_per_h;
  V_oGlu_b has uM_per_h;
  V_gshHb = 150 uM_per_h;
  K_gshHb = 150 uM;
  V_gshLb = 1100 uM_per_h;
  h_gshLb = 3 dimensionless;
  K_gshLb = 3000 uM;
  V_gsgHb = 40 uM_per_h;
  K_gsgHb = 1250 uM;
  V_gsgLb = 4025 uM_per_h;
  K_gsgLb = 7100 uM;
  V_bcysc = 14950 uM_per_h;
  K_bcysc = 2100 uM;
  V_bglutc = 28000 uM_per_h;
  K_bglutc = 300 uM;
  k_out_glu = 1 per_h;
  V_bglyc = 4600 uM_per_h;
  K_bglyc = 150 uM;
  k_out_gly = 1 per_h;
  V_bserc = 2700 uM_per_h;
  K_bserc = 150 uM;
  k_out_ser = 1 per_h;
  V_bmetc = 913.4 uM_per_h;
  K_bmetc = 150 uM;
  k_out_met = 1 per_h;
  Vm_mFTD = 1050 uM_per_h;
  K_10f_FTD = 20 uM;
  Vf_mSHMT = 11440 uM_per_h;
  K_thf_SHMT = 50 uM;
  K_ser_SHMT = 600 uM;
  Vr_mSHMT = 30000000 uM_per_h;
  K_gly_SHMT = 10000 uM;
  K_2cf_SHMT = 3200 uM;
  Vf_mFTS = 2000 uM_per_h;
  K_thf_mFTS = 3 uM;
  K_coo_mFTS = 43 uM;
  Vr_mFTS = 6300 uM_per_h;
  K_10f_mFTS = 22 uM;
  k1_mNE = 0.03 per_uM_per_h;
  k2_mNE = 20 per_h;
  Vm_GDC = 15000 uM_per_h;
  K_thf_GDC = 50 uM;
  K_gly_GDC = 3400 uM;
  Vm_SDH = 15000 uM_per_h;
  K_thf_SDH = 50 uM;
  K_src_SDH = 320 uM;
  Vm_DMGD = 15000 uM_per_h;
  K_thf_DMGD = 50 uM;
  K_dmg_DMGD = 50 uM;
  Vf_mMTD = 180000 uM_per_h;
  K_2cf_MTD = 2 uM;
  Vr_MTD = 594000 uM_per_h;
  K_1cf_MTD = 10 uM;
  Vf_mMTCH = 790000 uM_per_h;
  K_1cf_MTCH = 250 uM;
  Vr_MTCH = 20000 uM_per_h;
  K_10f_MTCH = 100 uM;
  V_mser = 10000 uM_per_h;
  K_mser = 5700 uM;
  V_cser = 10000 uM_per_h;
  K_cser = 5700 uM;
  k_in_coo = 100 per_h;
  k_out_coo = 100 per_h;
  V_mgly = 10000 uM_per_h;
  K_mgly = 5700 uM;
  V_cgly = 10000 uM_per_h;
  K_cgly = 5700 uM;
  Vm_MS = 500 uM_per_h;
  K_5mf_MS = 25 uM;
  K_hcy_MS = 1 uM;
  ssH2O2 = 0.01 uM;
  Ki_MS = 0.01 uM;
  Vm_DHFR = 2000 uM_per_h;
  K_dhf_DHFR = 0.5 uM;
  K_NADPH_DHFR = 4 uM;
  Vm_cFTD = 500 uM_per_h;
  Vm_PGT = 24300 uM_per_h;
  K_10f_PGT = 4.9 uM;
  K_GAR_PGT = 520 uM;
  Vm_cFTS = 3900 uM_per_h;
  K_thf_cFTS = 3 uM;
  K_coo_cFTS = 43 uM;
  Vf_cSHMT = 5200 uM_per_h;
  Vr_cSHMT = 15000000 uM_per_h;
  k1_cNE = 0.03 per_uM_per_h;
  k2_cNE = 22 per_h;
  Vm_TS = 5000 uM_per_h;
  K_DUMP_TS = 6.3 uM;
  K_2cf_TS = 14 uM;
  Vm_MTHFR = 5300 uM_per_h;
  K_2cf_MTHFR = 50 uM;
  K_NADPH_MTHFR = 16 uM;
  Vf_cMTD = 80000 uM_per_h;
  Vr_cMTD = 600000 uM_per_h;
  Vf_cMTCH = 500000 uM_per_h;
  Vm_ART = 55000 uM_per_h;
  K_10f_ART = 5.9 uM;
  K_aic_ART = 100 uM;
  Vm_BHMT = 2160 uM_per_h;
  K_hcy_BHMT = 12 uM;
  K_bet_BHMT = 100 uM;
  Ki_BHMT = 0.01 uM;
  Vm_MAT1 = 260 uM_per_h;
  Km_MAT1 = 41 uM;
  Ki_MAT1 = 2140 uM;
  Vm_MAT3 = 220 uM_per_h;
  Km_MAT3 = 300 uM;
  Ka_MAT3 = 360 uM;
  Ki_MAT3 = 4030 uM;
  Vm_GNMT = 260 uM_per_h;
  K_sam_GNMT = 63 uM;
  K_gly_GNMT = 130 uM;
  Ki_GNMT = 18 uM;
  Vm_DNMT = 180 uM_per_h;
  Km_DNMT = 1.4 uM;
  Ki_DNMT = 1.4 uM;
  Vf_SAHH = 320 uM_per_h;
  K_sah_SAHH = 6.5 uM;
  Vr_SAHH = 4530 uM_per_h;
  K_hcy_SAHH = 150 uM;
  Vm_CBS = 420000 uM_per_h;
  K_hcy_CBS = 1000 uM;
  K_ser_CBS = 2000 uM;
  Ka_CBS = 0.035 uM;
  Vm_CTGL = 1500 uM_per_h;
  K_cyt_CTGL = 500 uM;
  Vm_GCS = 3600 uM_per_h;
  Ke_GCS = 5597 per_uM;
  K_cys_GCS = 100 uM;
  K_glu_GCS = 1900 uM;
  Ki_GCS = 8200 uM;
  Kp_GCS = 300 per_uM;
  Ka_GCS = 0.01 uM;
  Vm_GS = 5400 uM_per_h;
  Ke_GS = 5600 per_uM;
  K_gly_GS = 300 uM;
  K_glc_GS = 22 uM;
  Kp_GS = 30 per_uM;
  Vm_GPX = 4500 uM_per_h;
  K_gsh_GPX = 1330 uM;
  K_H2O2_GPX = 0.09 uM;
  Vm_GR = 892.5 uM_per_h;
  K_gsg_GR = 107 uM;
  K_NADPH_GR = 10.4 uM;
  dinner = 3.25 dimensionless;
  lunch = 1.75 dimensionless;
  breakfast = 1.75 dimensionless;
  fasting = 0.25 dimensionless;
  daytime has time;
  var aa_input; aa_input is "Aminoacid_input";
  b_met_basal = 30 uM;
  b_ser_basal = 150 uM;
  V_oGly_b_basal = 630 uM_per_h;
  V_oGlu_b_basal = 273 uM_per_h;
  V_oCys_b_basal = 70 uM_per_h;
  k_out_cys = 1 per_h;

  // Assignment rules:
  b_met := aa_input*b_met_basal;
  b_ser := aa_input*b_ser_basal;
  tot_cfol := c_5mf + c_2cf + c_1cf + c_10f + c_dhf + c_thf;
  tot_mfol := m_thf + m_2cf + m_1cf + m_10f;
  V_oCys_b := aa_input*V_oCys_b_basal;
  V_oGly_b := aa_input*V_oGly_b_basal;
  V_oGlu_b := aa_input*V_oGlu_b_basal;
  daytime := time - 24*floor(time/24);
  aa_input := piecewise(breakfast, (7 <= daytime) && (daytime <= 10), lunch, (12 <= daytime) && (daytime <= 15), dinner, (18 <= daytime) && (daytime <= 21), fasting);

  // Reactions:
  b_gsh_decomp: b_gsh -> b_cys + b_gly + b_glu; blood*90*b_gsh;  // isVersionOf GO:0006751
  b_gsg_decomp: b_gsg -> 2 b_cys + 2 b_gly + 2 b_glu; blood*67.5*b_gsg;  // isVersionOf GO:0006751
  b_cys_cystine_conv: b_cys -> ; blood*0.25*b_cys;  // isVersionOf GO:0019456
  b_cys_loss: b_cys -> ; blood*0.1*b_cys;  // isVersionOf GO:0009093
  b_glu_loss: b_glu -> ; blood*0.1*b_glu;  // isVersionOf GO:0006538
  b_gly_loss: b_gly -> ; blood*0.1*b_gly;  // isVersionOf GO:0006546
  b_gsh_loss: b_gsh -> ; blood*0.7*b_gsh;  // isVersionOf GO:0006751
  b_gsg_loss: b_gsg -> ; blood*7.5*b_gsg;  // isVersionOf GO:0006751
  b_cys_import: -> b_cys; blood*V_oCys_b;  // isVersionOf GO:0042883
  b_gly_import: -> b_gly; blood*V_oGly_b;  // isVersionOf GO:0015816
  b_glu_import: -> b_glu; blood*V_oGlu_b;  // isVersionOf GO:0015813
  V_c_gshHb: c_gsh -> b_gsh; cytosol*MM(V_gshHb, K_gshHb, c_gsh);  // isVersionOf GO:0034635
  V_c_gshLb: c_gsh -> b_gsh; cytosol*V_gshLb*c_gsh^h_gshLb/(K_gshLb^h_gshLb + c_gsh^h_gshLb);  // isVersionOf GO:0034635
  V_c_gsgHb: c_gsg -> b_gsg; cytosol*MM(V_gsgHb, K_gsgHb, c_gsg);  // isVersionOf GO:0034635
  V_c_gsgLb: c_gsg -> b_gsg; cytosol*MM(V_gsgLb, K_gsgLb, c_gsg);  // isVersionOf GO:0034635
  V_b_CYS_c: b_cys -> c_cys; cytosol*MM(V_bcysc, K_bcysc, b_cys);  // isVersionOf GO:0042883
  V_b_GLU_c: b_glu -> c_glu; cytosol*(MM(V_bglutc, K_bglutc, b_glu) - k_out_glu*c_glu);  // isVersionOf GO:0015813
  V_b_GLY_c: b_gly -> c_gly; cytosol*(MM(V_bglyc, K_bglyc, b_gly) - k_out_gly*c_gly);  // isVersionOf GO:0015816
  V_b_SER_c: $b_ser -> c_ser; cytosol*(MM(V_bserc, K_bserc, b_ser) - k_out_ser*c_ser);  // isVersionOf GO:0032329
  V_b_MET_c: $b_met -> met; cytosol*(MM(V_bmetc, K_bmetc, b_met) - k_out_met*met);  // isVersionOf GO:0015821
  VmFTD: m_10f -> m_thf; mito*MM(Vm_mFTD, K_10f_FTD, m_10f);  // isVersionOf kegg.reaction:R00941
  VmSHMT: m_thf + m_ser -> m_gly + m_2cf; mito*(MM_twosubst(Vf_mSHMT, K_thf_SHMT, K_ser_SHMT, m_thf, m_ser) - MM_twosubst(Vr_mSHMT, K_gly_SHMT, K_2cf_SHMT, m_gly, m_2cf));  // isVersionOf kegg.reaction:R00945
  VmFTS: m_thf + m_coo -> m_10f; mito*(MM_twosubst(Vf_mFTS, K_thf_mFTS, K_coo_mFTS, m_thf, m_coo) - MM(Vr_mFTS, K_10f_mFTS, m_10f));  // isVersionOf kegg.reaction:R00944
  VmNE: m_thf + $HCHO -> m_2cf; mito*(k1_mNE*m_thf*HCHO - k2_mNE*m_2cf);  // isVersionOf kegg.reaction:R09093
  V_GDC: m_thf + m_gly -> m_2cf + $CO; mito*MM_twosubst(Vm_GDC, K_thf_GDC, K_gly_GDC, m_thf, m_gly);
  V_SDH: m_thf + src -> m_2cf + m_gly; mito*MM_twosubst(Vm_SDH, K_thf_SDH, K_src_SDH, m_thf, src);
  V_DMGD: m_thf + dmg -> m_2cf + src; mito*MM_twosubst(Vm_DMGD, K_thf_DMGD, K_dmg_DMGD, m_thf, dmg);
  VmMTD: m_2cf -> m_1cf; mito*(MM(Vf_mMTD, K_2cf_MTD, m_2cf) - MM(Vr_MTD, K_1cf_MTD, m_1cf));
  VmMTCH: m_1cf -> m_10f; mito*(MM(Vf_mMTCH, K_1cf_MTCH, m_1cf) - MM(Vr_MTCH, K_10f_MTCH, m_10f));
  VmSERc: 3 m_ser -> c_ser; (MM(V_mser, K_mser, m_ser)*mito/3 - MM(V_cser, K_cser, c_ser))*cytosol;
  VmHCOOHc: 3 m_coo -> c_coo; k_in_coo*m_coo*mito/3 - k_out_coo*c_coo*cytosol;
  VmGLYc: 3 m_gly -> c_gly; MM(V_mgly, K_mgly, m_gly)*mito*(1/3) - MM(V_cgly, K_cgly, c_gly)*cytosol;
  V_MS: c_5mf + hcy -> c_thf + met; cytosol*MM_twosubst(Vm_MS, K_5mf_MS, K_hcy_MS, c_5mf, hcy)*(ssH2O2 + Ki_MS)/(H2O2 + Ki_MS);  // modifiers: H2O2
  V_DHFR: c_dhf + $NADPH -> c_thf; cytosol*MM_twosubst(Vm_DHFR, K_dhf_DHFR, K_NADPH_DHFR, c_dhf, NADPH);
  VcFTD: c_10f -> c_thf; cytosol*MM(Vm_cFTD, K_10f_FTD, c_10f);
  V_PGT: c_10f + $GAR -> aic + c_thf; cytosol*MM_twosubst(Vm_PGT, K_10f_PGT, K_GAR_PGT, c_10f, GAR);
  VcFTS: c_thf + c_coo -> c_10f; cytosol*MM_twosubst(Vm_cFTS, K_thf_cFTS, K_coo_cFTS, c_thf, c_coo);
  VcSHMT: c_ser + c_thf -> c_gly + c_2cf; cytosol*(MM_twosubst(Vf_cSHMT, K_thf_SHMT, K_ser_SHMT, c_thf, c_ser) - MM_twosubst(Vr_cSHMT, K_gly_SHMT, K_2cf_SHMT, c_gly, c_2cf));
  VcNE: c_thf + $HCHO -> c_2cf; cytosol*(k1_cNE*c_thf*HCHO - k2_cNE*c_2cf);
  V_TS: $DUMP + c_2cf -> c_dhf; cytosol*MM_twosubst(Vm_TS, K_DUMP_TS, K_2cf_TS, DUMP, c_2cf);  // isVersionOf kegg.reaction:R02101
  V_MTHFR: c_2cf + $NADPH -> c_5mf; cytosol*MM_twosubst(Vm_MTHFR, K_2cf_MTHFR, K_NADPH_MTHFR, c_2cf, NADPH)*72/(10 + sam - sah);  // modifiers: sah, sam; isVersionOf kegg.reaction:R01220
  VcMTD: c_2cf -> c_1cf + $NADPH; cytosol*(MM(Vf_cMTD, K_2cf_MTD, c_2cf) - MM(Vr_cMTD, K_1cf_MTD, c_1cf));  // isVersionOf kegg.reaction:R01220
  VcMTCH: c_1cf -> c_10f; cytosol*(MM(Vf_cMTCH, K_1cf_MTCH, c_1cf) - MM(Vr_MTCH, K_10f_MTCH, c_10f));  // isVersionOf kegg.reaction:R01655
  V_ART: c_10f + aic -> c_thf; cytosol*MM_twosubst(Vm_ART, K_10f_ART, K_aic_ART, c_10f, aic);  // isVersionOf kegg.reaction:R04560
  V_BHMT: hcy + $BET -> met + dmg; cytosol*exp(-0.0021*(sam + sah))*exp(0.0021*102.6)*MM_twosubst(Vm_BHMT, K_hcy_BHMT, K_bet_BHMT, hcy, BET)*((ssH2O2 + Ki_BHMT)/(H2O2 + Ki_BHMT));  // modifiers: H2O2, sah, sam; isVersionOf kegg.reaction:R02821
  V_MATI: met -> sam; cytosol*Vm_MAT1*(met/(Km_MAT1 + met))*(0.23 + 0.8*exp(-0.0026*sam))*((Ki_MAT1 + 66.71)/(Ki_MAT1 + c_gsg));  // modifiers: c_gsg; isVersionOf kegg.reaction:R00650
  V_MATIII: met -> sam; cytosol*Vm_MAT3*(met^1.21/(Km_MAT3 + met^1.21))*(1 + 7.2*sam^2/(Ka_MAT3^2 + sam^2))*((Ki_MAT3 + 66.71)/(Ki_MAT3 + c_gsg));  // modifiers: c_gsg; isVersionOf kegg.reaction:R00650
  V_GNMT: sam + c_gly -> sah + src; cytosol*MM_twosubst(Vm_GNMT, K_sam_GNMT, K_gly_GNMT, sam, c_gly)*(1/(1 + sah/Ki_GNMT))*(4.8/(0.35 + c_5mf));  // modifiers: c_5mf; isVersionOf kegg.reaction:R00367
  V_DNMT: sam -> sah; cytosol*Vm_DNMT*(sam/(Km_DNMT*(1 + sah/Ki_DNMT) + sam));  // isVersionOf kegg.reaction:R00649
  V_SAHH: sah -> hcy; cytosol*(MM(Vf_SAHH, K_sah_SAHH, sah) - MM(Vr_SAHH, K_hcy_SAHH, hcy));  // isVersionOf kegg.reaction:R00192
  gluconeogenesis_ser: c_ser -> ; cytosol*1.2*c_ser;  // isVersionOf kegg.reaction:R0006565
  V_CBS: hcy + c_ser -> cyt; cytosol*MM_twosubst(Vm_CBS, K_hcy_CBS, K_ser_CBS, hcy, c_ser)*(((30/102.59)^2 + 1)/((30/(sam + sah))^2 + 1))*((H2O2 + Ka_CBS)/(ssH2O2 + Ka_CBS));  // modifiers: H2O2, sah, sam; isVersionOf kegg.reaction:R01289
  V_CTGL: cyt -> c_cys; cytosol*MM(Vm_CTGL, K_cyt_CTGL, cyt);  // isVersionOf kegg.reaction:R00894
  V_GCS: c_cys + c_glu -> glc; cytosol*Vm_GCS*(c_cys*c_glu - glc/Ke_GCS)/(K_cys_GCS*K_glu_GCS + c_glu*K_cys_GCS + c_cys*(K_glu_GCS*(1 + c_gsh/Ki_GCS) + c_glu) + glc/Kp_GCS + c_gsh/Ki_GCS)*((H2O2 + Ka_GCS)/(ssH2O2 + Ka_GCS));  // modifiers: H2O2, c_gsh; isVersionOf kegg.reaction:R00894
  cys_usage: c_cys -> ; cytosol*0.35*c_cys^2/200;  // isVersionOf GO:0009093
  c_glu_usage: c_glu -> ; cytosol*0.07*c_glu;  // isVersionOf GO:0006538
  V_GS: glc + c_gly -> c_gsh; cytosol*Vm_GS*(c_gly*glc - c_gsh/Ke_GS)/(K_gly_GS*K_glc_GS + glc*K_gly_GS + c_gly*(K_glc_GS + glc) + c_gsh/Kp_GS);  // isVersionOf kegg.reaction:R00497
  V_GPX: 2 c_gsh + $H2O2 -> c_gsg; cytosol*Vm_GPX*(c_gsh/(K_gsh_GPX + c_gsh))^2*(H2O2/(K_H2O2_GPX + H2O2));  // isVersionOf kegg.reaction:R00274
  V_GR: c_gsg + $NADPH -> 2 c_gsh; cytosol*MM_twosubst(Vm_GR, K_gsg_GR, K_NADPH_GR, c_gsg, NADPH);  // isVersionOf kegg.reaction:R00115
  c_gsh_degr: c_gsh -> ; cytosol*0.002*c_gsh;  // isVersionOf GO:0006751
  c_gsg_degr: c_gsg -> ; cytosol*0.1*c_gsg;  // isVersionOf GO:0006751

  // Unit definitions:
  unit substance = 1e-6 mole; substance is "micromole";
  unit uM = 1e-6 mole / litre;
  unit uM_per_h = 1e-6 mole / (litre * 3600 second); uM_per_h is "uM/h";
  unit per_h = 1 / (3600 second); per_h is "1/h";
  unit per_uM_per_h = litre / (1e-6 mole * 3600 second); per_uM_per_h is "1/(uM*h)";
  unit per_uM = litre / (1e-6 mole); per_uM is "1/uM";
  unit time = 3600 second; time is "hours";
  unit volume = litre;
  unit area = metre^2;
end
