// SBML level 2 version 4
// This model was downloaded from BioModels Database
// http://www.ebi.ac.uk/biomodels/

model BIOMD0000000288()
  // Wang2009 - PI3K Ras Crosstalk
  // This model is from the article:
  // PI3K-dependent cross-talk interactions converge with Ras as quantifiable inputs integrated by Erk.
  // Wang CC, Cirit M, Haugh JM Mol. Syst. Biol. 2009;5:246. 19225459 ,
  // Abstract:
  // Although it is appreciated that canonical signal-transduction pathways represent dominant modes of regulation embedded in larger interaction networks, relatively little has been done to quantify pathway cross-talk in such networks. Through quantitative measurements that systematically canvas an array of stimulation and molecular perturbation conditions, together with computational modeling and analysis, we have elucidated cross-talk mechanisms in the platelet-derived growth factor (PDGF) receptor signaling network, in which phosphoinositide 3-kinase (PI3K) and Ras/extracellular signal-regulated kinase (Erk) pathways are prominently activated. We show that, while PI3K signaling is insulated from cross-talk, PI3K enhances Erk activation at points both upstream and downstream of Ras. The magnitudes of these effects depend strongly on the stimulation conditions, subject to saturation effects in the respective pathways and negative feedback loops. Motivated by those dynamics, a kinetic model of the network was formulated and used to precisely quantify the relative contributions of PI3K-dependent and -independent modes of Ras/Erk activation.
  // This model is parameterized with the median of the estimated parameters given in the supplementary material of the original publication's (doi: 10.1038/msb.2009.4 ) supplement on pages 8 and 9.
  // This model originates from BioModels Database: A Database of Annotated Published Models (http://www.ebi.ac.uk/biomodels/). It is copyright (c) 2005-2010 The BioModels.net Team.
  // To the extent possible under law, all copyright and related or neighbouring rights to this encoded model have been dedicated to the public domain worldwide. Please refer to CC0 Public Domain Dedication for more information.
  // In summary, you are entitled to use this encoded model in absolutely any manner you deem suitable, verbatim, or with modification, alone or embedded it in a larger context, redistribute it, commercially or not, in a restricted way or not..
  // To cite BioModels Database, please use: Li C, Donizelli M, Rodriguez N, Dharuri H, Endler L, Chelliah V, Li L, He E, Henry A, Stefan MI, Snoep JL, Hucka M, Le Novère N, Laibe C (2010) BioModels Database: An enhanced, curated and annotated resource for published quantitative kinetic models. BMC Syst Biol., 4:92.
  // biomodels.db:MODEL0910130003
  // biomodels.db:BIOMD0000000288
  // isDescribedBy pubmed:19225459
  // isDerivedFrom pubmed:12871957 pubmed:16314431
  // isVersionOf GO:0014065 GO:0070371 GO:0048008
  // isPartOf kegg.pathway:ko04010 kegg.pathway:ko04012

  // Compartments:
  compartment cell = 1;  // isVersionOf GO:0005623

  // Species:
  species sumrc1 in cell = 1;  // isVersionOf uniprot:Q15198; hasPart uniprot:Q15198 uniprot:Q9NRA1; hasPart uniprot:Q15198 uniprot:Q9GZP0; hasPart uniprot:Q15198 uniprot:P01127
  species r in cell;  // isVersionOf uniprot:Q15198
  species c1 in cell;  // hasPart uniprot:Q9GZP0 uniprot:Q15198; hasPart uniprot:Q9NRA1 uniprot:Q15198; hasPart uniprot:P01127 uniprot:Q15198; hasPart uniprot:P04085 uniprot:Q15198
  species c2 in cell = 0;  // isVersionOf uniprot:Q15198
  species ePI3K in cell;  // isVersionOf uniprot:O00750
  species m3PI in cell = 0;  // isVersionOf GO:0005811
  species eGEF in cell;  // isHomologTo uniprot:P70392
  species mRas in cell = 0;  // isVersionOf uniprot:O14807
  species x1 in cell = 0;  // isPartOf uniprot:P04049
  species x2 in cell = 0;  // isVersionOf uniprot:Q13153
  species y in cell = 1;  // isVersionOf uniprot:P36507
  species yp in cell;  // isVersionOf uniprot:P36507
  species ypp in cell = 0;  // isVersionOf uniprot:P36507
  species z in cell = 1;  // isVersionOf uniprot:P27361
  species zp in cell;  // isVersionOf uniprot:P27361
  species zpp in cell = 0;  // isVersionOf uniprot:P27361
  species fGEF in cell = 1;  // isVersionOf uniprot:P70392
  species w in cell = 0;  // isVersionOf GO:0016563
  species eph in cell = 1;  // isVersionOf GO:0016791

  // Parameters:
  L = 1;
  KDL = 1.5;
  kxR0 = 0.3;
  kminusx = 0.007;
  ke = 0.2;
  kt = 0.005;
  alphaPI3K = 80;
  kappaPI3K = 0.3;
  k3PI = 1;
  KGR = 495;
  KGP = 5.09;
  kRas = 1;
  Gamma = 0.1;
  kdx1 = 0.745;
  kdx2 = 2.85;
  Kx2 = 6.77;
  VmaxOVERKMx11 = 1.18;
  KMx11 = 30.3;
  VmaxOVERKMx21 = 0.405;
  KMx21 = 13.7;
  VmaxOVERKMyph1 = 1.65;
  KMyph1 = 23;
  VmaxOVERKMx12 = 3.45;
  KMx12 = 18.6;
  VmaxOVERKMx22 = 1.09;
  KMx22 = 9.59;
  VmaxOVERKMyph2 = 4.2;
  KMyph2 = 7.99;
  VmaxOVERKMy1 = 6.57;
  KMy1 = 9.91;
  VmaxOVERKMzph1 = 0.167;
  KMzph1 = 8.27;
  VmaxOVERKMy2 = 31.9;
  KMy2 = 8.81;
  VmaxOVERKMzph2 = 0.228;
  KMzph2 = 31.5;
  kFBf = 0.976;
  Zf = 0.272;
  n = 1.03;
  Kf = 3.76;
  kdw = 0.0333;
  kFBph = 2.34;
  Wph = 0.385;
  p = 1.98;
  Kph = 4.64;

  // Assignment rules:
  r := KDL*sumrc1/(KDL + L);
  c1 := L*sumrc1/(KDL + L);
  ePI3K := (1 + kappaPI3K + 2*alphaPI3K*c2 - ((1 + kappaPI3K + 2*alphaPI3K*c2)^2 - 8*alphaPI3K*c2)^0.5)/2;
  eGEF := (KGR*c2 + KGP*m3PI)/(1 + KGR*c2 + KGP*m3PI)*fGEF;
  yp := 1 - y - ypp;
  zp := 1 - z - zpp;

  // Reactions:
  sumrc1ODE: -> sumrc1; kt*(1 - sumrc1) + 2*(kminusx*c2 - kxR0*c1^2);  // modifiers: c2, c1
  c2ODE: -> c2; kxR0*c1^2 - (kminusx + ke)*c2;  // modifiers: c1
  m3PIODE: -> m3PI; k3PI*(ePI3K - m3PI);  // modifiers: ePI3K
  mRasODE: -> mRas; kRas*((1 + Gamma)*eGEF - (1 + Gamma*eGEF)*mRas);  // modifiers: eGEF
  x1ODE: -> x1; kdx1*(mRas - x1/(1 + y/KMx11 + yp/KMx12));  // modifiers: mRas, y, yp
  x2ODE: -> x2; kdx2*((1 + Kx2)*m3PI/(1 + Kx2*m3PI) - x2/(1 + y/KMx21 + yp/KMx22));  // modifiers: m3PI, y, yp
  yODE: -> y; VmaxOVERKMyph1*yp/(1 + yp/KMyph1 + ypp/KMyph2) - VmaxOVERKMx11*x1*y/(1 + y/KMx11 + yp/KMx12) - VmaxOVERKMx21*x2*y/(1 + y/KMx21 + yp/KMx22);  // modifiers: yp, ypp, x1, x2
  yppODE: -> ypp; VmaxOVERKMx12*x1*yp/(1 + y/KMx11 + yp/KMx12) + VmaxOVERKMx22*x2*yp/(1 + y/KMx21 + yp/KMx22) - VmaxOVERKMyph2*ypp/((1 + z/KMy1 + zp/KMy2)*(1 + yp/KMyph1) + ypp/KMyph2);  // modifiers: x1, yp, y, x2, z, zp
  zODE: -> z; VmaxOVERKMzph1*eph*zp/(1 + zp/KMzph1 + zpp/KMzph2) - VmaxOVERKMy1*ypp*z/(1 + z/KMy1 + zp/KMy2);  // modifiers: eph, zp, zpp, ypp
  zppODE: -> zpp; VmaxOVERKMy2*ypp*zp/(1 + z/KMy1 + zp/KMy2) - VmaxOVERKMzph2*eph*zpp/(1 + zp/KMzph1 + zpp/KMzph2);  // modifiers: ypp, zp, z, eph
  fGEFODE: -> fGEF; kFBf*((1 - fGEF)/Kf - zpp^n/(Zf^n + zpp^n)*fGEF);  // modifiers: zpp
  wODE: -> w; kdw*(zpp - w);  // modifiers: zpp
  ephODE: -> eph; kFBph*(w^p/(Wph^p + w^p) - (eph - 1)/Kph);  // modifiers: w
end
