// SBML level 2 version 4
// This model was downloaded from BioModels Database
// http://www.ebi.ac.uk/biomodels/

model Model_1()
  // Hockin2002_BloodCoagulation
  // This model is from the article:
  // A model for the stoichiometric regulation of blood coagulation.
  // Hockin MF, Jones KC, Everse SJ, Mann KG. Journal of Biological ChemistryVolume 277, Issue 21, 24 May 2002, Pages 18322 -18333 11893748,
  // Abstract:
  // We have developed a model of the extrinsic blood coagulation system that includes the stoichiometric anticoagulants. The model accounts for the formation, expression, and propagation of the vitamin K-dependent procoagulant complexes and extends our previous model by including: (a) the tissue factor pathway inhibitor (TFPI)-mediated inactivation of tissue factor (TF).VIIa and its product complexes; (b) the antithrombin-III (AT-III)-mediated inactivation of IIa, mIIa, factor VIIa, factor IXa, and factor Xa; (c) the initial activation of factor V and factor VIII by thrombin generated by factor Xa-membrane; (d) factor VIIIa dissociation/activity loss; (e) the binding competition and kinetic activation steps that exist between TF and factors VII and VIIa; and (f) the activation of factor VII by IIa, factor Xa, and factor IXa. These additions to our earlier model generate a model consisting of 34 differential equations with 42 rate constants that together describe the 27 independent equilibrium expressions, which describe the fates of 34 species. Simulations are initiated by "exposing" picomolar concentrations of TF to an electronic milieu consisting of factors II, IX, X, VII, VIIa, V, and VIIII, and the anticoagulants TFPI and AT-III at concentrations found in normal plasma or associated with coagulation pathology. The reaction followed in terms of thrombin generation, proceeds through phases that can be operationally defined as initiation, propagation, and termination. The generation of thrombin displays a nonlinear dependence upon TF, AT-III, and TFPI and the combination of these latter inhibitors displays kinetic thresholds. At subthreshold TF, thrombin production/expression is suppressed by the combination of TFPI and AT-III; for concentrations above the TF threshold, the bolus of thrombin produced is quantitatively equivalent. A comparison of the model with empirical laboratory data illustrates that most experimentally observable parameters are captured, and the pathology that results in enhanced or deficient thrombin generation is accurately described.
  // biomodels.db:MODEL1106010000
  // biomodels.db:BIOMD0000000335
  // isDescribedBy pubmed:11893748
  // isDerivedFrom biomodels.db:BIOMD0000000336
  // isVersionOf GO:0007596
  // occursIn BTO:0000131

  // Compartments:
  compartment compartment_1 = 1;

  // Species:
  species TF in compartment_1 = 2.5e-11;  // uniprot:P13726
  species TF_VII in compartment_1 = 0;  // hasPart uniprot:P13726 uniprot:P08709
  species VII in compartment_1 = 1e-8;  // uniprot:P08709
  species TF_VIIa in compartment_1 = 0;  // hasPart uniprot:P13726 uniprot:P08709
  species VIIa in compartment_1 = 1e-10;  // isVersionOf uniprot:P08709
  species Xa in compartment_1 = 0;  // isVersionOf uniprot:P00742
  species IIa in compartment_1 = 0;  // isVersionOf uniprot:P00734
  species TF_VIIa_X in compartment_1 = 0;  // hasPart uniprot:P13726 uniprot:P00742 uniprot:P08709
  species X in compartment_1 = 1.6e-7;  // uniprot:P00742
  species TF_VIIa_Xa in compartment_1 = 0;  // hasPart uniprot:P13726 uniprot:P00742 uniprot:P08709
  species IX in compartment_1 = 9e-8;  // uniprot:P00740
  species TF_VIIa_IX in compartment_1 = 0;  // hasPart uniprot:P13726 uniprot:P00740 uniprot:P08709
  species IXa in compartment_1 = 0;  // isVersionOf uniprot:P00740
  species II in compartment_1 = 1.4e-6;  // uniprot:P00734
  species VIII in compartment_1 = 7e-10;  // uniprot:P00451
  species VIIIa in compartment_1 = 0;  // isVersionOf uniprot:P00451
  species IXa_VIIIa in compartment_1 = 0;  // hasPart uniprot:P00740 uniprot:P00451
  species IXa_VIIIa_X in compartment_1 = 0;  // hasPart uniprot:P00742 uniprot:P00740 uniprot:P00451
  species VIIIa1_L in compartment_1 = 0;  // isPartOf uniprot:P00451
  species VIIIa2 in compartment_1 = 0;  // isPartOf uniprot:P00451
  species V in compartment_1 = 2e-8;  // uniprot:P12259
  species Va in compartment_1 = 0;  // isVersionOf uniprot:P12259
  species Xa_Va in compartment_1 = 0;  // hasPart uniprot:P12259 uniprot:P00742
  species Xa_Va_II in compartment_1 = 0;  // hasPart uniprot:P00734 uniprot:P12259 uniprot:P00742
  species mIIa in compartment_1 = 0;  // isVersionOf uniprot:P00734
  species TFPI in compartment_1 = 2.5e-9;  // uniprot:P10646
  species Xa_TFPI in compartment_1 = 0;  // hasPart uniprot:P00742 uniprot:P10646
  species TF_VIIa_Xa_TFPI in compartment_1 = 0;  // hasPart uniprot:P13726 uniprot:P00742 uniprot:P08709 uniprot:P10646
  species ATIII in compartment_1 = 3.4e-6;  // uniprot:P01008
  species Xa_ATIII in compartment_1 = 0;  // hasPart uniprot:P00742 uniprot:P01008
  species mIIa_ATIII in compartment_1 = 0;  // hasPart uniprot:P01008 uniprot:P00734
  species IXa_ATIII in compartment_1 = 0;  // hasPart uniprot:P00740 uniprot:P01008
  species IIa_ATIII in compartment_1 = 0;  // hasPart uniprot:P01008 uniprot:P00734
  species TF_VIIa_ATIII in compartment_1 = 0;  // hasPart uniprot:P13726 uniprot:P01008 uniprot:P08709

  // Parameters:
  k1 = 0.0031;
  k2 = 3200000;
  k3 = 0.0031;
  k4 = 23000000;
  k5 = 440000;
  k6 = 13000000;
  k7 = 23000;
  k8 = 1.05;
  k9 = 25000000;
  k10 = 6;
  k11 = 19;
  k12 = 22000000;
  k13 = 2.4;
  k14 = 10000000;
  k15 = 1.8;
  k16 = 7500;
  k17 = 20000000;
  k18 = 0.005;
  k19 = 10000000;
  k20 = 0.001;
  k21 = 100000000;
  k22 = 8.2;
  k23 = 22000;
  k24 = 0.006;
  k25 = 0.001;
  k26 = 20000000;
  k27 = 0.2;
  k28 = 400000000;
  k29 = 103;
  k30 = 100000000;
  k31 = 63.5;
  k32 = 15000000;
  k33 = 0.00036;
  k34 = 900000;
  k35 = 0.00011;
  k36 = 320000000;
  k37 = 50000000;
  k38 = 1500;
  k39 = 7100;
  k40 = 490;
  k41 = 7100;
  k42 = 230;
  var IIa_plus_1_2mIIa; IIa_plus_1_2mIIa is "IIa+1.2mIIa";

  // Assignment rules:
  IIa_plus_1_2mIIa := IIa + 1.2*mIIa;

  // Reactions:
  R1: TF + VII -> TF_VII; compartment_1*(k2*TF*VII - k1*TF_VII);
  R2: TF + VIIa -> TF_VIIa; compartment_1*(k4*TF*VIIa - k3*TF_VIIa);
  R3: TF_VIIa + VII => TF_VIIa + VIIa; compartment_1*k5*TF_VIIa*VII;
  R4: Xa + VII => Xa + VIIa; compartment_1*k6*Xa*VII;
  R5: IIa + VII => IIa + VIIa; compartment_1*k7*IIa*VII;
  R6: TF_VIIa + X -> TF_VIIa_X; compartment_1*(k9*TF_VIIa*X - k8*TF_VIIa_X);
  R7: TF_VIIa + Xa -> TF_VIIa_Xa; compartment_1*(k12*TF_VIIa*Xa - k11*TF_VIIa_Xa);
  R8: TF_VIIa + IX -> TF_VIIa_IX; compartment_1*(k14*TF_VIIa*IX - k13*TF_VIIa_IX);
  R9: Xa + II => Xa + IIa; compartment_1*k16*Xa*II;
  R10: IIa + VIII => IIa + VIIIa; compartment_1*k17*IIa*VIII;
  R11: IXa + VIIIa -> IXa_VIIIa; compartment_1*(k19*IXa*VIIIa - k18*IXa_VIIIa);
  R12: IXa_VIIIa + X -> IXa_VIIIa_X; compartment_1*(k21*IXa_VIIIa*X - k20*IXa_VIIIa_X);
  R13: VIIIa -> VIIIa1_L + VIIIa2; compartment_1*(k24*VIIIa - k23*VIIIa1_L*VIIIa2);
  R14: IXa_VIIIa_X => VIIIa1_L + VIIIa2 + X + IXa; compartment_1*k25*IXa_VIIIa_X;
  R15: IXa_VIIIa => VIIIa1_L + VIIIa2 + IXa; compartment_1*k25*IXa_VIIIa;
  R16: IIa + V => IIa + Va; compartment_1*k26*IIa*V;
  R17: Xa + Va -> Xa_Va; compartment_1*(k28*Xa*Va - k27*Xa_Va);
  R18: Xa_Va + II -> Xa_Va_II; compartment_1*(k30*Xa_Va*II - k29*Xa_Va_II);
  R19: mIIa + Xa_Va => IIa + Xa_Va; compartment_1*k32*mIIa*Xa_Va;
  R20: Xa + TFPI -> Xa_TFPI; compartment_1*(k34*Xa*TFPI - k33*Xa_TFPI);
  R21: TF_VIIa_Xa + TFPI -> TF_VIIa_Xa_TFPI; compartment_1*(k36*TF_VIIa_Xa*TFPI - k35*TF_VIIa_Xa_TFPI);
  R22: TF_VIIa + Xa_TFPI => TF_VIIa_Xa_TFPI; compartment_1*k37*TF_VIIa*Xa_TFPI;
  R23: Xa + ATIII => Xa_ATIII; compartment_1*k38*Xa*ATIII;
  R24: mIIa + ATIII => mIIa_ATIII; compartment_1*k39*mIIa*ATIII;
  R25: IXa + ATIII => IXa_ATIII; compartment_1*k40*IXa*ATIII;
  R26: IIa + ATIII => IIa_ATIII; compartment_1*k41*IIa*ATIII;
  R27: TF_VIIa + ATIII => TF_VIIa_ATIII; compartment_1*k42*TF_VIIa*ATIII;
  R6b: TF_VIIa_X => TF_VIIa_Xa; compartment_1*k10*TF_VIIa_X;
  R8b: TF_VIIa_IX => TF_VIIa + IXa; compartment_1*k15*TF_VIIa_IX;
  R12b: IXa_VIIIa_X => IXa_VIIIa + Xa; compartment_1*k22*IXa_VIIIa_X;
  R18b: Xa_Va_II => Xa_Va + mIIa; compartment_1*k31*Xa_Va_II;
end
