// SBML level 2 version 4
// This model was downloaded from BioModels Database
// http://www.ebi.ac.uk/biomodels/

function _2_Reactants_1_Inhibitor(Vf, r1, r2, K, n, I, Vr, p)
  Vf*r1*r2*(K^n/(I^n + K^n)) - Vr*p;
end
_2_Reactants_1_Inhibitor is "2 Reactants, 1 Inhibitor";

function _1_Reactant_1_Activator(Vf, r1, A, n, K, Vr, p)
  Vf*r1*(1 + A^n/(A^n + K^n)) - Vr*p;
end
_1_Reactant_1_Activator is "1 Reactant, 1 Activator";

function _2_Reactants_2_Inhibitors(Vf, r1, r2, K1, n1, I1, K2, n2, I2, Vr, p)
  Vf*r1*r2*(K1^n1/(I1^n1 + K1^n1))*(K2^n2/(I2^n2 + K2^n2)) - Vr*p;
end
_2_Reactants_2_Inhibitors is "2 Reactants, 2 Inhibitors";

function function_4(Vf, K1, n1, I1, K2, n2, I2, A, n3, K3, Vr, p, r1, r2)
  Vf*r1*r2*(K1^n1/(I1^n1 + K1^n1))*(K2^n2/(I2^n2 + K2^n2))*(1 + A^n3/(A^n3 + K3^n3)) - Vr*p;
end
function_4 is "2 Reactants, 2 Inhibitors, 1 Activator";

function function_6(Vf, r1, K, n, I, A1, n1, K1, A2, n2, K2, A3, n3, K3, Vr, p)
  Vf*r1*(K^n/(I^n + K^n))*(A1^n1/(A1^n1 + K1^n1) + A2^n2/(A2^n2 + K2^n2) + A3^n3/(A3^n3 + K3^n3)) - Vr*p;
end
function_6 is "1 Reactant, 1 Inhibitor, 3 Activators";

function function_7(Vf, r1, K1, n1, I1, K2, n2, I2, K3, n3, I3, A1, n4, K4, A2, n5, K5, A3, n6, K6, Vr, p)
  Vf*r1*(K1^n1/(I1^n1 + K1^n1))*(K2^n2/(I2^n2 + K2^n2))*(K3^n3/(I3^n3 + K3^n3))*(A1^n4/(A1^n4 + K4^n4) + A2^n5/(A2^n5 + K5^n5) + A3^n6/(A3^n6 + K6^n6)) - Vr*p;
end
function_7 is "1 Reactant, 3 Inhibitors, 3 Activators";

function function_8(Vf, r1, K1, n1, I1, K2, n2, I2, A, n3, K3, Vr, p)
  Vf*r1*(K1^n1/(I1^n1 + K1^n1))*(K2^n2/(I2^n2 + K2^n2))*(1 + A^n3/(A^n3 + K3^n3)) - Vr*p;
end
function_8 is "1 Reactant, 2 Inhibitors, 1 Activator";

function _1_Reactant_2_Activators(Vf, r1, A1, n1, K1, A2, n2, K2, Vr, p)
  Vf*r1*(A1^n1/(A1^n1 + K1^n1))*(A2^n2/(A2^n2 + K2^n2)) - Vr*p;
end
_1_Reactant_2_Activators is "1 Reactant, 2 Activators";

function function_10(Vf, r1, K1, n1, I1, K2, n2, I2, K3, n3, I3, A1, n4, K4, A2, n5, K5, Vr, p)
  Vf*r1*(K1^n1/(I1^n1 + K1^n1))*(K2^n2/(I2^n2 + K2^n2))*(K3^n3/(I3^n3 + K3^n3))*(A1^n4/(A1^n4 + K4^n4) + A2^n5/(A2^n5 + K5^n5)) - Vr*p;
end
function_10 is "1 Reactant, 3 Inhibitors, 2 Activators";

function function_12(Vf, r1, K, n, I, A1, n1, K1, A2, n2, K2, A3, n3, K3, A4, n4, K4, Vr, p)
  Vf*r1*(K^n/(I^n + K^n))*(A1^n1/(A1^n1 + K1^n1) + A2^n2/(A2^n2 + K2^n2) + A3^n3/(A3^n3 + K3^n3) + A4^n4/(A4^n4 + K4^n4)) - Vr*p;
end
function_12 is "1 Reactant, 1 Inhibitor, 4 Activators";

function function_14(Vf, r1, r2, K, n, I, A, n1, K1, Vr, p)
  Vf*r1*r2*(K^n/(I^n + K^n))*(1 + A^n1/(A^n1 + K1^n1)) - Vr*p;
end
function_14 is "2 Reactants, 1 Inhibitor, 1 Activator";

function function_11(Vf, r1, K1, n1, I1, K2, n2, I2, K3, n3, I3, A1, n4, K4, A2, n5, K5, A3, n6, K6, A4, n7, K7, Vr, p)
  Vf*r1*(K1^n1/(I1^n1 + K1^n1))*(K2^n2/(I2^n2 + K2^n2))*(K3^n3/(I3^n3 + K3^n3))*(A1^n4/(A1^n4 + K4^n4) + A2^n5/(A2^n5 + K5^n5) + A3^n6/(A3^n6 + K6^n6) + A4^n7/(A4^n7 + K7^n7)) - Vr*p;
end
function_11 is "1 Reactant, 3 Inhibitors, 4 Activators";

function function_5(Vf, r1, K1, n1, I1, K2, n2, I2, A1, n3, K3, A2, n4, K4, Vr, p)
  Vf*r1*(K1^n1/(I1^n1 + K1^n1))*(K2^n2/(I2^n2 + K2^n2))*(A1^n3/(A1^n3 + K3^n3) + A2^n4/(A2^n4 + K4^n4)) - Vr*p;
end
function_5 is "1 Reactant, 2 Inhibitors, 2 Activators";

function function_13(Vf, r1, K1, n1, I1, K2, n2, I2, A1, n3, K3, A2, n4, K4, A3, n5, K5, Vr, p)
  Vf*r1*(K1^n1/(I1^n1 + K1^n1))*(K2^n2/(I2^n2 + K2^n2))*(A1^n3/(A1^n3 + K3^n3) + A2^n4/(A2^n4 + K4^n4) + A3^n5/(A3^n5 + K5^n5)) - Vr*p;
end
function_13 is "1 Reactant, 2 Inhibitors, 3 Activators";

function function_15(Vf, r1, K, n, I, A1, n1, K1, Vr, p)
  Vf*r1*(K^n/(I^n + K^n))*(A1^n1/(A1^n1 + K1^n1)) - Vr*p;
end
function_15 is "1 Reactant, 1 inhibitor, 1 activator";

function Pool_coupling(V, pool, n, ext, k)
  V*(pool^n/(pool^n + ext^n + 0.001) - k*ext);
end

model MODEL1304230001()
  // Carbo2013 - Cytokine driven CD4+ T Cell differentiation and phenotype plasticity
  // CD4+ T cells can differentiate into different phenotypes depending on the cytokine milieu. Here a computational and mathematical model with sixty ordinary differential equations representing a CD4+ T cell differentiating into either Th1, Th2, Th17 or iTreg cells, has been constructed. The model includes cytokines, nuclear receptors and transcription factors that define fate and function of CD4+ T cells. Computational simulations illustrate how a proinflammatory Th17 cell can undergo reprogramming into an anti-inflammatory iTreg phenotype following PPARc activation.
  // This model is described in the article:
  // Systems Modeling of Molecular Mechanisms Controlling Cytokine-driven CD4+ T Cell Differentiation and Phenotype Plasticity.
  // Carbo A, Hontecillas R, Kronsteiner B, Viladomiu M, Pedragosa M, Lu P, Philipson CW, Hoops S, Marathe M, Eubank S, Bisset K, Wendelsdorf K, Jarrah A, Mei Y, Bassaganya-Riera J
  // PLoS Computational Biology [2013, 9(4):e1003027]
  // Abstract:
  // Differentiation of CD4+ T cells into effector or regulatory phenotypes is tightly controlled by the cytokine milieu, complex intracellular signaling networks and numerous transcriptional regulators. We combined experimental approaches and computational modeling to investigate the mechanisms controlling differentiation and plasticity of CD4+ T cells in the gut of mice. Our computational model encompasses the major intracellular pathways involved in CD4+ T cell differentiation into T helper 1 (Th1), Th2, Th17 and induced regulatory T cells (iTreg). Our modeling efforts predicted a critical role for peroxisome proliferator-activated receptor gamma (PPARγ) in modulating plasticity between Th17 and iTreg cells. PPARγ regulates differentiation, activation and cytokine production, thereby controlling the induction of effector and regulatory responses, and is a promising therapeutic target for dysregulated immune responses and inflammation. Our modeling efforts predict that following PPARγ activation, Th17 cells undergo phenotype switch and become iTreg cells. This prediction was validated by results of adoptive transfer studies showing an increase of colonic iTreg and a decrease of Th17 cells in the gut mucosa of mice with colitis following pharmacological activation of PPARγ. Deletion of PPARγ in CD4+ T cells impaired mucosal iTreg and enhanced colitogenic Th17 responses in mice with CD4+ T cell-induced colitis. Thus, for the first time we provide novel molecular evidence in vivo demonstrating that PPARγ in addition to regulating CD4+ T cell differentiation also plays a major role controlling Th17 and iTreg plasticity in the gut mucosa.
  // Author's comment: CD4+ T cell computational model (Version 1.4) Steady state corrected. There was a problem in the internalization of IL-17 in its mathematical function.
  // This model is hosted on BioModels Database and identified by: MODEL1304230001 .
  // To cite BioModels Database, please use: BioModels Database: An enhanced, curated and annotated resource for published quantitative kinetic models .
  // To the extent possible under law, all copyright and related or neighbouring rights to this encoded model have been dedicated to the public domain worldwide. Please refer to CC0 Public Domain Dedication for more information.
  // biomodels.db:MODEL1304230001
  // biomodels.db:BIOMD0000000451
  // isDescribedBy pubmed:23592971
  // isVersionOf GO:0030217 GO:0045222
  // hasProperty mamo:MAMO_0000046
  // occursIn BTO:0000545

  // Compartments:
  compartment default = 1;  // isVersionOf GO:0005623
  compartment T_Helper_Cell = 1;  // isVersionOf BTO:0002417

  // Species:
  species eIFNg in default = IFNg_pool_default;  // isVersionOf uniprot:P01580
  species eIL12 in default = IL12_pool_default;  // hasPart uniprot:P43431 uniprot:P43432
  species eIL21 in default = IL21_pool_default;  // isVersionOf uniprot:Q9ES17
  species eIL23 in default = IL23_pool_default;  // isVersionOf uniprot:Q9EQ14
  species eIL4 in default = IL4_pool_default;  // isVersionOf uniprot:P07750
  species eTGFb in default = TGFb_pool_default;  // isVersionOf uniprot:P04202
  species eIL2 in default = IL2_pool_default;  // isVersionOf uniprot:P04351
  species eIL6 in default = IL6_pool_default;  // isVersionOf uniprot:P08505
  species eIL17 in default = IL17_pool_default;  // isVersionOf interpro:IPR010345
  species eIL10 in default = IL10_pool_default;  // isVersionOf uniprot:P18893
  species eIL18 in default = IL18_pool_default;  // isVersionOf uniprot:P70380
  species $anti_IL4 in default = 1; anti_IL4 is "anti-IL4";  // isVersionOf FMA:62871
  species $anti_IFNg in default = 1; anti_IFNg is "anti-IFNg";  // isVersionOf FMA:62871
  species $pIL4 in default = 1;  // isVersionOf uniprot:P07750
  species $IL18_pool_default in default = 0;  // isVersionOf uniprot:P70380
  species $IL12_pool_default in default = 0;  // hasPart uniprot:P43432 uniprot:P43431
  species $IFNg_pool_default in default = 0;  // isVersionOf uniprot:P01580
  species $IL21_pool_default in default = 0;  // isVersionOf uniprot:Q9ES17
  species $IL23_pool_default in default = 0;  // isVersionOf uniprot:Q9EQ14
  species $IL17_pool_default in default = 0;  // isVersionOf interpro:IPR010345
  species $IL10_pool_default in default = 0;  // isVersionOf uniprot:P18893
  species $IL6_pool_default in default = 1;  // isVersionOf uniprot:P08505
  species $IL2_pool_default in default = 0;  // isVersionOf uniprot:P04351
  species $TGFb_pool_default in default = 1;  // isVersionOf uniprot:P04202
  species $IL4_pool_default in default = 0;  // isVersionOf uniprot:P07750
  species $pIL10 in default = 1;  // isVersionOf uniprot:P18893
  species IL6_IL6R in T_Helper_Cell = 0; IL6_IL6R is "IL6-IL6R";  // hasPart uniprot:P08505 uniprot:P22272 uniprot:Q00560
  species IL6R in T_Helper_Cell = 1;  // hasPart uniprot:P22272 uniprot:Q00560
  species IL6 in T_Helper_Cell = 0;  // isVersionOf uniprot:P08505
  species TGFb_TGFbR in T_Helper_Cell = 0; TGFb_TGFbR is "TGFb-TGFbR";  // hasPart uniprot:P04202 uniprot:Q64729
  species TGFbR in T_Helper_Cell = 1;  // isVersionOf uniprot:Q64729
  species TGFb in T_Helper_Cell = 0;  // isVersionOf uniprot:P04202
  species IL2_IL2R in T_Helper_Cell = 0; IL2_IL2R is "IL2-IL2R";  // hasPart uniprot:P04351 uniprot:P01590
  species IL2R in T_Helper_Cell = 1;  // isVersionOf uniprot:P01590
  species IL2 in T_Helper_Cell = 0;  // isVersionOf uniprot:P04351
  species IL4_IL4R in T_Helper_Cell = 0; IL4_IL4R is "IL4-IL4R";  // hasPart uniprot:P07750 uniprot:P16382
  species IL4R in T_Helper_Cell = 1;  // isVersionOf uniprot:P16382
  species IL4 in T_Helper_Cell = 0;  // isVersionOf uniprot:P07750
  species IFNg_IFNgR in T_Helper_Cell = 0; IFNg_IFNgR is "IFNg-IFNgR";  // hasPart uniprot:P01580 uniprot:P15261
  species IFNgR in T_Helper_Cell = 1;  // isVersionOf uniprot:P15261
  species IL12_IL12R in T_Helper_Cell = 0; IL12_IL12R is "IL12-IL12R";  // hasPart uniprot:P43432 uniprot:P43431 uniprot:Q60837 uniprot:P97378
  species IL12R in T_Helper_Cell = 1;  // hasPart uniprot:Q60837 uniprot:P97378
  species IL12 in T_Helper_Cell = 0;  // isVersionOf uniprot:P43431 uniprot:P43432
  species IL18_IL18R in T_Helper_Cell = 0; IL18_IL18R is "IL18-IL18R";  // hasPart uniprot:P70380 uniprot:Q61098
  species IL18R in T_Helper_Cell = 1;  // isVersionOf uniprot:Q61098
  species IL18 in T_Helper_Cell = 0;  // isVersionOf uniprot:P70380
  species IL21 in T_Helper_Cell = 0;  // isVersionOf uniprot:Q9ES17
  species IL21_IL21R in T_Helper_Cell = 0; IL21_IL21R is "IL21-IL21R";  // hasPart uniprot:Q9ES17 uniprot:Q9JHX3
  species IL21R in T_Helper_Cell = 1;  // isVersionOf uniprot:Q9JHX3
  species IL23R in T_Helper_Cell = 1;  // isVersionOf uniprot:Q8K4B4
  species IL23_IL23R in T_Helper_Cell = 0; IL23_IL23R is "IL23-IL23R";  // hasPart uniprot:Q9EQ14 uniprot:Q8K4B4
  species IL10R in T_Helper_Cell = 1;  // hasPart uniprot:Q61727 uniprot:Q61190
  species IL10_IL10R in T_Helper_Cell = 0; IL10_IL10R is "IL10-IL10R";  // hasPart uniprot:P18893 uniprot:Q61727 uniprot:Q61190
  species $IRAK1 in T_Helper_Cell = 0.5;  // isVersionOf uniprot:Q62406
  species IRAK1_P in T_Helper_Cell = 0; IRAK1_P is "IRAK1-P";  // isVersionOf uniprot:Q62406; hasProperty PATO:0002220
  species p50_p65_dimer in T_Helper_Cell = 0; p50_p65_dimer is "p50/p65 dimer";  // isVersionOf uniprot:P25799
  species $STAT4 in T_Helper_Cell = 1;  // isVersionOf uniprot:P42228
  species STAT4_P in T_Helper_Cell = 0; STAT4_P is "STAT4-P";  // isVersionOf uniprot:P42228; hasProperty PATO:0002220
  species IFNg in T_Helper_Cell = 0;  // isVersionOf uniprot:P01580
  species $JAK1 in T_Helper_Cell = 0.5;  // isVersionOf uniprot:P52332
  species JAK1_P in T_Helper_Cell = 0; JAK1_P is "JAK1-P";  // isVersionOf uniprot:P52332; hasProperty PATO:0002220
  species $STAT1 in T_Helper_Cell = 1;  // isVersionOf uniprot:P42225
  species STAT1_P in T_Helper_Cell = 0; STAT1_P is "STAT1-P";  // isVersionOf uniprot:P42225; hasProperty PATO:0002220
  species p40_p19_dimer in T_Helper_Cell = 0; p40_p19_dimer is "p40/p19 dimer";  // hasPart uniprot:Q9EQ14 uniprot:P43432
  species IL17 in T_Helper_Cell = 0;  // isVersionOf interpro:IPR010345
  species IL10 in T_Helper_Cell = 0;  // isVersionOf uniprot:P18893
  species $RORgt in T_Helper_Cell = 1;  // isVersionOf uniprot:P51450
  species RORgt_ligand in T_Helper_Cell = 0; RORgt_ligand is "RORgt-ligand";  // hasPart uniprot:P51450
  species STAT3_P in T_Helper_Cell = 0; STAT3_P is "STAT3-P";  // isVersionOf uniprot:P42227; hasProperty PATO:0002220
  species $STAT3 in T_Helper_Cell = 1;  // isVersionOf uniprot:P42227
  species STAT5_P in T_Helper_Cell = 0; STAT5_P is "STAT5-P";  // isVersionOf uniprot:P42230; hasProperty PATO:0002220
  species $STAT5 in T_Helper_Cell = 1;  // isVersionOf uniprot:P42230
  species $FOXP3 in T_Helper_Cell = 1;  // isVersionOf uniprot:Q99JB6
  species $SOCS1 in T_Helper_Cell = 1;  // isVersionOf uniprot:O35716
  species SOCS1_JAKs in T_Helper_Cell = 0; SOCS1_JAKs is "SOCS1-JAKs";  // hasPart uniprot:O35716 uniprot:P52332
  species Tbet_P in T_Helper_Cell = 0; Tbet_P is "Tbet-P";  // isVersionOf uniprot:Q5PSB0; hasProperty PATO:0002220
  species $Tbet in T_Helper_Cell = 1;  // isVersionOf uniprot:Q5PSB0
  species $GATA3 in T_Helper_Cell = 1;  // isVersionOf uniprot:P23772
  species GATA3_P in T_Helper_Cell = 0; GATA3_P is "GATA3-P";  // isVersionOf uniprot:P23772; hasProperty PATO:0002220
  species STAT6_P in T_Helper_Cell = 0; STAT6_P is "STAT6-P";  // isVersionOf uniprot:P52633; hasProperty PATO:0002220
  species $STAT6 in T_Helper_Cell = 1;  // isVersionOf uniprot:P52633
  species PPARg in T_Helper_Cell = 0.08;  // isVersionOf uniprot:Q6GU14
  species L_PPARg in T_Helper_Cell = 0; L_PPARg is "L-PPARg";  // hasPart uniprot:Q6GU14
  species $Ligand in T_Helper_Cell = 1;
  species acetylated_FOXP3 in T_Helper_Cell = 0;  // isVersionOf uniprot:Q99JB6
  species $p19 in T_Helper_Cell = 1;  // isVersionOf uniprot:Q9EQ14
  species $p40 in T_Helper_Cell = 1;  // isVersionOf uniprot:P43432
  species $p50 in T_Helper_Cell = 0.5;  // isPartOf uniprot:P25799
  species $p65 in T_Helper_Cell = 0.5;  // isVersionOf uniprot:Q04207
  species IL17R_T_Helper_Cell in T_Helper_Cell = 1;  // isVersionOf uniprot:Q60943
  species IL17_IL17R in T_Helper_Cell = 0; IL17_IL17R is "IL17-IL17R";  // hasPart uniprot:Q60943 interpro:IPR010345
  species $pIFNg in T_Helper_Cell = 1;  // isVersionOf uniprot:P01580
  species $pIL21 in T_Helper_Cell = 1;  // isVersionOf uniprot:Q9ES17
  species $pIL17 in T_Helper_Cell = 1;  // isVersionOf interpro:IPR010345

  // Parameters:
  Hill_Coeficient = 2;
  BActin = 0.008506078;
  var FOXP3R;
  var IL17R;
  Initial_for_BActin = BActin;

  // Assignment rules:
  FOXP3R := acetylated_FOXP3/Initial_for_BActin;
  IL17R := IL17/Initial_for_BActin;

  // Reactions:
  re2: eIL18 + IL18R -> IL18_IL18R; _2_Reactants_1_Inhibitor(re2_Vf, eIL18, IL18R, re2_K, Hill_Coeficient, STAT6_P, re2_Vr, IL18_IL18R);  // modifiers: STAT6_P
    re2_Vf = 0.1; re2_K = 0.138094; re2_Vr = 0.1;
  re3: $IRAK1 -> IRAK1_P; T_Helper_Cell*_1_Reactant_1_Activator(re3_Vf, IRAK1, IL18_IL18R, Hill_Coeficient, re3_K, re3_Vr, IRAK1_P);  // modifiers: IL18_IL18R
    re3_Vf = 0.1; re3_K = 2.01676; re3_Vr = 0.1;
  re6: IL12 => eIL12; re6_k1*IL12;
    re6_k1 = 0.1;
  re8: eIL12 + IL12R -> IL12_IL12R; _2_Reactants_2_Inhibitors(re8_Vf, eIL12, IL12R, re8_K1, Hill_Coeficient, STAT6_P, re8_K2, Hill_Coeficient, L_PPARg, re8_Vr, IL12_IL12R);  // modifiers: STAT6_P, L_PPARg
    re8_Vf = 0.1; re8_K1 = 2.94611; re8_K2 = 0.743847; re8_Vr = 0.1;
  re9: $p50 + $p65 -> p50_p65_dimer; T_Helper_Cell*function_4(re9_Vf, re9_K1, Hill_Coeficient, L_PPARg, re9_K2, Hill_Coeficient, acetylated_FOXP3, IRAK1_P, Hill_Coeficient, re9_K3, re9_Vr, p50_p65_dimer, p50, p65);  // modifiers: L_PPARg, acetylated_FOXP3, IRAK1_P
    re9_Vf = 0.1; re9_K1 = 0.1; re9_K2 = 98.9482; re9_K3 = 0.0539426; re9_Vr = 0.1;
  re10: $STAT4 -> STAT4_P; T_Helper_Cell*function_5(re10_Vf, STAT4, re10_K1, Hill_Coeficient, IL21_IL21R, re10_K2, Hill_Coeficient, GATA3_P, IL12_IL12R, Hill_Coeficient, re10_K3, IL23_IL23R, Hill_Coeficient, re10_K4, re10_Vr, STAT4_P);  // modifiers: IL21_IL21R, GATA3_P, IL12_IL12R, IL23_IL23R
    re10_Vf = 0.1; re10_K1 = 0.125481; re10_K2 = 0.896854; re10_K3 = 0.031433; re10_K4 = 66.6168; re10_Vr = 0.1;
  re11: eIFNg + IFNgR -> IFNg_IFNgR; _2_Reactants_1_Inhibitor(re11_Vf, eIFNg, IFNgR, re11_K, Hill_Coeficient, SOCS1_JAKs, re11_Vr, IFNg_IFNgR);  // modifiers: SOCS1_JAKs
    re11_Vf = 0.1; re11_K = 0.263953; re11_Vr = 0.1;
  re12: IFNg => eIFNg; re12_k1*IFNg;
    re12_k1 = 0.1;
  re13: $STAT1 -> STAT1_P; T_Helper_Cell*function_6(re13_Vf, STAT1, re13_K, Hill_Coeficient, L_PPARg, IL21_IL21R, Hill_Coeficient, re13_K1, IFNg_IFNgR, Hill_Coeficient, re13_K2, JAK1_P, Hill_Coeficient, re13_K3, re13_Vr, STAT1_P);  // modifiers: L_PPARg, IL21_IL21R, IFNg_IFNgR, JAK1_P
    re13_Vf = 0.1; re13_K = 0.1; re13_K1 = 5.04432; re13_K2 = 0.0705365; re13_K3 = 14.9778; re13_Vr = 0.1;
  re14: $pIFNg -> IFNg; T_Helper_Cell*function_7(re14_Vf, pIFNg, re14_K1, Hill_Coeficient, anti_IFNg, re14_K2, Hill_Coeficient, STAT3_P, re14_K3, Hill_Coeficient, L_PPARg, STAT4_P, Hill_Coeficient, re14_K4, p50_p65_dimer, Hill_Coeficient, re14_K5, Tbet_P, Hill_Coeficient, re14_K6, re14_Vr, IFNg);  // modifiers: anti_IFNg, STAT3_P, L_PPARg, STAT4_P, p50_p65_dimer, Tbet_P
    re14_Vf = 0.1; re14_K1 = 0.501917; re14_K2 = 0.812366; re14_K3 = 0.1; re14_K4 = 0.001477; re14_K5 = 100; re14_K6 = 0.230841; re14_Vr = 0.1;
  re15: $Tbet -> Tbet_P; T_Helper_Cell*function_13(re15_Vf, Tbet, re15_K1, Hill_Coeficient, TGFb_TGFbR, re15_K2, Hill_Coeficient, STAT3_P, STAT4_P, Hill_Coeficient, re15_K3, STAT1_P, Hill_Coeficient, re15_K4, Tbet_P, Hill_Coeficient, re15_K5, re15_Vr, Tbet_P);  // modifiers: TGFb_TGFbR, STAT3_P, STAT4_P, STAT1_P
    re15_Vf = 0.1; re15_K1 = 0.916783; re15_K2 = 1.33537; re15_K3 = 3.58849; re15_K4 = 0.727962; re15_K5 = 6.97805; re15_Vr = 0.1;
  re16: $JAK1 -> JAK1_P; T_Helper_Cell*function_8(re16_Vf, JAK1, re16_K1, Hill_Coeficient, L_PPARg, re16_K2, Hill_Coeficient, SOCS1_JAKs, IFNg_IFNgR, Hill_Coeficient, re16_K3, re16_Vr, JAK1_P);  // modifiers: L_PPARg, SOCS1_JAKs, IFNg_IFNgR
    re16_Vf = 0.1; re16_K1 = 0.1; re16_K2 = 0.004433; re16_K3 = 99.987; re16_Vr = 0.1;
  re17: $SOCS1 -> SOCS1_JAKs; T_Helper_Cell*_1_Reactant_2_Activators(re17_Vf, SOCS1, STAT1_P, Hill_Coeficient, re17_K1, Tbet_P, Hill_Coeficient, re17_K2, re17_Vr, SOCS1_JAKs);  // modifiers: STAT1_P, Tbet_P
    re17_Vf = 0.1; re17_K1 = 7.83763; re17_K2 = 0.667462; re17_Vr = 0.1;
  re18: IL4 => eIL4; re18_k1*IL4;
    re18_k1 = 0.1;
  re19: eIL4 + IL4R -> IL4_IL4R; _2_Reactants_1_Inhibitor(re19_Vf, eIL4, IL4R, re19_K, Hill_Coeficient, SOCS1_JAKs, re19_Vr, IL4_IL4R);  // modifiers: SOCS1_JAKs
    re19_Vf = 0.1; re19_K = 13.0657; re19_Vr = 0.1;
  re20: $pIL4 -> IL4; function_13(re20_Vf, pIL4, re20_K1, Hill_Coeficient, STAT1_P, re20_K2, Hill_Coeficient, anti_IL4, IL4, Hill_Coeficient, re20_K3, GATA3_P, Hill_Coeficient, re20_K4, STAT5_P, Hill_Coeficient, re20_K5, re20_Vr, IL4);  // modifiers: STAT1_P, anti_IL4, GATA3_P, STAT5_P
    re20_Vf = 0.1; re20_K1 = 0.210399; re20_K2 = 56.3452; re20_K3 = 98.0373; re20_K4 = 0.855534; re20_K5 = 4.32731; re20_Vr = 0.1;
  re23: $GATA3 -> GATA3_P; T_Helper_Cell*function_10(re23_Vf, GATA3, re23_K1, Hill_Coeficient, Tbet_P, re23_K2, Hill_Coeficient, STAT3_P, re23_K3, Hill_Coeficient, TGFb_TGFbR, STAT6_P, Hill_Coeficient, re23_K4, L_PPARg, Hill_Coeficient, re23_K5, re23_Vr, GATA3_P);  // modifiers: Tbet_P, STAT3_P, TGFb_TGFbR, STAT6_P, L_PPARg
    re23_Vf = 0.1; re23_K1 = 0.199351; re23_K2 = 9.61521; re23_K3 = 0.214012; re23_K4 = 0.321065; re23_K5 = 0.1; re23_Vr = 0.1;
  re24: $STAT6 -> STAT6_P; T_Helper_Cell*function_15(re24_Vf, STAT6, re24_K, Hill_Coeficient, IFNg_IFNgR, IL4_IL4R, n1, re24_K1, re24_Vr, STAT6_P);  // modifiers: IFNg_IFNgR, IL4_IL4R
    re24_Vf = 0.1; re24_K = 0.1; n1 = 0.004304; re24_K1 = 0.1; re24_Vr = 0.1;
  re25: eIL2 + IL2R -> IL2_IL2R; re25_k1*eIL2*IL2R - re25_k2*IL2_IL2R;
    re25_k1 = 0.1; re25_k2 = 0.1;
  re26: $STAT5 -> STAT5_P; T_Helper_Cell*_1_Reactant_1_Activator(re26_Vf, STAT5, IL2_IL2R, Hill_Coeficient, re26_K, re26_Vr, STAT5_P);  // modifiers: IL2_IL2R
    re26_Vf = 0.1; re26_K = 0.374591; re26_Vr = 0.1;
  re27: $FOXP3 -> acetylated_FOXP3; T_Helper_Cell*function_11(re27_Vf, FOXP3, re27_K1, Hill_Coeficient, STAT6_P, re27_K2, Hill_Coeficient, STAT3_P, re27_K3, Hill_Coeficient, IL6_IL6R, TGFb_TGFbR, Hill_Coeficient, re27_K4, STAT1_P, Hill_Coeficient, re27_K5, STAT5_P, Hill_Coeficient, re27_K6, L_PPARg, Hill_Coeficient, K7, re27_Vr, acetylated_FOXP3);  // modifiers: STAT6_P, STAT3_P, IL6_IL6R, TGFb_TGFbR, STAT1_P, STAT5_P, L_PPARg
    re27_Vf = 0.1; re27_K1 = 100; re27_K2 = 0.354892; re27_K3 = 1.31281; re27_K4 = 0.000679025; re27_K5 = 2.07945; re27_K6 = 100; K7 = 1.93254e-7; re27_Vr = 0.1;
  re28: eTGFb + TGFbR -> TGFb_TGFbR; re28_k1*eTGFb*TGFbR - re28_k2*TGFb_TGFbR;
    re28_k1 = 0.1; re28_k2 = 0.1;
  re29: eIL6 + IL6R -> IL6_IL6R; re29_k1*eIL6*IL6R - re29_k2*IL6_IL6R;
    re29_k1 = 0.1; re29_k2 = 0.1;
  re30: $STAT3 -> STAT3_P; T_Helper_Cell*function_12(re30_Vf, STAT3, re30_K, Hill_Coeficient, L_PPARg, IL21_IL21R, Hill_Coeficient, re30_K1, IL23_IL23R, Hill_Coeficient, re30_K2, IL10_IL10R, Hill_Coeficient, re30_K3, IL6_IL6R, Hill_Coeficient, re30_K4, re30_Vr, STAT3_P);  // modifiers: L_PPARg, IL21_IL21R, IL23_IL23R, IL10_IL10R, IL6_IL6R
    re30_Vf = 0.1; re30_K = 0.1; re30_K1 = 0.636796; re30_K2 = 39.018; re30_K3 = 2.26986; re30_K4 = 0.137545; re30_Vr = 0.1;
  re31: $RORgt -> RORgt_ligand; T_Helper_Cell*function_5(re31_Vf, RORgt, re31_K1, Hill_Coeficient, acetylated_FOXP3, re31_K2, Hill_Coeficient, L_PPARg, STAT3_P, Hill_Coeficient, re31_K3, TGFb_TGFbR, Hill_Coeficient, re31_K4, re31_Vr, RORgt_ligand);  // modifiers: acetylated_FOXP3, L_PPARg, STAT3_P, TGFb_TGFbR
    re31_Vf = 0.2249; re31_K1 = 9722.09; re31_K2 = 0.703778; re31_K3 = 1.24123; re31_K4 = 997.263; re31_Vr = 0.1;
  re32: eIL21 + IL21R -> IL21_IL21R; function_14(re32_Vf, eIL21, IL21R, re32_K, Hill_Coeficient, STAT5_P, IL17_IL17R, Hill_Coeficient, re32_K1, re32_Vr, IL21_IL21R);  // modifiers: STAT5_P, IL17_IL17R
    re32_Vf = 0.1; re32_K = 0.240705; re32_K1 = 8.14189; re32_Vr = 0.1;
  re33: IL21 => eIL21; re33_k1*IL21;
    re33_k1 = 0.1;
  re34: eIL23 -> p40_p19_dimer; re34_k1*eIL23 - re34_k2*p40_p19_dimer;
    re34_k1 = 0.1; re34_k2 = 0.1;
  re35: p40_p19_dimer + IL23R -> IL23_IL23R; T_Helper_Cell*_2_Reactants_1_Inhibitor(re35_Vf, p40_p19_dimer, IL23R, re35_K, Hill_Coeficient, Tbet_P, re35_Vr, IL23_IL23R);  // modifiers: Tbet_P
    re35_Vf = 0.1; re35_K = 4.66107; re35_Vr = 0.1;
  re36: $p40 + $p19 -> p40_p19_dimer; T_Helper_Cell*function_14(re36_Vf, p40, p19, re36_K, Hill_Coeficient, L_PPARg, IL6_IL6R, Hill_Coeficient, re36_K1, re36_Vr, p40_p19_dimer);  // modifiers: L_PPARg, IL6_IL6R
    re36_Vf = 0.1; re36_K = 0.1; re36_K1 = 25.5354; re36_Vr = 0.1;
  re37: $pIL21 -> IL21; T_Helper_Cell*_1_Reactant_1_Activator(re37_Vf, pIL21, STAT3_P, Hill_Coeficient, re37_K, re37_Vr, IL21);  // modifiers: STAT3_P
    re37_Vf = 0.1; re37_K = 0.118892; re37_Vr = 0.1;
  re38: eIL10 + IL10R -> IL10_IL10R; re38_k1*eIL10*IL10R - re38_k2*IL10_IL10R;
    re38_k1 = 0.1; re38_k2 = 0.1;
  re42: PPARg + $Ligand -> L_PPARg; T_Helper_Cell*function_14(re42_Vf, PPARg, Ligand, re42_K, Hill_Coeficient, IFNg_IFNgR, IL4_IL4R, Hill_Coeficient, re42_K1, re42_Vr, L_PPARg);  // modifiers: IFNg_IFNgR, IL4_IL4R
    re42_Vf = 0.1; re42_K = 0.1; re42_K1 = 0.1; re42_Vr = 0.1;
  re44: TGFb => eTGFb; re44_k1*TGFb;
    re44_k1 = 0.1;
  re45: IL2 => eIL2; re45_k1*IL2;
    re45_k1 = 0.1;
  re46: IL6 => eIL6; re46_k1*IL6;
    re46_k1 = 0.1;
  re48: IL10 => eIL10; re48_k1*IL10;
    re48_k1 = 0.1;
  re49: IL17 => eIL17; re49_k1*IL17;
    re49_k1 = 0.1;
  re50: eIL17 + IL17R_T_Helper_Cell -> IL17_IL17R; re50_k1*eIL17*IL17R_T_Helper_Cell - re50_k2*IL17_IL17R;
    re50_k1 = 0.184881; re50_k2 = 0.1896;
  re47: IL18 => eIL18; re47_k1*IL18;
    re47_k1 = 0.1;
  re51: $pIL17 -> IL17; T_Helper_Cell*function_6(re51_Vf, pIL17, re51_K, Hill_Coeficient, L_PPARg, IL23_IL23R, Hill_Coeficient, re51_K1, RORgt_ligand, Hill_Coeficient, re51_K2, STAT4_P, Hill_Coeficient, re51_K3, re51_Vr, IL17);  // modifiers: L_PPARg, IL23_IL23R, RORgt_ligand, STAT4_P
    re51_Vf = 0.225095; re51_K = 0.1; re51_K1 = 1.62893; re51_K2 = 0.526832; re51_K3 = 5.47889; re51_Vr = 0.1;
  IL18_pool: $IL18_pool_default -> eIL18; default*Pool_coupling(IL18_pool_V, IL18_pool_default, Hill_Coeficient, eIL18, IL18_pool_k);
    IL18_pool_V = 0.1; IL18_pool_k = 0.5;
  IL12_pool: $IL12_pool_default -> eIL12; default*Pool_coupling(IL12_pool_V, IL12_pool_default, Hill_Coeficient, eIL12, IL12_pool_k);
    IL12_pool_V = 0.1; IL12_pool_k = 0.5;
  IFNg_pool: $IFNg_pool_default -> eIFNg; default*Pool_coupling(IFNg_pool_V, IFNg_pool_default, Hill_Coeficient, eIFNg, IFNg_pool_k);
    IFNg_pool_V = 0.1; IFNg_pool_k = 0.1;
  IL21_pool: $IL21_pool_default -> eIL21; default*Pool_coupling(IL21_pool_V, IL21_pool_default, Hill_Coeficient, eIL21, IL21_pool_k);
    IL21_pool_V = 0.1; IL21_pool_k = 0.1;
  IL23_pool: $IL23_pool_default -> eIL23; default*Pool_coupling(IL23_pool_V, IL23_pool_default, Hill_Coeficient, eIL23, IL23_pool_k);
    IL23_pool_V = 0.1; IL23_pool_k = 0.1;
  IL17_pool: $IL17_pool_default -> IL17; Pool_coupling(IL17_pool_V, IL17_pool_default, Hill_Coeficient, IL17, IL17_pool_k);
    IL17_pool_V = 0.1; IL17_pool_k = 0.1;
  IL10_pool: $IL10_pool_default -> eIL10; default*Pool_coupling(IL10_pool_V, IL10_pool_default, Hill_Coeficient, eIL10, IL10_pool_k);
    IL10_pool_V = 0.1; IL10_pool_k = 0.1;
  IL6_pool: $IL6_pool_default -> eIL6; default*Pool_coupling(IL6_pool_V, IL6_pool_default, Hill_Coeficient, eIL6, IL6_pool_k);
    IL6_pool_V = 0.1; IL6_pool_k = 0.1;
  IL2_pool: $IL2_pool_default -> eIL2; default*Pool_coupling(IL2_pool_V, IL2_pool_default, Hill_Coeficient, eIL2, IL2_pool_k);
    IL2_pool_V = 0.1; IL2_pool_k = 0.1;
  TGFb_pool: $TGFb_pool_default -> eTGFb; default*Pool_coupling(TGFb_pool_V, TGFb_pool_default, Hill_Coeficient, eTGFb, TGFb_pool_k);
    TGFb_pool_V = 0.1; TGFb_pool_k = 0.1;
  IL4_pool: $IL4_pool_default -> eIL4; default*Pool_coupling(IL4_pool_V, IL4_pool_default, Hill_Coeficient, eIL4, IL4_pool_k);
    IL4_pool_V = 0.1; IL4_pool_k = 0.1;
  re52: $pIL10 -> IL10; function_12(re52_Vf, pIL10, re52_K, Hill_Coeficient, IL23_IL23R, L_PPARg, Hill_Coeficient, re52_K1, IL21_IL21R, Hill_Coeficient, re52_K2, GATA3_P, Hill_Coeficient, re52_K3, STAT5_P, Hill_Coeficient, re52_K4, re52_Vr, IL10);  // modifiers: IL23_IL23R, L_PPARg, IL21_IL21R, GATA3_P, STAT5_P
    re52_Vf = 0.1; re52_K = 0.508159; re52_K1 = 0.1; re52_K2 = 0.00125893; re52_K3 = 0.645162; re52_K4 = 100; re52_Vr = 0.1;

  // Unit definitions:
  unit time = 3600 second;
end
