// SBML level 3 version 2

function Initiation_with_blocking_1_1(k, substrate1, substrate2, mRNA_tot, A1, B1, C1, D1, A2, B2, C2, D2, E2, F2, A3, B3, C3, D3, E3, F3, A4, B4, C4, D4, E4, F4, A5, B5, C5, D5, E5, F5, A6, B6, C6, D6, E6, F6, A7, B7, C7, D7, E7, F7, A8, B8, C8, D8, E8, F8, A9, B9, C9, D9, E9, F9, A10, B10, C10, D10, E10, F10, A11, B11, C11, D11, E11, F11, A12, B12, C12, D12, E12, F12, A13, B13, C13, D13, E13, F13, A14, B14, C14, D14, E14, F14, A15, B15, C15, D15, E15, F15)
  k*substrate1*substrate2*(mRNA_tot - (A1 + B1 + C1 + D1 + A2 + B2 + C2 + D2 + E2 + F2 + A3 + B3 + C3 + D3 + E3 + F3 + A4 + B4 + C4 + D4 + E4 + F4 + A5 + B5 + C5 + D5 + E5 + F5 + A6 + B6 + C6 + D6 + E6 + F6 + A7 + B7 + C7 + D7 + E7 + F7 + A8 + B8 + C8 + D8 + E8 + F8 + A9 + B9 + C9 + D9 + E9 + F9 + A10 + B10 + C10 + D10 + E10 + F10 + A11 + B11 + C11 + D11 + E11 + F11 + A12 + B12 + C12 + D12 + E12 + F12 + A13 + B13 + C13 + D13 + E13 + F13 + A14 + B14 + C14 + D14 + E14 + F14 + A15 + B15 + C15 + D15 + E15 + F15));
end
Initiation_with_blocking_1_1 is "Initiation with blocking [1] [1]";

function function_2(k, substrate, mRNA_tot, A1, B1, C1, D1, E1, F1, A2, B2, C2, D2, E2, F2, A3, B3, C3, D3, E3, F3, A4, B4, C4, D4, E4, F4, A5, B5, C5, D5, E5, F5, A6, B6, C6, D6, E6, F6, A7, B7, C7, D7, E7, F7, A8, B8, C8, D8, E8, F8, A9, B9, C9, D9, E9, F9, A10, B10, C10, D10, E10, F10, A11, B11, C11, D11, E11, F11, A12, B12, C12, D12, E12, F12, A13, B13, C13, D13, E13, F13, A14, B14, C14, D14, E14, F14, A15, B15, C15, D15, E15, F15)
  k*substrate*(mRNA_tot - (A1 + B1 + C1 + D1 + E1 + F1 + A2 + B2 + C2 + D2 + E2 + F2 + A3 + B3 + C3 + D3 + E3 + F3 + A4 + B4 + C4 + D4 + E4 + F4 + A5 + B5 + C5 + D5 + E5 + F5 + A6 + B6 + C6 + D6 + E6 + F6 + A7 + B7 + C7 + D7 + E7 + F7 + A8 + B8 + C8 + D8 + E8 + F8 + A9 + B9 + C9 + D9 + E9 + F9 + A10 + B10 + C10 + D10 + E10 + F10 + A11 + B11 + C11 + D11 + E11 + F11 + A12 + B12 + C12 + D12 + E12 + F12 + A13 + B13 + C13 + D13 + E13 + F13 + A14 + B14 + C14 + D14 + E14 + F14 + A15 + B15 + C15 + D15 + E15 + F15))/(mRNA_tot - (A1 + B1 + C1 + D1 + E1 + F1 + A2 + B2 + C2 + D2 + E2 + F2 + A3 + B3 + C3 + D3 + E3 + F3 + A4 + B4 + C4 + D4 + E4 + F4 + A5 + B5 + C5 + D5 + E5 + F5 + A6 + B6 + C6 + D6 + E6 + F6 + A7 + B7 + C7 + D7 + E7 + F7 + A8 + B8 + C8 + D8 + E8 + F8 + A9 + B9 + C9 + D9 + E9 + F9 + A10 + B10 + C10 + D10 + E10 + F10 + A11 + B11 + C11 + D11 + E11 + F11 + A12 + B12 + C12 + D12 + E12 + F12 + A13 + B13 + C13 + D13 + E13 + F13 + A14 + B14 + C14 + D14 + E14 + F14));
end
function_2 is "Translocation with blocking (interior) [1] [1]";

function function_3(k, substrate, mRNA_tot, A1, B1, C1, D1, E1, F1, A2, B2, C2, D2, E2, F2, A3, B3, C3, D3, E3, F3, A4, B4, C4, D4, E4, F4, A5, B5, C5, D5, E5, F5, A6, B6, C6, D6, E6, F6, A7, B7, C7, D7, E7, F7, A8, B8, C8, D8, E8, F8, A9, B9, C9, D9, E9, F9, A10, B10, C10, D10, E10, F10, A11, B11, C11, D11, E11, F11, A12, B12, C12, D12, E12, F12, A13, B13, C13, D13, E13, F13, A14, B14, C14, D14, E14, F14, A15, E15, F15)
  k*substrate*(mRNA_tot - (A1 + B1 + C1 + D1 + E1 + F1 + A2 + B2 + C2 + D2 + E2 + F2 + A3 + B3 + C3 + D3 + E3 + F3 + A4 + B4 + C4 + D4 + E4 + F4 + A5 + B5 + C5 + D5 + E5 + F5 + A6 + B6 + C6 + D6 + E6 + F6 + A7 + B7 + C7 + D7 + E7 + F7 + A8 + B8 + C8 + D8 + E8 + F8 + A9 + B9 + C9 + D9 + E9 + F9 + A10 + B10 + C10 + D10 + E10 + F10 + A11 + B11 + C11 + D11 + E11 + F11 + A12 + B12 + C12 + D12 + E12 + F12 + A13 + B13 + C13 + D13 + E13 + F13 + A14 + B14 + C14 + D14 + E14 + F14 + A15 + E15 + F15))/(mRNA_tot - (A1 + B1 + C1 + D1 + E1 + F1 + A2 + B2 + C2 + D2 + E2 + F2 + A3 + B3 + C3 + D3 + E3 + F3 + A4 + B4 + C4 + D4 + E4 + F4 + A5 + B5 + C5 + D5 + E5 + F5 + A6 + B6 + C6 + D6 + E6 + F6 + A7 + B7 + C7 + D7 + E7 + F7 + A8 + B8 + C8 + D8 + E8 + F8 + A9 + B9 + C9 + D9 + E9 + F9 + A10 + B10 + C10 + D10 + E10 + F10 + A11 + B11 + C11 + D11 + E11 + F11 + A12 + B12 + C12 + D12 + E12 + F12 + A13 + B13 + C13 + D13 + E13 + F13 + A14 + B14 + C14 + D14 + E14 + F14));
end
function_3 is "Translocation with blocking (for codon number (length(mRNA)-length(Ribosome)) [1] [1]";

model BIOMD0000000457()
  // Firczuk2013 - Eukaryotic mRNA translation machinery
  // This is a model of Saccharomyces cerevisiae mRNA translation which includes the initiation, elongation and termination phases. The model is for 20 condon mRNAs. The building of a multi-factor complex in initiation and also the different processes in elongation and termination are modelled in detail. The model takes into account that ribosomes cover more than one codon of mRNA so that the movement of ribosomes are effectively blocked by other ribosomes several codons downstream. It is assumed that 15 codons are occupied by each ribosome. This blocking effect is considered in reaction R18 in initiation and also reaction R26, the reaction where translocation of ribosomes takes place in elongation. The kinetic functions of these two reactions are based on MacDonald et al. 1968 and Heinrich & Rapaport 1980. All other kinetic functions follow mass-action kinetics. The concentrations of transfer RNA species (Met-tRNA, aa-tRNA and tRNA in the model) are kept constant, while the other species' concentrations can change in the course of the simulation. The model describes the translation of a short mRNA with 20 codons. Therefore, all reactions in the elongation cycle (R22, R23, R25, R26, R28 and R29) and the corresponding species are replicated accordingly to model the species with ribosomes bound at different positions. In summary, the model contains 165 different species and 141 reactions.
  // The value of the 56 rate constant parameters were estimated by fitting the model against a series of experimental data consisting of modulation of the various translation factors (Figures 2, 3 and S3). Overall the parameter estimation was carried out over 212 different data points (steady states).
  // This model is described in the article:
  // An in vivo control map for the eukaryotic mRNA translation machinery
  // Helena Firczuk, Shichina Kannambath, Jürgen Pahle, Amy Claydon, Robert Beynon, John Duncan, Hans Westerhoff, Pedro Mendes and John EG McCarthy
  // Molecular Systems Biology. 9:635
  // Abstract:
  // Rate control analysis defines the in vivo control map governing yeast protein synthesis and generates an extensively parameterized digital model of the translation pathway. Among other non-intuitive outcomes, translation demonstrates a high degree of functional modularity and comprises a non-stoichiometric combination of proteins manifesting functional convergence on a shared maximal translation rate. In exponentially growing cells, polypeptide elongation (eEF1A, eEF2, and eEF3) exerts the strongest control. The two other strong control points are recruitment of mRNA and tRNAi to the 40S ribosomal subunit (eIF4F and eIF2) and termination (eRF1; Dbp5). In contrast, factors that are found to promote mRNA scanning efficiency on a longer than-average 5′untranslated region (eIF1, eIF1A, Ded1, eIF2B, eIF3, and eIF5) exceed the levels required for maximal control. This is expected to allow the cell to minimize scanning transition times, particularly for longer 5′UTRs. The analysis reveals these and other collective adaptations of control shared across the factors, as well as features that reflect functional modularity and system robustness. Remarkably, gene duplication is implicated in the fine control of cellular protein synthesis.
  // This model is hosted on BioModels Database and identified by: BIOMD0000000457 .
  // To cite BioModels Database, please use: BioModels Database: An enhanced, curated and annotated resource for published quantitative kinetic models .
  // To the extent possible under law, all copyright and related or neighbouring rights to this encoded model have been dedicated to the public domain worldwide. Please refer to CC0 Public Domain Dedication for more information.
  // biomodels.db:MODEL1205190000
  // biomodels.db:BIOMD0000000457
  // isDescribedBy pubmed:23340841
  // hasTaxon taxonomy:4932
  // isVersionOf GO:0006412
  // model units - substance: substance, time: second, volume: volume, area: area, length: metre, extent: substance

  // Compartments:
  compartment cytoplasm = 4e-14 volume;  // GO:0005737

  // Species:
  species eIF2_GDP in cytoplasm = 1.175108e-6;  // hasPart CHEBI:17552 uniprot:P09064 uniprot:P20459 uniprot:P32481; isVersionOf GO:0005850
  species eIF2B in cytoplasm = 2.269174e-7;  // hasPart uniprot:P32502 uniprot:P14741 uniprot:P12754 uniprot:P09032; GO:0005851
  species eIF2_GDP_eIF2B in cytoplasm = 0;  // hasPart CHEBI:17552 uniprot:P32501 uniprot:P12754 uniprot:P09032
  species eIF2_GTP in cytoplasm = 0;  // isVersionOf GO:0005850; hasPart CHEBI:15996 uniprot:P32481 uniprot:P09064 uniprot:P20459
  species $Met_tRNA in cytoplasm = 2.593342e-5; Met_tRNA is "Met-tRNA";  // CHEBI:29173
  species eIF2_GTP_Met_tRNA in cytoplasm = 0; eIF2_GTP_Met_tRNA is "eIF2_GTP_Met-tRNA";  // hasPart CHEBI:15996 CHEBI:29173 GO:0044207 GO:0005850
  species eIF3 in cytoplasm = 9.319822e-7;  // hasPart uniprot:Q04067 uniprot:P32497 uniprot:P40217 uniprot:P06103; GO:0005852
  species eIF5 in cytoplasm = 8.104193e-7;  // uniprot:P38431
  species eIF3_eIF5 in cytoplasm = 0;  // hasPart uniprot:P32497 uniprot:P40217 uniprot:P38431 uniprot:P38249
  species eIF3_eIF5_eIF2_GTP_Met_tRNA in cytoplasm = 0; eIF3_eIF5_eIF2_GTP_Met_tRNA is "eIF3_eIF5_eIF2_GTP_Met-tRNA";  // hasPart CHEBI:15996 CHEBI:29173 uniprot:P32497 uniprot:P06103
  species eIF1 in cytoplasm = 1.539797e-6;  // uniprot:P32911
  species eIF1_eIF3_eIF5_eIF2_GTP_Met_tRNA in cytoplasm = 0; eIF1_eIF3_eIF5_eIF2_GTP_Met_tRNA is "eIF1_eIF3_eIF5_eIF2_GTP_Met-tRNA";  // hasPart CHEBI:29173 CHEBI:15996 uniprot:P32497 uniprot:P20459
  species _40S in cytoplasm = 7.698984e-6;  // GO:0015935
  species eIF1A in cytoplasm = 2.309695e-6;  // uniprot:P38912
  species _40S_eIF1A in cytoplasm = 0;  // hasPart uniprot:P38912 GO:0015935
  species _43S in cytoplasm = 0;  // GO:0016282
  species eIF4E in cytoplasm = 3.241677e-6;  // uniprot:P07260
  species eIF4G in cytoplasm = 8.914613e-7;  // hasPart uniprot:P39935 uniprot:P39936
  species eIF4E_eIF4G in cytoplasm = 0;  // hasPart uniprot:P39935 uniprot:P39936 uniprot:P07260
  species mRNA_cap in cytoplasm = mRNA_tot;  // hasPart CHEBI:33699; isVersionOf SO:0000862
  species Pab1 in cytoplasm = 1.782923e-6;  // uniprot:P04147
  species mRNA_Pab1 in cytoplasm = 0;  // hasPart CHEBI:33699 uniprot:P04147
  species eIF4E_eIF4G_mRNA_Pab1 in cytoplasm = 0;  // hasPart CHEBI:33699 uniprot:P39936 uniprot:P04147 uniprot:P39935
  species eIF4A in cytoplasm = 9.725032e-6;  // uniprot:P10081
  species eIF4B in cytoplasm = 1.134587e-6;  // uniprot:P34167
  species eIF4A_eIF4B in cytoplasm = 0;  // hasPart uniprot:P10081 uniprot:P34167
  species species_27 in cytoplasm = 0; species_27 is "eIF4E_eIF4G_mRNA_Pab1_eIF4A_eIF4B";  // hasPart CHEBI:33699 uniprot:P10081 uniprot:P39935 uniprot:P34167
  species _48S in cytoplasm = 0;  // GO:0033290
  species Ded1 in cytoplasm = 1.134587e-6;  // uniprot:P06634
  species _48S_Ded1 in cytoplasm = 0;  // hasPart uniprot:P06634 GO:0033290
  species eIF5B_GDP in cytoplasm = 1.945006e-7;  // hasPart CHEBI:17552 uniprot:P39730
  species eIF5B_GTP in cytoplasm = 0;  // hasPart CHEBI:15996 uniprot:P39730
  species _48S_Ded1_eIF5B_GTP in cytoplasm = 0;  // hasPart CHEBI:15996 uniprot:P06634 uniprot:P39730 GO:0033290
  species _60S in cytoplasm = 7.698983e-6;  // GO:0015934
  species eEF1A_GDP in cytoplasm = 4.052097e-5;  // hasPart CHEBI:17552 uniprot:P02994 GO:0005853
  species eEF1B in cytoplasm = 3.201156e-6;  // hasPart uniprot:P32471 uniprot:P29547 uniprot:P36008 GO:0005853
  species eEF1A_GDP_eEF1B in cytoplasm = 0;  // hasPart CHEBI:17552 uniprot:P02994 uniprot:P32471 uniprot:P29547; isPartOf GO:0005853
  species eEF1A_GTP in cytoplasm = 0;  // hasPart CHEBI:15996 uniprot:P02994; isPartOf GO:0005853
  species $aa_tRNA in cytoplasm = 0.0005186684; aa_tRNA is "aa-tRNA";  // CHEBI:2651
  species aa_tRNA_eEF1A_GTP in cytoplasm = 0; aa_tRNA_eEF1A_GTP is "aa-tRNA_eEF1A_GTP";  // hasPart CHEBI:15996 CHEBI:2651 uniprot:P02994
  species eEF2_GDP in cytoplasm = 5.672935e-6;  // hasPart CHEBI:17552 uniprot:P32324
  species eEF2_GTP in cytoplasm = 0;  // hasPart CHEBI:15996 uniprot:P32324
  species eEF3_GDP in cytoplasm = 4.457306e-6;  // hasPart CHEBI:17552 uniprot:P16521
  species eEF3_GTP in cytoplasm = 0;  // hasPart CHEBI:15996 uniprot:P16521
  species $tRNA in cytoplasm = 0.0002593337;  // CHEBI:17843
  species _80S_1 in cytoplasm = 0;  // hasPart GO:0022626; GO:0070992
  species _80S_aa_tRNA_eEF1A_GTP_1 in cytoplasm = 0; _80S_aa_tRNA_eEF1A_GTP_1 is "80S_aa-tRNA_eEF1A_GTP_1";  // hasPart CHEBI:2651 CHEBI:15996 uniprot:P02994 GO:0022626
  species _80S_aa_tRNA_1 in cytoplasm = 0; _80S_aa_tRNA_1 is "80S_aa-tRNA_1";  // hasPart CHEBI:2651 GO:0022626
  species _80S_aa_tRNA_eEF2_GTP_1 in cytoplasm = 0; _80S_aa_tRNA_eEF2_GTP_1 is "80S_aa-tRNA_eEF2_GTP_1";  // hasPart CHEBI:2651 CHEBI:15996 uniprot:P32324
  species _80S_2 in cytoplasm = 0;  // hasPart GO:0022626
  species _80S_aa_tRNA_eEF1A_GTP_2 in cytoplasm = 0; _80S_aa_tRNA_eEF1A_GTP_2 is "80S_aa-tRNA_eEF1A_GTP_2";  // hasPart CHEBI:2651 CHEBI:15996 uniprot:P02994 GO:0022626
  species _80S_aa_tRNA_2 in cytoplasm = 0; _80S_aa_tRNA_2 is "80S_aa-tRNA_2";  // hasPart CHEBI:2651 GO:0022626
  species _80S_aa_tRNA_eEF2_GTP_2 in cytoplasm = 0; _80S_aa_tRNA_eEF2_GTP_2 is "80S_aa-tRNA_eEF2_GTP_2";  // hasPart CHEBI:15996 CHEBI:2651 uniprot:P32324
  species _80S_tRNA_2 in cytoplasm = 0;  // hasPart CHEBI:17843 GO:0022626
  species _80S_tRNA_eEF3_GTP_2 in cytoplasm = 0;  // hasPart CHEBI:15996 CHEBI:2651 uniprot:P16521 GO:0022626
  species _80S_3 in cytoplasm = 0;  // hasPart GO:0022626
  species _80S_aa_tRNA_eEF1A_GTP_3 in cytoplasm = 0; _80S_aa_tRNA_eEF1A_GTP_3 is "80S_aa-tRNA_eEF1A_GTP_3";  // hasPart CHEBI:2651 CHEBI:15996 uniprot:P02994 GO:0022626
  species _80S_aa_tRNA_3 in cytoplasm = 0; _80S_aa_tRNA_3 is "80S_aa-tRNA_3";  // hasPart CHEBI:2651 GO:0022626
  species _80S_aa_tRNA_eEF2_GTP_3 in cytoplasm = 0; _80S_aa_tRNA_eEF2_GTP_3 is "80S_aa-tRNA_eEF2_GTP_3";  // hasPart CHEBI:2651 CHEBI:15996 uniprot:P32324
  species _80S_tRNA_3 in cytoplasm = 0;  // hasPart CHEBI:17843 GO:0022626
  species _80S_tRNA_eEF3_GTP_3 in cytoplasm = 0;  // hasPart CHEBI:2651 CHEBI:15996 uniprot:P16521 GO:0022626
  species _80S_4 in cytoplasm = 0;  // hasPart GO:0022626
  species _80S_aa_tRNA_eEF1A_GTP_4 in cytoplasm = 0; _80S_aa_tRNA_eEF1A_GTP_4 is "80S_aa-tRNA_eEF1A_GTP_4";  // hasPart CHEBI:2651 CHEBI:15996 uniprot:P02994 GO:0022626
  species _80S_aa_tRNA_4 in cytoplasm = 0; _80S_aa_tRNA_4 is "80S_aa-tRNA_4";  // hasPart CHEBI:2651 GO:0022626
  species _80S_aa_tRNA_eEF2_GTP_4 in cytoplasm = 0; _80S_aa_tRNA_eEF2_GTP_4 is "80S_aa-tRNA_eEF2_GTP_4";  // hasPart CHEBI:15996 CHEBI:2651 uniprot:P32324
  species _80S_tRNA_4 in cytoplasm = 0;  // hasPart CHEBI:17843 GO:0022626
  species _80S_tRNA_eEF3_GTP_4 in cytoplasm = 0;  // hasPart CHEBI:2651 CHEBI:15996 uniprot:P16521 GO:0022626
  species _80S_5 in cytoplasm = 0;  // hasPart GO:0022626
  species _80S_aa_tRNA_eEF1A_GTP_5 in cytoplasm = 0; _80S_aa_tRNA_eEF1A_GTP_5 is "80S_aa-tRNA_eEF1A_GTP_5";  // hasPart CHEBI:15996 CHEBI:2651 uniprot:P02994 GO:0022626
  species _80S_aa_tRNA_5 in cytoplasm = 0; _80S_aa_tRNA_5 is "80S_aa-tRNA_5";  // hasPart CHEBI:2651 GO:0022626
  species _80S_aa_tRNA_eEF2_GTP_5 in cytoplasm = 0; _80S_aa_tRNA_eEF2_GTP_5 is "80S_aa-tRNA_eEF2_GTP_5";  // hasPart CHEBI:15996 CHEBI:2651 uniprot:P32324
  species _80S_tRNA_5 in cytoplasm = 0;  // hasPart CHEBI:17843 GO:0022626
  species _80S_tRNA_eEF3_GTP_5 in cytoplasm = 0;  // hasPart CHEBI:15996 CHEBI:2651 uniprot:P16521 GO:0022626
  species _80S_6 in cytoplasm = 0;  // hasPart GO:0022626
  species _80S_aa_tRNA_eEF1A_GTP_6 in cytoplasm = 0; _80S_aa_tRNA_eEF1A_GTP_6 is "80S_aa-tRNA_eEF1A_GTP_6";  // hasPart CHEBI:2651 CHEBI:15996 uniprot:P02994 GO:0022626
  species _80S_aa_tRNA_6 in cytoplasm = 0; _80S_aa_tRNA_6 is "80S_aa-tRNA_6";  // hasPart CHEBI:2651 GO:0022626
  species _80S_aa_tRNA_eEF2_GTP_6 in cytoplasm = 0; _80S_aa_tRNA_eEF2_GTP_6 is "80S_aa-tRNA_eEF2_GTP_6";  // hasPart CHEBI:2651 CHEBI:15996 uniprot:P32324
  species _80S_tRNA_6 in cytoplasm = 0;  // hasPart CHEBI:17843 GO:0022626
  species _80S_tRNA_eEF3_GTP_6 in cytoplasm = 0;  // hasPart CHEBI:2651 CHEBI:15996 uniprot:P16521 GO:0022626
  species _80S_7 in cytoplasm = 0;  // hasPart GO:0022626
  species _80S_aa_tRNA_eEF1A_GTP_7 in cytoplasm = 0; _80S_aa_tRNA_eEF1A_GTP_7 is "80S_aa-tRNA_eEF1A_GTP_7";  // hasPart CHEBI:2651 CHEBI:15996 uniprot:P02994 GO:0022626
  species _80S_aa_tRNA_7 in cytoplasm = 0; _80S_aa_tRNA_7 is "80S_aa-tRNA_7";  // hasPart CHEBI:2651 GO:0022626
  species _80S_aa_tRNA_eEF2_GTP_7 in cytoplasm = 0; _80S_aa_tRNA_eEF2_GTP_7 is "80S_aa-tRNA_eEF2_GTP_7";  // hasPart CHEBI:15996 CHEBI:2651 uniprot:P32324
  species _80S_tRNA_7 in cytoplasm = 0;  // hasPart CHEBI:17843 GO:0022626
  species _80S_tRNA_eEF3_GTP_7 in cytoplasm = 0;  // hasPart CHEBI:2651 CHEBI:15996 uniprot:P16521 GO:0022626
  species _80S_8 in cytoplasm = 0;  // hasPart GO:0022626
  species _80S_aa_tRNA_eEF1A_GTP_8 in cytoplasm = 0; _80S_aa_tRNA_eEF1A_GTP_8 is "80S_aa-tRNA_eEF1A_GTP_8";  // hasPart CHEBI:2651 CHEBI:15996 uniprot:P02994 GO:0022626
  species _80S_aa_tRNA_8 in cytoplasm = 0; _80S_aa_tRNA_8 is "80S_aa-tRNA_8";  // hasPart CHEBI:2651 GO:0022626
  species _80S_aa_tRNA_eEF2_GTP_8 in cytoplasm = 0; _80S_aa_tRNA_eEF2_GTP_8 is "80S_aa-tRNA_eEF2_GTP_8";  // hasPart CHEBI:2651 CHEBI:15996 uniprot:P32324
  species _80S_tRNA_8 in cytoplasm = 0;  // hasPart CHEBI:17843 GO:0022626
  species _80S_tRNA_eEF3_GTP_8 in cytoplasm = 0;  // hasPart CHEBI:2651 CHEBI:15996 uniprot:P16521 GO:0022626
  species _80S_9 in cytoplasm = 0;  // hasPart GO:0022626
  species _80S_aa_tRNA_eEF1A_GTP_9 in cytoplasm = 0; _80S_aa_tRNA_eEF1A_GTP_9 is "80S_aa-tRNA_eEF1A_GTP_9";  // hasPart CHEBI:2651 CHEBI:15996 uniprot:P02994 GO:0022626
  species _80S_aa_tRNA_9 in cytoplasm = 0; _80S_aa_tRNA_9 is "80S_aa-tRNA_9";  // hasPart CHEBI:2651 GO:0022626
  species _80S_aa_tRNA_eEF2_GTP_9 in cytoplasm = 0; _80S_aa_tRNA_eEF2_GTP_9 is "80S_aa-tRNA_eEF2_GTP_9";  // hasPart CHEBI:15996 CHEBI:2651 uniprot:P32324
  species _80S_tRNA_9 in cytoplasm = 0;  // hasPart CHEBI:17843 GO:0022626
  species _80S_tRNA_eEF3_GTP_9 in cytoplasm = 0;  // hasPart CHEBI:15996 CHEBI:2651 uniprot:P16521 GO:0022626
  species _80S_10 in cytoplasm = 0;  // hasPart GO:0022626
  species _80S_aa_tRNA_eEF1A_GTP_10 in cytoplasm = 0; _80S_aa_tRNA_eEF1A_GTP_10 is "80S_aa-tRNA_eEF1A_GTP_10";  // hasPart CHEBI:15996 CHEBI:2651 uniprot:P02994 GO:0022626
  species _80S_aa_tRNA_10 in cytoplasm = 0; _80S_aa_tRNA_10 is "80S_aa-tRNA_10";  // hasPart CHEBI:2651 GO:0022626
  species _80S_aa_tRNA_eEF2_GTP_10 in cytoplasm = 0; _80S_aa_tRNA_eEF2_GTP_10 is "80S_aa-tRNA_eEF2_GTP_10";  // hasPart CHEBI:2651 CHEBI:15996 uniprot:P32324
  species _80S_tRNA_10 in cytoplasm = 0;  // hasPart CHEBI:17843 GO:0022626
  species _80S_tRNA_eEF3_GTP_10 in cytoplasm = 0;  // hasPart CHEBI:15996 CHEBI:2651 uniprot:P16521 GO:0022626
  species _80S_11 in cytoplasm = 0;  // hasPart GO:0022626
  species _80S_aa_tRNA_eEF1A_GTP_11 in cytoplasm = 0; _80S_aa_tRNA_eEF1A_GTP_11 is "80S_aa-tRNA_eEF1A_GTP_11";  // hasPart CHEBI:15996 CHEBI:2651 uniprot:P02994 GO:0022626
  species _80S_aa_tRNA_11 in cytoplasm = 0; _80S_aa_tRNA_11 is "80S_aa-tRNA_11";  // hasPart CHEBI:2651 GO:0022626
  species _80S_aa_tRNA_eEF2_GTP_11 in cytoplasm = 0; _80S_aa_tRNA_eEF2_GTP_11 is "80S_aa-tRNA_eEF2_GTP_11";  // hasPart CHEBI:15996 CHEBI:2651 uniprot:P32324
  species _80S_tRNA_11 in cytoplasm = 0;  // hasPart CHEBI:17843 GO:0022626
  species _80S_tRNA_eEF3_GTP_11 in cytoplasm = 0;  // hasPart CHEBI:15996 CHEBI:2651 uniprot:P16521 GO:0022626
  species _80S_12 in cytoplasm = 0;  // hasPart GO:0022626
  species _80S_aa_tRNA_eEF1A_GTP_12 in cytoplasm = 0; _80S_aa_tRNA_eEF1A_GTP_12 is "80S_aa-tRNA_eEF1A_GTP_12";  // hasPart CHEBI:15996 CHEBI:2651 uniprot:P02994 GO:0022626
  species _80S_aa_tRNA_12 in cytoplasm = 0; _80S_aa_tRNA_12 is "80S_aa-tRNA_12";  // hasPart CHEBI:2651 GO:0022626
  species _80S_aa_tRNA_eEF2_GTP_12 in cytoplasm = 0; _80S_aa_tRNA_eEF2_GTP_12 is "80S_aa-tRNA_eEF2_GTP_12";  // hasPart CHEBI:2651 CHEBI:15996 uniprot:P32324
  species _80S_tRNA_12 in cytoplasm = 0;  // hasPart CHEBI:17843 GO:0022626
  species _80S_tRNA_eEF3_GTP_12 in cytoplasm = 0;  // hasPart CHEBI:15996 CHEBI:2651 uniprot:P16521 GO:0022626
  species _80S_13 in cytoplasm = 0;  // hasPart GO:0022626
  species _80S_aa_tRNA_eEF1A_GTP_13 in cytoplasm = 0; _80S_aa_tRNA_eEF1A_GTP_13 is "80S_aa-tRNA_eEF1A_GTP_13";  // hasPart CHEBI:15996 CHEBI:2651 uniprot:P02994 GO:0022626
  species _80S_aa_tRNA_13 in cytoplasm = 0; _80S_aa_tRNA_13 is "80S_aa-tRNA_13";  // hasPart CHEBI:2651 GO:0022626
  species _80S_aa_tRNA_eEF2_GTP_13 in cytoplasm = 0; _80S_aa_tRNA_eEF2_GTP_13 is "80S_aa-tRNA_eEF2_GTP_13";  // hasPart CHEBI:2651 CHEBI:15996 uniprot:P32324
  species _80S_tRNA_13 in cytoplasm = 0;  // hasPart CHEBI:17843 GO:0022626
  species _80S_tRNA_eEF3_GTP_13 in cytoplasm = 0;  // hasPart CHEBI:15996 CHEBI:2651 uniprot:P16521 GO:0022626
  species _80S_14 in cytoplasm = 0;  // hasPart GO:0022626
  species _80S_aa_tRNA_eEF1A_GTP_14 in cytoplasm = 0; _80S_aa_tRNA_eEF1A_GTP_14 is "80S_aa-tRNA_eEF1A_GTP_14";  // hasPart CHEBI:2651 CHEBI:15996 uniprot:P02994 GO:0022626
  species _80S_aa_tRNA_14 in cytoplasm = 0; _80S_aa_tRNA_14 is "80S_aa-tRNA_14";  // hasPart CHEBI:2651 GO:0022626
  species _80S_aa_tRNA_eEF2_GTP_14 in cytoplasm = 0; _80S_aa_tRNA_eEF2_GTP_14 is "80S_aa-tRNA_eEF2_GTP_14";  // hasPart CHEBI:2651 CHEBI:15996 uniprot:P32324
  species _80S_tRNA_14 in cytoplasm = 0;  // hasPart CHEBI:17843 GO:0022626
  species _80S_tRNA_eEF3_GTP_14 in cytoplasm = 0;  // hasPart CHEBI:15996 CHEBI:2651 uniprot:P16521 GO:0022626
  species _80S_15 in cytoplasm = 0;  // hasPart GO:0022626
  species _80S_aa_tRNA_eEF1A_GTP_15 in cytoplasm = 0; _80S_aa_tRNA_eEF1A_GTP_15 is "80S_aa-tRNA_eEF1A_GTP_15";  // hasPart CHEBI:2651 CHEBI:15996 uniprot:P02994 GO:0022626
  species _80S_aa_tRNA_15 in cytoplasm = 0; _80S_aa_tRNA_15 is "80S_aa-tRNA_15";  // hasPart CHEBI:2651 GO:0022626
  species _80S_aa_tRNA_eEF2_GTP_15 in cytoplasm = 0; _80S_aa_tRNA_eEF2_GTP_15 is "80S_aa-tRNA_eEF2_GTP_15";  // hasPart CHEBI:15996 CHEBI:2651 uniprot:P32324
  species _80S_tRNA_15 in cytoplasm = 0;  // hasPart CHEBI:17843 GO:0022626
  species _80S_tRNA_eEF3_GTP_15 in cytoplasm = 0;  // hasPart CHEBI:15996 CHEBI:2651 uniprot:P16521 GO:0022626
  species _80S_16 in cytoplasm = 0;  // hasPart GO:0022626
  species _80S_aa_tRNA_eEF1A_GTP_16 in cytoplasm = 0; _80S_aa_tRNA_eEF1A_GTP_16 is "80S_aa-tRNA_eEF1A_GTP_16";  // hasPart CHEBI:2651 CHEBI:15996 uniprot:P02994 GO:0022626
  species _80S_aa_tRNA_16 in cytoplasm = 0; _80S_aa_tRNA_16 is "80S_aa-tRNA_16";  // hasPart CHEBI:2651 GO:0022626
  species _80S_aa_tRNA_eEF2_GTP_16 in cytoplasm = 0; _80S_aa_tRNA_eEF2_GTP_16 is "80S_aa-tRNA_eEF2_GTP_16";  // hasPart CHEBI:15996 CHEBI:2651 uniprot:P32324
  species _80S_tRNA_16 in cytoplasm = 0;  // hasPart CHEBI:17843 GO:0022626
  species _80S_tRNA_eEF3_GTP_16 in cytoplasm = 0;  // hasPart CHEBI:15996 CHEBI:2651 uniprot:P16521 GO:0022626
  species _80S_17 in cytoplasm = 0;  // hasPart GO:0022626
  species _80S_aa_tRNA_eEF1A_GTP_17 in cytoplasm = 0; _80S_aa_tRNA_eEF1A_GTP_17 is "80S_aa-tRNA_eEF1A_GTP_17";  // hasPart CHEBI:15996 CHEBI:2651 uniprot:P02994 GO:0022626
  species _80S_aa_tRNA_17 in cytoplasm = 0; _80S_aa_tRNA_17 is "80S_aa-tRNA_17";  // hasPart CHEBI:2651 GO:0022626
  species _80S_aa_tRNA_eEF2_GTP_17 in cytoplasm = 0; _80S_aa_tRNA_eEF2_GTP_17 is "80S_aa-tRNA_eEF2_GTP_17";  // hasPart CHEBI:15996 CHEBI:2651 uniprot:P32324
  species _80S_tRNA_17 in cytoplasm = 0;  // hasPart CHEBI:17843 GO:0022626
  species _80S_tRNA_eEF3_GTP_17 in cytoplasm = 0;  // hasPart CHEBI:2651 CHEBI:15996 uniprot:P16521 GO:0022626
  species _80S_18 in cytoplasm = 0;  // hasPart GO:0022626
  species _80S_aa_tRNA_eEF1A_GTP_18 in cytoplasm = 0; _80S_aa_tRNA_eEF1A_GTP_18 is "80S_aa-tRNA_eEF1A_GTP_18";  // hasPart CHEBI:2651 CHEBI:15996 uniprot:P02994 GO:0022626
  species _80S_aa_tRNA_18 in cytoplasm = 0; _80S_aa_tRNA_18 is "80S_aa-tRNA_18";  // hasPart CHEBI:2651 GO:0022626
  species _80S_aa_tRNA_eEF2_GTP_18 in cytoplasm = 0; _80S_aa_tRNA_eEF2_GTP_18 is "80S_aa-tRNA_eEF2_GTP_18";  // hasPart CHEBI:2651 CHEBI:15996 uniprot:P32324
  species _80S_tRNA_18 in cytoplasm = 0;  // hasPart CHEBI:17843 GO:0022626
  species _80S_tRNA_eEF3_GTP_18 in cytoplasm = 0;  // hasPart CHEBI:15996 CHEBI:2651 uniprot:P16521 GO:0022626
  species _80S_19 in cytoplasm = 0;  // hasPart GO:0022626
  species _80S_aa_tRNA_eEF1A_GTP_19 in cytoplasm = 0; _80S_aa_tRNA_eEF1A_GTP_19 is "80S_aa-tRNA_eEF1A_GTP_19";  // hasPart CHEBI:15996 CHEBI:2651 uniprot:P02994 GO:0022626
  species _80S_aa_tRNA_19 in cytoplasm = 0; _80S_aa_tRNA_19 is "80S_aa-tRNA_19";  // hasPart CHEBI:2651 GO:0022626
  species _80S_aa_tRNA_eEF2_GTP_19 in cytoplasm = 0; _80S_aa_tRNA_eEF2_GTP_19 is "80S_aa-tRNA_eEF2_GTP_19";  // hasPart CHEBI:15996 CHEBI:2651 uniprot:P32324
  species _80S_tRNA_19 in cytoplasm = 0;  // hasPart CHEBI:17843 GO:0022626
  species _80S_tRNA_eEF3_GTP_19 in cytoplasm = 0;  // hasPart CHEBI:15996 CHEBI:2651 uniprot:P16521 GO:0022626
  species _80S_20 in cytoplasm = 0;  // hasPart GO:0022626
  species _80S_tRNA_20 in cytoplasm = 0;  // hasPart CHEBI:17843 GO:0022626
  species _80S_tRNA_eEF3_GTP_20 in cytoplasm = 0;  // hasPart CHEBI:2651 CHEBI:15996 uniprot:P16521 GO:0022626
  species eRF3_GDP in cytoplasm = 5.672935e-7;  // hasPart CHEBI:17552; hasVersion uniprot:P05453
  species eRF3_GTP in cytoplasm = 0;  // hasPart CHEBI:15996 uniprot:P05453
  species eRF1 in cytoplasm = 8.914613e-7;  // uniprot:P12385
  species eRF1_eRF3_GTP in cytoplasm = 0;  // hasPart CHEBI:15996 uniprot:P12385 uniprot:P05453 GO:0018444
  species _80S_eRF1_eRF3_GTP in cytoplasm = 0;  // hasPart CHEBI:15996 uniprot:P12385 GO:0022626
  species eIF4A_eIF4E_eIF4G_mRNA_Pab1 in cytoplasm = 0;  // hasPart CHEBI:33699 uniprot:P39935 uniprot:P10081 uniprot:P07260

  // Parameters:
  // concentration of total mRNA
  mRNA_tot = mRNA_tot_Molar/cytoplasm;  // hasPart uniprot:P39935 uniprot:P39936
  k22f = 8.100355e9;
  k22b = 0.2840072;
  k23f = 28324.36;
  k25f = 3.103772e9;
  k25b = 0.00322599;
  k26f = 2306950;
  k28f = 2240520000;
  k29f = 72911.67;
  // total concentration of mRNA that is bound to any factor, ribosome sub-unit or 80S
  var mRNA_bound;
  // total concentration of mRNA that is not bound to any factor, ribosome sub-unit or 80S
  var mRNA_free;
  mRNA_tot_Molar = 2.865857e-20;

  // Assignment rules:
  mRNA_bound := _80S_1 + _80S_2 + _80S_3 + _80S_4 + _80S_5 + _80S_6 + _80S_7 + _80S_8 + _80S_9 + _80S_10 + _80S_11 + _80S_12 + _80S_13 + _80S_14 + _80S_15 + _80S_16 + _80S_17 + _80S_18 + _80S_19 + _80S_20 + _80S_aa_tRNA_eEF1A_GTP_1 + _80S_aa_tRNA_eEF1A_GTP_2 + _80S_aa_tRNA_eEF1A_GTP_3 + _80S_aa_tRNA_eEF1A_GTP_4 + _80S_aa_tRNA_eEF1A_GTP_5 + _80S_aa_tRNA_eEF1A_GTP_6 + _80S_aa_tRNA_eEF1A_GTP_7 + _80S_aa_tRNA_eEF1A_GTP_8 + _80S_aa_tRNA_eEF1A_GTP_9 + _80S_aa_tRNA_eEF1A_GTP_10 + _80S_aa_tRNA_eEF1A_GTP_11 + _80S_aa_tRNA_eEF1A_GTP_12 + _80S_aa_tRNA_eEF1A_GTP_13 + _80S_aa_tRNA_eEF1A_GTP_14 + _80S_aa_tRNA_eEF1A_GTP_15 + _80S_aa_tRNA_eEF1A_GTP_16 + _80S_aa_tRNA_eEF1A_GTP_17 + _80S_aa_tRNA_eEF1A_GTP_18 + _80S_aa_tRNA_eEF1A_GTP_19 + _80S_aa_tRNA_1 + _80S_aa_tRNA_2 + _80S_aa_tRNA_3 + _80S_aa_tRNA_4 + _80S_aa_tRNA_5 + _80S_aa_tRNA_6 + _80S_aa_tRNA_7 + _80S_aa_tRNA_8 + _80S_aa_tRNA_9 + _80S_aa_tRNA_10 + _80S_aa_tRNA_11 + _80S_aa_tRNA_12 + _80S_aa_tRNA_13 + _80S_aa_tRNA_14 + _80S_aa_tRNA_15 + _80S_aa_tRNA_16 + _80S_aa_tRNA_17 + _80S_aa_tRNA_18 + _80S_aa_tRNA_19 + _80S_aa_tRNA_eEF2_GTP_1 + _80S_aa_tRNA_eEF2_GTP_2 + _80S_aa_tRNA_eEF2_GTP_3 + _80S_aa_tRNA_eEF2_GTP_4 + _80S_aa_tRNA_eEF2_GTP_5 + _80S_aa_tRNA_eEF2_GTP_6 + _80S_aa_tRNA_eEF2_GTP_7 + _80S_aa_tRNA_eEF2_GTP_8 + _80S_aa_tRNA_eEF2_GTP_9 + _80S_aa_tRNA_eEF2_GTP_10 + _80S_aa_tRNA_eEF2_GTP_11 + _80S_aa_tRNA_eEF2_GTP_12 + _80S_aa_tRNA_eEF2_GTP_13 + _80S_aa_tRNA_eEF2_GTP_14 + _80S_aa_tRNA_eEF2_GTP_15 + _80S_aa_tRNA_eEF2_GTP_16 + _80S_aa_tRNA_eEF2_GTP_17 + _80S_aa_tRNA_eEF2_GTP_18 + _80S_aa_tRNA_eEF2_GTP_19 + _80S_tRNA_2 + _80S_tRNA_3 + _80S_tRNA_4 + _80S_tRNA_5 + _80S_tRNA_6 + _80S_tRNA_7 + _80S_tRNA_8 + _80S_tRNA_9 + _80S_tRNA_10 + _80S_tRNA_11 + _80S_tRNA_12 + _80S_tRNA_13 + _80S_tRNA_14 + _80S_tRNA_15 + _80S_tRNA_16 + _80S_tRNA_17 + _80S_tRNA_18 + _80S_tRNA_19 + _80S_tRNA_20 + _80S_tRNA_eEF3_GTP_2 + _80S_tRNA_eEF3_GTP_3 + _80S_tRNA_eEF3_GTP_4 + _80S_tRNA_eEF3_GTP_5 + _80S_tRNA_eEF3_GTP_6 + _80S_tRNA_eEF3_GTP_7 + _80S_tRNA_eEF3_GTP_8 + _80S_tRNA_eEF3_GTP_9 + _80S_tRNA_eEF3_GTP_10 + _80S_tRNA_eEF3_GTP_11 + _80S_tRNA_eEF3_GTP_12 + _80S_tRNA_eEF3_GTP_13 + _80S_tRNA_eEF3_GTP_14 + _80S_tRNA_eEF3_GTP_15 + _80S_tRNA_eEF3_GTP_16 + _80S_tRNA_eEF3_GTP_17 + _80S_tRNA_eEF3_GTP_18 + _80S_tRNA_eEF3_GTP_19 + _80S_tRNA_eEF3_GTP_20 + _80S_eRF1_eRF3_GTP;
  mRNA_free := mRNA_tot - mRNA_bound;

  // Reactions:
  reaction1: eIF2_GDP + eIF2B -> eIF2_GDP_eIF2B; cytoplasm*(reaction1_k1*eIF2_GDP*eIF2B - reaction1_k2*eIF2_GDP_eIF2B);  // isPartOf GO:0002183
    reaction1_k1 = 19609600; reaction1_k2 = 34.8025;
  reaction2: eIF2_GDP_eIF2B -> eIF2_GTP + eIF2B; cytoplasm*(reaction2_k1*eIF2_GDP_eIF2B - reaction2_k2*eIF2_GTP*eIF2B);  // isPartOf GO:0002183
    reaction2_k1 = 533.26; reaction2_k2 = 3.97698;
  reaction3: eIF2_GTP + $Met_tRNA -> eIF2_GTP_Met_tRNA; cytoplasm*(reaction3_k1*eIF2_GTP*Met_tRNA - reaction3_k2*eIF2_GTP_Met_tRNA);  // isPartOf GO:0002183
    reaction3_k1 = 104798; reaction3_k2 = 6.32998;
  reaction4: eIF3 + eIF5 -> eIF3_eIF5; cytoplasm*(reaction4_k1*eIF3*eIF5 - reaction4_k2*eIF3_eIF5);  // isPartOf GO:0002183
    reaction4_k1 = 20024500; reaction4_k2 = 0.406929;
  reaction5: eIF2_GTP_Met_tRNA + eIF3_eIF5 -> eIF3_eIF5_eIF2_GTP_Met_tRNA; cytoplasm*(reaction5_k1*eIF2_GTP_Met_tRNA*eIF3_eIF5 - reaction5_k2*eIF3_eIF5_eIF2_GTP_Met_tRNA);  // isPartOf GO:0002183
    reaction5_k1 = 160265000; reaction5_k2 = 57.1854;
  reaction6: eIF1 + eIF3_eIF5_eIF2_GTP_Met_tRNA -> eIF1_eIF3_eIF5_eIF2_GTP_Met_tRNA; cytoplasm*(reaction6_k1*eIF1*eIF3_eIF5_eIF2_GTP_Met_tRNA - reaction6_k2*eIF1_eIF3_eIF5_eIF2_GTP_Met_tRNA);  // isPartOf GO:0002183
    reaction6_k1 = 3865650; reaction6_k2 = 31.1969;
  reaction7: _40S + eIF1A => _40S_eIF1A; cytoplasm*reaction7_k1*_40S*eIF1A;  // isPartOf GO:0002183
    reaction7_k1 = 814356;
  reaction8: eIF1_eIF3_eIF5_eIF2_GTP_Met_tRNA + _40S_eIF1A => _43S; cytoplasm*reaction8_k1*eIF1_eIF3_eIF5_eIF2_GTP_Met_tRNA*_40S_eIF1A;  // isPartOf GO:0002183
    reaction8_k1 = 19725400;
  reaction9: eIF4E + eIF4G -> eIF4E_eIF4G; cytoplasm*(reaction9_k1*eIF4E*eIF4G - reaction9_k2*eIF4E_eIF4G);  // isPartOf GO:0002183
    reaction9_k1 = 43327400; reaction9_k2 = 1977.92;
  reaction10: mRNA_cap + Pab1 -> mRNA_Pab1; cytoplasm*(reaction10_k1*mRNA_cap*Pab1 - reaction10_k2*mRNA_Pab1);  // isPartOf GO:0002183
    reaction10_k1 = 5026500; reaction10_k2 = 0.00774034;
  reaction11: eIF4E_eIF4G + mRNA_Pab1 -> eIF4E_eIF4G_mRNA_Pab1; cytoplasm*(reaction11_k1*eIF4E_eIF4G*mRNA_Pab1 - reaction11_k2*eIF4E_eIF4G_mRNA_Pab1);  // isPartOf GO:0002183
    reaction11_k1 = 57991200; reaction11_k2 = 2.70026;
  reaction12: eIF4A + eIF4E_eIF4G_mRNA_Pab1 -> eIF4A_eIF4E_eIF4G_mRNA_Pab1; cytoplasm*(reaction12_k1*eIF4A*eIF4E_eIF4G_mRNA_Pab1 - reaction12_k2*eIF4A_eIF4E_eIF4G_mRNA_Pab1);  // isPartOf GO:0002183
    reaction12_k1 = 307831; reaction12_k2 = 2.38184;
  reaction13: eIF4B + eIF4A_eIF4E_eIF4G_mRNA_Pab1 -> species_27; cytoplasm*(reaction13_k1*eIF4B*eIF4A_eIF4E_eIF4G_mRNA_Pab1 - reaction13_k2*species_27);  // isPartOf GO:0002183
    reaction13_k1 = 352080000000000; reaction13_k2 = 0.785013;
  reaction14: _43S + species_27 => _48S; cytoplasm*reaction14_k1*_43S*species_27;  // isPartOf GO:0002183
    reaction14_k1 = 1062040000;
  reaction15: _48S + Ded1 -> _48S_Ded1; cytoplasm*(reaction15_k1*_48S*Ded1 - reaction15_k2*_48S_Ded1);  // isPartOf GO:0002183
    reaction15_k1 = 87134000000; reaction15_k2 = 1.2395;
  reaction16: eIF5B_GDP -> eIF5B_GTP; cytoplasm*(reaction16_k1*eIF5B_GDP - reaction16_k2*eIF5B_GTP);  // isPartOf GO:0002183
    reaction16_k1 = 304.768; reaction16_k2 = 45.4082;
  reaction17: _48S_Ded1 + eIF5B_GTP -> _48S_Ded1_eIF5B_GTP; cytoplasm*(reaction17_k1*_48S_Ded1*eIF5B_GTP - reaction17_k2*_48S_Ded1_eIF5B_GTP);  // isPartOf GO:0002183
    reaction17_k1 = 561005000; reaction17_k2 = 47.8215;
  reaction18: _60S + _48S_Ded1_eIF5B_GTP => _80S_1 + eIF1 + eIF1A + eIF2_GDP + eIF3 + eIF4A + eIF4B + eIF4E + eIF4G + eIF5 + eIF5B_GDP + Pab1 + mRNA_cap + Ded1; cytoplasm*Initiation_with_blocking_1_1(k, _60S, _48S_Ded1_eIF5B_GTP, mRNA_tot, _80S_1, _80S_aa_tRNA_eEF1A_GTP_1, _80S_aa_tRNA_1, _80S_aa_tRNA_eEF2_GTP_1, _80S_2, _80S_aa_tRNA_eEF1A_GTP_2, _80S_aa_tRNA_2, _80S_aa_tRNA_eEF2_GTP_2, _80S_tRNA_2, _80S_tRNA_eEF3_GTP_2, _80S_3, _80S_aa_tRNA_eEF1A_GTP_3, _80S_aa_tRNA_3, _80S_aa_tRNA_eEF2_GTP_3, _80S_tRNA_3, _80S_tRNA_eEF3_GTP_3, _80S_4, _80S_aa_tRNA_eEF1A_GTP_4, _80S_aa_tRNA_4, _80S_aa_tRNA_eEF2_GTP_4, _80S_tRNA_4, _80S_tRNA_eEF3_GTP_4, _80S_5, _80S_aa_tRNA_eEF1A_GTP_5, _80S_aa_tRNA_5, _80S_aa_tRNA_eEF2_GTP_5, _80S_tRNA_5, _80S_tRNA_eEF3_GTP_5, _80S_6, _80S_aa_tRNA_eEF1A_GTP_6, _80S_aa_tRNA_6, _80S_aa_tRNA_eEF2_GTP_6, _80S_tRNA_6, _80S_tRNA_eEF3_GTP_6, _80S_7, _80S_aa_tRNA_eEF1A_GTP_7, _80S_aa_tRNA_7, _80S_aa_tRNA_eEF2_GTP_7, _80S_tRNA_7, _80S_tRNA_eEF3_GTP_7, _80S_8, _80S_aa_tRNA_eEF1A_GTP_8, _80S_aa_tRNA_8, _80S_aa_tRNA_eEF2_GTP_8, _80S_tRNA_8, _80S_tRNA_eEF3_GTP_8, _80S_9, _80S_aa_tRNA_eEF1A_GTP_9, _80S_aa_tRNA_9, _80S_aa_tRNA_eEF2_GTP_9, _80S_tRNA_9, _80S_tRNA_eEF3_GTP_9, _80S_10, _80S_aa_tRNA_eEF1A_GTP_10, _80S_aa_tRNA_10, _80S_aa_tRNA_eEF2_GTP_10, _80S_tRNA_10, _80S_tRNA_eEF3_GTP_10, _80S_11, _80S_aa_tRNA_eEF1A_GTP_11, _80S_aa_tRNA_11, _80S_aa_tRNA_eEF2_GTP_11, _80S_tRNA_11, _80S_tRNA_eEF3_GTP_11, _80S_12, _80S_aa_tRNA_eEF1A_GTP_12, _80S_aa_tRNA_12, _80S_aa_tRNA_eEF2_GTP_12, _80S_tRNA_12, _80S_tRNA_eEF3_GTP_12, _80S_13, _80S_aa_tRNA_eEF1A_GTP_13, _80S_aa_tRNA_13, _80S_aa_tRNA_eEF2_GTP_13, _80S_tRNA_13, _80S_tRNA_eEF3_GTP_13, _80S_14, _80S_aa_tRNA_eEF1A_GTP_14, _80S_aa_tRNA_14, _80S_aa_tRNA_eEF2_GTP_14, _80S_tRNA_14, _80S_tRNA_eEF3_GTP_14, _80S_15, _80S_aa_tRNA_eEF1A_GTP_15, _80S_aa_tRNA_15, _80S_aa_tRNA_eEF2_GTP_15, _80S_tRNA_15, _80S_tRNA_eEF3_GTP_15);  // modifiers: _80S_aa_tRNA_eEF1A_GTP_1, _80S_aa_tRNA_1, _80S_aa_tRNA_eEF2_GTP_1, _80S_2, _80S_aa_tRNA_eEF1A_GTP_2, _80S_aa_tRNA_2, _80S_aa_tRNA_eEF2_GTP_2, _80S_tRNA_2, _80S_tRNA_eEF3_GTP_2, _80S_3, _80S_aa_tRNA_eEF1A_GTP_3, _80S_aa_tRNA_3, _80S_aa_tRNA_eEF2_GTP_3, _80S_tRNA_3, _80S_tRNA_eEF3_GTP_3, _80S_4, _80S_aa_tRNA_eEF1A_GTP_4, _80S_aa_tRNA_4, _80S_aa_tRNA_eEF2_GTP_4, _80S_tRNA_4, _80S_tRNA_eEF3_GTP_4, _80S_5, _80S_aa_tRNA_eEF1A_GTP_5, _80S_aa_tRNA_5, _80S_aa_tRNA_eEF2_GTP_5, _80S_tRNA_5, _80S_tRNA_eEF3_GTP_5, _80S_6, _80S_aa_tRNA_eEF1A_GTP_6, _80S_aa_tRNA_6, _80S_aa_tRNA_eEF2_GTP_6, _80S_tRNA_6, _80S_tRNA_eEF3_GTP_6, _80S_7, _80S_aa_tRNA_eEF1A_GTP_7, _80S_aa_tRNA_7, _80S_aa_tRNA_eEF2_GTP_7, _80S_tRNA_7, _80S_tRNA_eEF3_GTP_7, _80S_8, _80S_aa_tRNA_eEF1A_GTP_8, _80S_aa_tRNA_8, _80S_aa_tRNA_eEF2_GTP_8, _80S_tRNA_8, _80S_tRNA_eEF3_GTP_8, _80S_9, _80S_aa_tRNA_eEF1A_GTP_9, _80S_aa_tRNA_9, _80S_aa_tRNA_eEF2_GTP_9, _80S_tRNA_9, _80S_tRNA_eEF3_GTP_9, _80S_10, _80S_aa_tRNA_eEF1A_GTP_10, _80S_aa_tRNA_10, _80S_aa_tRNA_eEF2_GTP_10, _80S_tRNA_10, _80S_tRNA_eEF3_GTP_10, _80S_11, _80S_aa_tRNA_eEF1A_GTP_11, _80S_aa_tRNA_11, _80S_aa_tRNA_eEF2_GTP_11, _80S_tRNA_11, _80S_tRNA_eEF3_GTP_11, _80S_12, _80S_aa_tRNA_eEF1A_GTP_12, _80S_aa_tRNA_12, _80S_aa_tRNA_eEF2_GTP_12, _80S_tRNA_12, _80S_tRNA_eEF3_GTP_12, _80S_13, _80S_aa_tRNA_eEF1A_GTP_13, _80S_aa_tRNA_13, _80S_aa_tRNA_eEF2_GTP_13, _80S_tRNA_13, _80S_tRNA_eEF3_GTP_13, _80S_14, _80S_aa_tRNA_eEF1A_GTP_14, _80S_aa_tRNA_14, _80S_aa_tRNA_eEF2_GTP_14, _80S_tRNA_14, _80S_tRNA_eEF3_GTP_14, _80S_15, _80S_aa_tRNA_eEF1A_GTP_15, _80S_aa_tRNA_15, _80S_aa_tRNA_eEF2_GTP_15, _80S_tRNA_15, _80S_tRNA_eEF3_GTP_15; isPartOf GO:0002183
    k = 13072000000000;
  reaction19: eEF1A_GDP + eEF1B -> eEF1A_GDP_eEF1B; cytoplasm*(reaction19_k1*eEF1A_GDP*eEF1B - reaction19_k2*eEF1A_GDP_eEF1B);  // isPartOf GO:0002182
    reaction19_k1 = 1170250; reaction19_k2 = 14.2912;
  reaction20: eEF1A_GDP_eEF1B -> eEF1A_GTP + eEF1B; cytoplasm*(reaction20_k1*eEF1A_GDP_eEF1B - reaction20_k2*eEF1A_GTP*eEF1B);  // isPartOf GO:0002182
    reaction20_k1 = 13.295; reaction20_k2 = 43354100;
  reaction21: eEF1A_GTP + $aa_tRNA -> aa_tRNA_eEF1A_GTP; cytoplasm*(reaction21_k1*eEF1A_GTP*aa_tRNA - reaction21_k2*aa_tRNA_eEF1A_GTP);  // isPartOf GO:0002182
    reaction21_k1 = 39591.9; reaction21_k2 = 8.80234e-6;
  reaction24: eEF2_GDP -> eEF2_GTP; cytoplasm*(reaction24_k1*eEF2_GDP - reaction24_k2*eEF2_GTP);  // isPartOf GO:0002182
    reaction24_k1 = 1.80542; reaction24_k2 = 1.29513;
  reaction27: eEF3_GDP -> eEF3_GTP; cytoplasm*(reaction27_k1*eEF3_GDP - reaction27_k2*eEF3_GTP);  // isPartOf GO:0002182
    reaction27_k1 = 93.5995; reaction27_k2 = 43714.4;
  reaction22_1: aa_tRNA_eEF1A_GTP + _80S_1 -> _80S_aa_tRNA_eEF1A_GTP_1; cytoplasm*(k22f*aa_tRNA_eEF1A_GTP*_80S_1 - k22b*_80S_aa_tRNA_eEF1A_GTP_1);  // isPartOf GO:0002182
  reaction23_1: _80S_aa_tRNA_eEF1A_GTP_1 => _80S_aa_tRNA_1 + eEF1A_GDP; cytoplasm*k23f*_80S_aa_tRNA_eEF1A_GTP_1;  // isPartOf GO:0002182
  reaction25_1: eEF2_GTP + _80S_aa_tRNA_1 -> _80S_aa_tRNA_eEF2_GTP_1; cytoplasm*(k25f*eEF2_GTP*_80S_aa_tRNA_1 - k25b*_80S_aa_tRNA_eEF2_GTP_1);  // isPartOf GO:0002182
  reaction26_1: _80S_aa_tRNA_eEF2_GTP_1 => _80S_tRNA_2 + eEF2_GDP; cytoplasm*function_2(k26f, _80S_aa_tRNA_eEF2_GTP_1, mRNA_tot, _80S_2, _80S_aa_tRNA_eEF1A_GTP_2, _80S_aa_tRNA_2, _80S_aa_tRNA_eEF2_GTP_2, _80S_tRNA_2, _80S_tRNA_eEF3_GTP_2, _80S_3, _80S_aa_tRNA_eEF1A_GTP_3, _80S_aa_tRNA_3, _80S_aa_tRNA_eEF2_GTP_3, _80S_tRNA_3, _80S_tRNA_eEF3_GTP_3, _80S_4, _80S_aa_tRNA_eEF1A_GTP_4, _80S_aa_tRNA_4, _80S_aa_tRNA_eEF2_GTP_4, _80S_tRNA_4, _80S_tRNA_eEF3_GTP_4, _80S_5, _80S_aa_tRNA_eEF1A_GTP_5, _80S_aa_tRNA_5, _80S_aa_tRNA_eEF2_GTP_5, _80S_tRNA_5, _80S_tRNA_eEF3_GTP_5, _80S_6, _80S_aa_tRNA_eEF1A_GTP_6, _80S_aa_tRNA_6, _80S_aa_tRNA_eEF2_GTP_6, _80S_tRNA_6, _80S_tRNA_eEF3_GTP_6, _80S_7, _80S_aa_tRNA_eEF1A_GTP_7, _80S_aa_tRNA_7, _80S_aa_tRNA_eEF2_GTP_7, _80S_tRNA_7, _80S_tRNA_eEF3_GTP_7, _80S_8, _80S_aa_tRNA_eEF1A_GTP_8, _80S_aa_tRNA_8, _80S_aa_tRNA_eEF2_GTP_8, _80S_tRNA_8, _80S_tRNA_eEF3_GTP_8, _80S_9, _80S_aa_tRNA_eEF1A_GTP_9, _80S_aa_tRNA_9, _80S_aa_tRNA_eEF2_GTP_9, _80S_tRNA_9, _80S_tRNA_eEF3_GTP_9, _80S_10, _80S_aa_tRNA_eEF1A_GTP_10, _80S_aa_tRNA_10, _80S_aa_tRNA_eEF2_GTP_10, _80S_tRNA_10, _80S_tRNA_eEF3_GTP_10, _80S_11, _80S_aa_tRNA_eEF1A_GTP_11, _80S_aa_tRNA_11, _80S_aa_tRNA_eEF2_GTP_11, _80S_tRNA_11, _80S_tRNA_eEF3_GTP_11, _80S_12, _80S_aa_tRNA_eEF1A_GTP_12, _80S_aa_tRNA_12, _80S_aa_tRNA_eEF2_GTP_12, _80S_tRNA_12, _80S_tRNA_eEF3_GTP_12, _80S_13, _80S_aa_tRNA_eEF1A_GTP_13, _80S_aa_tRNA_13, _80S_aa_tRNA_eEF2_GTP_13, _80S_tRNA_13, _80S_tRNA_eEF3_GTP_13, _80S_14, _80S_aa_tRNA_eEF1A_GTP_14, _80S_aa_tRNA_14, _80S_aa_tRNA_eEF2_GTP_14, _80S_tRNA_14, _80S_tRNA_eEF3_GTP_14, _80S_15, _80S_aa_tRNA_eEF1A_GTP_15, _80S_aa_tRNA_15, _80S_aa_tRNA_eEF2_GTP_15, _80S_tRNA_15, _80S_tRNA_eEF3_GTP_15, _80S_16, _80S_aa_tRNA_eEF1A_GTP_16, _80S_aa_tRNA_16, _80S_aa_tRNA_eEF2_GTP_16, _80S_tRNA_16, _80S_tRNA_eEF3_GTP_16);  // modifiers: _80S_2, _80S_aa_tRNA_eEF1A_GTP_2, _80S_aa_tRNA_2, _80S_aa_tRNA_eEF2_GTP_2, _80S_tRNA_eEF3_GTP_2, _80S_3, _80S_aa_tRNA_eEF1A_GTP_3, _80S_aa_tRNA_3, _80S_aa_tRNA_eEF2_GTP_3, _80S_tRNA_3, _80S_tRNA_eEF3_GTP_3, _80S_4, _80S_aa_tRNA_eEF1A_GTP_4, _80S_aa_tRNA_4, _80S_aa_tRNA_eEF2_GTP_4, _80S_tRNA_4, _80S_tRNA_eEF3_GTP_4, _80S_5, _80S_aa_tRNA_eEF1A_GTP_5, _80S_aa_tRNA_5, _80S_aa_tRNA_eEF2_GTP_5, _80S_tRNA_5, _80S_tRNA_eEF3_GTP_5, _80S_6, _80S_aa_tRNA_eEF1A_GTP_6, _80S_aa_tRNA_6, _80S_aa_tRNA_eEF2_GTP_6, _80S_tRNA_6, _80S_tRNA_eEF3_GTP_6, _80S_7, _80S_aa_tRNA_eEF1A_GTP_7, _80S_aa_tRNA_7, _80S_aa_tRNA_eEF2_GTP_7, _80S_tRNA_7, _80S_tRNA_eEF3_GTP_7, _80S_8, _80S_aa_tRNA_eEF1A_GTP_8, _80S_aa_tRNA_8, _80S_aa_tRNA_eEF2_GTP_8, _80S_tRNA_8, _80S_tRNA_eEF3_GTP_8, _80S_9, _80S_aa_tRNA_eEF1A_GTP_9, _80S_aa_tRNA_9, _80S_aa_tRNA_eEF2_GTP_9, _80S_tRNA_9, _80S_tRNA_eEF3_GTP_9, _80S_10, _80S_aa_tRNA_eEF1A_GTP_10, _80S_aa_tRNA_10, _80S_aa_tRNA_eEF2_GTP_10, _80S_tRNA_10, _80S_tRNA_eEF3_GTP_10, _80S_11, _80S_aa_tRNA_eEF1A_GTP_11, _80S_aa_tRNA_11, _80S_aa_tRNA_eEF2_GTP_11, _80S_tRNA_11, _80S_tRNA_eEF3_GTP_11, _80S_12, _80S_aa_tRNA_eEF1A_GTP_12, _80S_aa_tRNA_12, _80S_aa_tRNA_eEF2_GTP_12, _80S_tRNA_12, _80S_tRNA_eEF3_GTP_12, _80S_13, _80S_aa_tRNA_eEF1A_GTP_13, _80S_aa_tRNA_13, _80S_aa_tRNA_eEF2_GTP_13, _80S_tRNA_13, _80S_tRNA_eEF3_GTP_13, _80S_14, _80S_aa_tRNA_eEF1A_GTP_14, _80S_aa_tRNA_14, _80S_aa_tRNA_eEF2_GTP_14, _80S_tRNA_14, _80S_tRNA_eEF3_GTP_14, _80S_15, _80S_aa_tRNA_eEF1A_GTP_15, _80S_aa_tRNA_15, _80S_aa_tRNA_eEF2_GTP_15, _80S_tRNA_15, _80S_tRNA_eEF3_GTP_15, _80S_16, _80S_aa_tRNA_eEF1A_GTP_16, _80S_aa_tRNA_16, _80S_aa_tRNA_eEF2_GTP_16, _80S_tRNA_16, _80S_tRNA_eEF3_GTP_16; isPartOf GO:0002182
  reaction22_2: aa_tRNA_eEF1A_GTP + _80S_2 -> _80S_aa_tRNA_eEF1A_GTP_2; cytoplasm*(k22f*aa_tRNA_eEF1A_GTP*_80S_2 - k22b*_80S_aa_tRNA_eEF1A_GTP_2);  // isPartOf GO:0002182
  reaction23_2: _80S_aa_tRNA_eEF1A_GTP_2 => _80S_aa_tRNA_2 + eEF1A_GDP; cytoplasm*k23f*_80S_aa_tRNA_eEF1A_GTP_2;  // isPartOf GO:0002182
  reaction25_2: eEF2_GTP + _80S_aa_tRNA_2 -> _80S_aa_tRNA_eEF2_GTP_2; cytoplasm*(k25f*eEF2_GTP*_80S_aa_tRNA_2 - k25b*_80S_aa_tRNA_eEF2_GTP_2);  // isPartOf GO:0002182
  reaction26_2: _80S_aa_tRNA_eEF2_GTP_2 => _80S_tRNA_3 + eEF2_GDP; cytoplasm*function_2(k26f, _80S_aa_tRNA_eEF2_GTP_2, mRNA_tot, _80S_3, _80S_aa_tRNA_eEF1A_GTP_3, _80S_aa_tRNA_3, _80S_aa_tRNA_eEF2_GTP_3, _80S_tRNA_3, _80S_tRNA_eEF3_GTP_3, _80S_4, _80S_aa_tRNA_eEF1A_GTP_4, _80S_aa_tRNA_4, _80S_aa_tRNA_eEF2_GTP_4, _80S_tRNA_4, _80S_tRNA_eEF3_GTP_4, _80S_5, _80S_aa_tRNA_eEF1A_GTP_5, _80S_aa_tRNA_5, _80S_aa_tRNA_eEF2_GTP_5, _80S_tRNA_5, _80S_tRNA_eEF3_GTP_5, _80S_6, _80S_aa_tRNA_eEF1A_GTP_6, _80S_aa_tRNA_6, _80S_aa_tRNA_eEF2_GTP_6, _80S_tRNA_6, _80S_tRNA_eEF3_GTP_6, _80S_7, _80S_aa_tRNA_eEF1A_GTP_7, _80S_aa_tRNA_7, _80S_aa_tRNA_eEF2_GTP_7, _80S_tRNA_7, _80S_tRNA_eEF3_GTP_7, _80S_8, _80S_aa_tRNA_eEF1A_GTP_8, _80S_aa_tRNA_8, _80S_aa_tRNA_eEF2_GTP_8, _80S_tRNA_8, _80S_tRNA_eEF3_GTP_8, _80S_9, _80S_aa_tRNA_eEF1A_GTP_9, _80S_aa_tRNA_9, _80S_aa_tRNA_eEF2_GTP_9, _80S_tRNA_9, _80S_tRNA_eEF3_GTP_9, _80S_10, _80S_aa_tRNA_eEF1A_GTP_10, _80S_aa_tRNA_10, _80S_aa_tRNA_eEF2_GTP_10, _80S_tRNA_10, _80S_tRNA_eEF3_GTP_10, _80S_11, _80S_aa_tRNA_eEF1A_GTP_11, _80S_aa_tRNA_11, _80S_aa_tRNA_eEF2_GTP_11, _80S_tRNA_11, _80S_tRNA_eEF3_GTP_11, _80S_12, _80S_aa_tRNA_eEF1A_GTP_12, _80S_aa_tRNA_12, _80S_aa_tRNA_eEF2_GTP_12, _80S_tRNA_12, _80S_tRNA_eEF3_GTP_12, _80S_13, _80S_aa_tRNA_eEF1A_GTP_13, _80S_aa_tRNA_13, _80S_aa_tRNA_eEF2_GTP_13, _80S_tRNA_13, _80S_tRNA_eEF3_GTP_13, _80S_14, _80S_aa_tRNA_eEF1A_GTP_14, _80S_aa_tRNA_14, _80S_aa_tRNA_eEF2_GTP_14, _80S_tRNA_14, _80S_tRNA_eEF3_GTP_14, _80S_15, _80S_aa_tRNA_eEF1A_GTP_15, _80S_aa_tRNA_15, _80S_aa_tRNA_eEF2_GTP_15, _80S_tRNA_15, _80S_tRNA_eEF3_GTP_15, _80S_16, _80S_aa_tRNA_eEF1A_GTP_16, _80S_aa_tRNA_16, _80S_aa_tRNA_eEF2_GTP_16, _80S_tRNA_16, _80S_tRNA_eEF3_GTP_16, _80S_17, _80S_aa_tRNA_eEF1A_GTP_17, _80S_aa_tRNA_17, _80S_aa_tRNA_eEF2_GTP_17, _80S_tRNA_17, _80S_tRNA_eEF3_GTP_17);  // modifiers: _80S_3, _80S_aa_tRNA_eEF1A_GTP_3, _80S_aa_tRNA_3, _80S_aa_tRNA_eEF2_GTP_3, _80S_tRNA_eEF3_GTP_3, _80S_4, _80S_aa_tRNA_eEF1A_GTP_4, _80S_aa_tRNA_4, _80S_aa_tRNA_eEF2_GTP_4, _80S_tRNA_4, _80S_tRNA_eEF3_GTP_4, _80S_5, _80S_aa_tRNA_eEF1A_GTP_5, _80S_aa_tRNA_5, _80S_aa_tRNA_eEF2_GTP_5, _80S_tRNA_5, _80S_tRNA_eEF3_GTP_5, _80S_6, _80S_aa_tRNA_eEF1A_GTP_6, _80S_aa_tRNA_6, _80S_aa_tRNA_eEF2_GTP_6, _80S_tRNA_6, _80S_tRNA_eEF3_GTP_6, _80S_7, _80S_aa_tRNA_eEF1A_GTP_7, _80S_aa_tRNA_7, _80S_aa_tRNA_eEF2_GTP_7, _80S_tRNA_7, _80S_tRNA_eEF3_GTP_7, _80S_8, _80S_aa_tRNA_eEF1A_GTP_8, _80S_aa_tRNA_8, _80S_aa_tRNA_eEF2_GTP_8, _80S_tRNA_8, _80S_tRNA_eEF3_GTP_8, _80S_9, _80S_aa_tRNA_eEF1A_GTP_9, _80S_aa_tRNA_9, _80S_aa_tRNA_eEF2_GTP_9, _80S_tRNA_9, _80S_tRNA_eEF3_GTP_9, _80S_10, _80S_aa_tRNA_eEF1A_GTP_10, _80S_aa_tRNA_10, _80S_aa_tRNA_eEF2_GTP_10, _80S_tRNA_10, _80S_tRNA_eEF3_GTP_10, _80S_11, _80S_aa_tRNA_eEF1A_GTP_11, _80S_aa_tRNA_11, _80S_aa_tRNA_eEF2_GTP_11, _80S_tRNA_11, _80S_tRNA_eEF3_GTP_11, _80S_12, _80S_aa_tRNA_eEF1A_GTP_12, _80S_aa_tRNA_12, _80S_aa_tRNA_eEF2_GTP_12, _80S_tRNA_12, _80S_tRNA_eEF3_GTP_12, _80S_13, _80S_aa_tRNA_eEF1A_GTP_13, _80S_aa_tRNA_13, _80S_aa_tRNA_eEF2_GTP_13, _80S_tRNA_13, _80S_tRNA_eEF3_GTP_13, _80S_14, _80S_aa_tRNA_eEF1A_GTP_14, _80S_aa_tRNA_14, _80S_aa_tRNA_eEF2_GTP_14, _80S_tRNA_14, _80S_tRNA_eEF3_GTP_14, _80S_15, _80S_aa_tRNA_eEF1A_GTP_15, _80S_aa_tRNA_15, _80S_aa_tRNA_eEF2_GTP_15, _80S_tRNA_15, _80S_tRNA_eEF3_GTP_15, _80S_16, _80S_aa_tRNA_eEF1A_GTP_16, _80S_aa_tRNA_16, _80S_aa_tRNA_eEF2_GTP_16, _80S_tRNA_16, _80S_tRNA_eEF3_GTP_16, _80S_17, _80S_aa_tRNA_eEF1A_GTP_17, _80S_aa_tRNA_17, _80S_aa_tRNA_eEF2_GTP_17, _80S_tRNA_17, _80S_tRNA_eEF3_GTP_17; isPartOf GO:0002182
  reaction28_2: _80S_tRNA_2 + eEF3_GTP => _80S_tRNA_eEF3_GTP_2; cytoplasm*k28f*_80S_tRNA_2*eEF3_GTP;  // isPartOf GO:0002182
  reaction29_2: _80S_tRNA_eEF3_GTP_2 => _80S_2 + eEF3_GDP + $tRNA; cytoplasm*k29f*_80S_tRNA_eEF3_GTP_2;  // isPartOf GO:0002182
  reaction22_3: aa_tRNA_eEF1A_GTP + _80S_3 -> _80S_aa_tRNA_eEF1A_GTP_3; cytoplasm*(k22f*aa_tRNA_eEF1A_GTP*_80S_3 - k22b*_80S_aa_tRNA_eEF1A_GTP_3);  // isPartOf GO:0002182
  reaction23_3: _80S_aa_tRNA_eEF1A_GTP_3 => _80S_aa_tRNA_3 + eEF1A_GDP; cytoplasm*k23f*_80S_aa_tRNA_eEF1A_GTP_3;  // isPartOf GO:0002182
  reaction25_3: eEF2_GTP + _80S_aa_tRNA_3 -> _80S_aa_tRNA_eEF2_GTP_3; cytoplasm*(k25f*eEF2_GTP*_80S_aa_tRNA_3 - k25b*_80S_aa_tRNA_eEF2_GTP_3);  // isPartOf GO:0002182
  reaction26_3: _80S_aa_tRNA_eEF2_GTP_3 => _80S_tRNA_4 + eEF2_GDP; cytoplasm*function_2(k26f, _80S_aa_tRNA_eEF2_GTP_3, mRNA_tot, _80S_4, _80S_aa_tRNA_eEF1A_GTP_4, _80S_aa_tRNA_4, _80S_aa_tRNA_eEF2_GTP_4, _80S_tRNA_4, _80S_tRNA_eEF3_GTP_4, _80S_5, _80S_aa_tRNA_eEF1A_GTP_5, _80S_aa_tRNA_5, _80S_aa_tRNA_eEF2_GTP_5, _80S_tRNA_5, _80S_tRNA_eEF3_GTP_5, _80S_6, _80S_aa_tRNA_eEF1A_GTP_6, _80S_aa_tRNA_6, _80S_aa_tRNA_eEF2_GTP_6, _80S_tRNA_6, _80S_tRNA_eEF3_GTP_6, _80S_7, _80S_aa_tRNA_eEF1A_GTP_7, _80S_aa_tRNA_7, _80S_aa_tRNA_eEF2_GTP_7, _80S_tRNA_7, _80S_tRNA_eEF3_GTP_7, _80S_8, _80S_aa_tRNA_eEF1A_GTP_8, _80S_aa_tRNA_8, _80S_aa_tRNA_eEF2_GTP_8, _80S_tRNA_8, _80S_tRNA_eEF3_GTP_8, _80S_9, _80S_aa_tRNA_eEF1A_GTP_9, _80S_aa_tRNA_9, _80S_aa_tRNA_eEF2_GTP_9, _80S_tRNA_9, _80S_tRNA_eEF3_GTP_9, _80S_10, _80S_aa_tRNA_eEF1A_GTP_10, _80S_aa_tRNA_10, _80S_aa_tRNA_eEF2_GTP_10, _80S_tRNA_10, _80S_tRNA_eEF3_GTP_10, _80S_11, _80S_aa_tRNA_eEF1A_GTP_11, _80S_aa_tRNA_11, _80S_aa_tRNA_eEF2_GTP_11, _80S_tRNA_11, _80S_tRNA_eEF3_GTP_11, _80S_12, _80S_aa_tRNA_eEF1A_GTP_12, _80S_aa_tRNA_12, _80S_aa_tRNA_eEF2_GTP_12, _80S_tRNA_12, _80S_tRNA_eEF3_GTP_12, _80S_13, _80S_aa_tRNA_eEF1A_GTP_13, _80S_aa_tRNA_13, _80S_aa_tRNA_eEF2_GTP_13, _80S_tRNA_13, _80S_tRNA_eEF3_GTP_13, _80S_14, _80S_aa_tRNA_eEF1A_GTP_14, _80S_aa_tRNA_14, _80S_aa_tRNA_eEF2_GTP_14, _80S_tRNA_14, _80S_tRNA_eEF3_GTP_14, _80S_15, _80S_aa_tRNA_eEF1A_GTP_15, _80S_aa_tRNA_15, _80S_aa_tRNA_eEF2_GTP_15, _80S_tRNA_15, _80S_tRNA_eEF3_GTP_15, _80S_16, _80S_aa_tRNA_eEF1A_GTP_16, _80S_aa_tRNA_16, _80S_aa_tRNA_eEF2_GTP_16, _80S_tRNA_16, _80S_tRNA_eEF3_GTP_16, _80S_17, _80S_aa_tRNA_eEF1A_GTP_17, _80S_aa_tRNA_17, _80S_aa_tRNA_eEF2_GTP_17, _80S_tRNA_17, _80S_tRNA_eEF3_GTP_17, _80S_18, _80S_aa_tRNA_eEF1A_GTP_18, _80S_aa_tRNA_18, _80S_aa_tRNA_eEF2_GTP_18, _80S_tRNA_18, _80S_tRNA_eEF3_GTP_18);  // modifiers: _80S_4, _80S_aa_tRNA_eEF1A_GTP_4, _80S_aa_tRNA_4, _80S_aa_tRNA_eEF2_GTP_4, _80S_tRNA_eEF3_GTP_4, _80S_5, _80S_aa_tRNA_eEF1A_GTP_5, _80S_aa_tRNA_5, _80S_aa_tRNA_eEF2_GTP_5, _80S_tRNA_5, _80S_tRNA_eEF3_GTP_5, _80S_6, _80S_aa_tRNA_eEF1A_GTP_6, _80S_aa_tRNA_6, _80S_aa_tRNA_eEF2_GTP_6, _80S_tRNA_6, _80S_tRNA_eEF3_GTP_6, _80S_7, _80S_aa_tRNA_eEF1A_GTP_7, _80S_aa_tRNA_7, _80S_aa_tRNA_eEF2_GTP_7, _80S_tRNA_7, _80S_tRNA_eEF3_GTP_7, _80S_8, _80S_aa_tRNA_eEF1A_GTP_8, _80S_aa_tRNA_8, _80S_aa_tRNA_eEF2_GTP_8, _80S_tRNA_8, _80S_tRNA_eEF3_GTP_8, _80S_9, _80S_aa_tRNA_eEF1A_GTP_9, _80S_aa_tRNA_9, _80S_aa_tRNA_eEF2_GTP_9, _80S_tRNA_9, _80S_tRNA_eEF3_GTP_9, _80S_10, _80S_aa_tRNA_eEF1A_GTP_10, _80S_aa_tRNA_10, _80S_aa_tRNA_eEF2_GTP_10, _80S_tRNA_10, _80S_tRNA_eEF3_GTP_10, _80S_11, _80S_aa_tRNA_eEF1A_GTP_11, _80S_aa_tRNA_11, _80S_aa_tRNA_eEF2_GTP_11, _80S_tRNA_11, _80S_tRNA_eEF3_GTP_11, _80S_12, _80S_aa_tRNA_eEF1A_GTP_12, _80S_aa_tRNA_12, _80S_aa_tRNA_eEF2_GTP_12, _80S_tRNA_12, _80S_tRNA_eEF3_GTP_12, _80S_13, _80S_aa_tRNA_eEF1A_GTP_13, _80S_aa_tRNA_13, _80S_aa_tRNA_eEF2_GTP_13, _80S_tRNA_13, _80S_tRNA_eEF3_GTP_13, _80S_14, _80S_aa_tRNA_eEF1A_GTP_14, _80S_aa_tRNA_14, _80S_aa_tRNA_eEF2_GTP_14, _80S_tRNA_14, _80S_tRNA_eEF3_GTP_14, _80S_15, _80S_aa_tRNA_eEF1A_GTP_15, _80S_aa_tRNA_15, _80S_aa_tRNA_eEF2_GTP_15, _80S_tRNA_15, _80S_tRNA_eEF3_GTP_15, _80S_16, _80S_aa_tRNA_eEF1A_GTP_16, _80S_aa_tRNA_16, _80S_aa_tRNA_eEF2_GTP_16, _80S_tRNA_16, _80S_tRNA_eEF3_GTP_16, _80S_17, _80S_aa_tRNA_eEF1A_GTP_17, _80S_aa_tRNA_17, _80S_aa_tRNA_eEF2_GTP_17, _80S_tRNA_17, _80S_tRNA_eEF3_GTP_17, _80S_18, _80S_aa_tRNA_eEF1A_GTP_18, _80S_aa_tRNA_18, _80S_aa_tRNA_eEF2_GTP_18, _80S_tRNA_18, _80S_tRNA_eEF3_GTP_18; isPartOf GO:0002182
  reaction28_3: _80S_tRNA_3 + eEF3_GTP => _80S_tRNA_eEF3_GTP_3; cytoplasm*k28f*_80S_tRNA_3*eEF3_GTP;  // isPartOf GO:0002182
  reaction29_3: _80S_tRNA_eEF3_GTP_3 => _80S_3 + eEF3_GDP + $tRNA; cytoplasm*k29f*_80S_tRNA_eEF3_GTP_3;  // isPartOf GO:0002182
  reaction22_4: aa_tRNA_eEF1A_GTP + _80S_4 -> _80S_aa_tRNA_eEF1A_GTP_4; cytoplasm*(k22f*aa_tRNA_eEF1A_GTP*_80S_4 - k22b*_80S_aa_tRNA_eEF1A_GTP_4);  // isPartOf GO:0002182
  reaction23_4: _80S_aa_tRNA_eEF1A_GTP_4 => _80S_aa_tRNA_4 + eEF1A_GDP; cytoplasm*k23f*_80S_aa_tRNA_eEF1A_GTP_4;  // isPartOf GO:0002182
  reaction25_4: eEF2_GTP + _80S_aa_tRNA_4 -> _80S_aa_tRNA_eEF2_GTP_4; cytoplasm*(k25f*eEF2_GTP*_80S_aa_tRNA_4 - k25b*_80S_aa_tRNA_eEF2_GTP_4);  // isPartOf GO:0002182
  reaction26_4: _80S_aa_tRNA_eEF2_GTP_4 => _80S_tRNA_5 + eEF2_GDP; cytoplasm*function_2(k26f, _80S_aa_tRNA_eEF2_GTP_4, mRNA_tot, _80S_5, _80S_aa_tRNA_eEF1A_GTP_5, _80S_aa_tRNA_5, _80S_aa_tRNA_eEF2_GTP_5, _80S_tRNA_5, _80S_tRNA_eEF3_GTP_5, _80S_6, _80S_aa_tRNA_eEF1A_GTP_6, _80S_aa_tRNA_6, _80S_aa_tRNA_eEF2_GTP_6, _80S_tRNA_6, _80S_tRNA_eEF3_GTP_6, _80S_7, _80S_aa_tRNA_eEF1A_GTP_7, _80S_aa_tRNA_7, _80S_aa_tRNA_eEF2_GTP_7, _80S_tRNA_7, _80S_tRNA_eEF3_GTP_7, _80S_8, _80S_aa_tRNA_eEF1A_GTP_8, _80S_aa_tRNA_8, _80S_aa_tRNA_eEF2_GTP_8, _80S_tRNA_8, _80S_tRNA_eEF3_GTP_8, _80S_9, _80S_aa_tRNA_eEF1A_GTP_9, _80S_aa_tRNA_9, _80S_aa_tRNA_eEF2_GTP_9, _80S_tRNA_9, _80S_tRNA_eEF3_GTP_9, _80S_10, _80S_aa_tRNA_eEF1A_GTP_10, _80S_aa_tRNA_10, _80S_aa_tRNA_eEF2_GTP_10, _80S_tRNA_10, _80S_tRNA_eEF3_GTP_10, _80S_11, _80S_aa_tRNA_eEF1A_GTP_11, _80S_aa_tRNA_11, _80S_aa_tRNA_eEF2_GTP_11, _80S_tRNA_11, _80S_tRNA_eEF3_GTP_11, _80S_12, _80S_aa_tRNA_eEF1A_GTP_12, _80S_aa_tRNA_12, _80S_aa_tRNA_eEF2_GTP_12, _80S_tRNA_12, _80S_tRNA_eEF3_GTP_12, _80S_13, _80S_aa_tRNA_eEF1A_GTP_13, _80S_aa_tRNA_13, _80S_aa_tRNA_eEF2_GTP_13, _80S_tRNA_13, _80S_tRNA_eEF3_GTP_13, _80S_14, _80S_aa_tRNA_eEF1A_GTP_14, _80S_aa_tRNA_14, _80S_aa_tRNA_eEF2_GTP_14, _80S_tRNA_14, _80S_tRNA_eEF3_GTP_14, _80S_15, _80S_aa_tRNA_eEF1A_GTP_15, _80S_aa_tRNA_15, _80S_aa_tRNA_eEF2_GTP_15, _80S_tRNA_15, _80S_tRNA_eEF3_GTP_15, _80S_16, _80S_aa_tRNA_eEF1A_GTP_16, _80S_aa_tRNA_16, _80S_aa_tRNA_eEF2_GTP_16, _80S_tRNA_16, _80S_tRNA_eEF3_GTP_16, _80S_17, _80S_aa_tRNA_eEF1A_GTP_17, _80S_aa_tRNA_17, _80S_aa_tRNA_eEF2_GTP_17, _80S_tRNA_17, _80S_tRNA_eEF3_GTP_17, _80S_18, _80S_aa_tRNA_eEF1A_GTP_18, _80S_aa_tRNA_18, _80S_aa_tRNA_eEF2_GTP_18, _80S_tRNA_18, _80S_tRNA_eEF3_GTP_18, _80S_19, _80S_aa_tRNA_eEF1A_GTP_19, _80S_aa_tRNA_19, _80S_aa_tRNA_eEF2_GTP_19, _80S_tRNA_19, _80S_tRNA_eEF3_GTP_19);  // modifiers: _80S_5, _80S_aa_tRNA_eEF1A_GTP_5, _80S_aa_tRNA_5, _80S_aa_tRNA_eEF2_GTP_5, _80S_tRNA_eEF3_GTP_5, _80S_6, _80S_aa_tRNA_eEF1A_GTP_6, _80S_aa_tRNA_6, _80S_aa_tRNA_eEF2_GTP_6, _80S_tRNA_6, _80S_tRNA_eEF3_GTP_6, _80S_7, _80S_aa_tRNA_eEF1A_GTP_7, _80S_aa_tRNA_7, _80S_aa_tRNA_eEF2_GTP_7, _80S_tRNA_7, _80S_tRNA_eEF3_GTP_7, _80S_8, _80S_aa_tRNA_eEF1A_GTP_8, _80S_aa_tRNA_8, _80S_aa_tRNA_eEF2_GTP_8, _80S_tRNA_8, _80S_tRNA_eEF3_GTP_8, _80S_9, _80S_aa_tRNA_eEF1A_GTP_9, _80S_aa_tRNA_9, _80S_aa_tRNA_eEF2_GTP_9, _80S_tRNA_9, _80S_tRNA_eEF3_GTP_9, _80S_10, _80S_aa_tRNA_eEF1A_GTP_10, _80S_aa_tRNA_10, _80S_aa_tRNA_eEF2_GTP_10, _80S_tRNA_10, _80S_tRNA_eEF3_GTP_10, _80S_11, _80S_aa_tRNA_eEF1A_GTP_11, _80S_aa_tRNA_11, _80S_aa_tRNA_eEF2_GTP_11, _80S_tRNA_11, _80S_tRNA_eEF3_GTP_11, _80S_12, _80S_aa_tRNA_eEF1A_GTP_12, _80S_aa_tRNA_12, _80S_aa_tRNA_eEF2_GTP_12, _80S_tRNA_12, _80S_tRNA_eEF3_GTP_12, _80S_13, _80S_aa_tRNA_eEF1A_GTP_13, _80S_aa_tRNA_13, _80S_aa_tRNA_eEF2_GTP_13, _80S_tRNA_13, _80S_tRNA_eEF3_GTP_13, _80S_14, _80S_aa_tRNA_eEF1A_GTP_14, _80S_aa_tRNA_14, _80S_aa_tRNA_eEF2_GTP_14, _80S_tRNA_14, _80S_tRNA_eEF3_GTP_14, _80S_15, _80S_aa_tRNA_eEF1A_GTP_15, _80S_aa_tRNA_15, _80S_aa_tRNA_eEF2_GTP_15, _80S_tRNA_15, _80S_tRNA_eEF3_GTP_15, _80S_16, _80S_aa_tRNA_eEF1A_GTP_16, _80S_aa_tRNA_16, _80S_aa_tRNA_eEF2_GTP_16, _80S_tRNA_16, _80S_tRNA_eEF3_GTP_16, _80S_17, _80S_aa_tRNA_eEF1A_GTP_17, _80S_aa_tRNA_17, _80S_aa_tRNA_eEF2_GTP_17, _80S_tRNA_17, _80S_tRNA_eEF3_GTP_17, _80S_18, _80S_aa_tRNA_eEF1A_GTP_18, _80S_aa_tRNA_18, _80S_aa_tRNA_eEF2_GTP_18, _80S_tRNA_18, _80S_tRNA_eEF3_GTP_18, _80S_19, _80S_aa_tRNA_eEF1A_GTP_19, _80S_aa_tRNA_19, _80S_aa_tRNA_eEF2_GTP_19, _80S_tRNA_19, _80S_tRNA_eEF3_GTP_19; isPartOf GO:0002182
  reaction28_4: _80S_tRNA_4 + eEF3_GTP => _80S_tRNA_eEF3_GTP_4; cytoplasm*k28f*_80S_tRNA_4*eEF3_GTP;  // isPartOf GO:0002182
  reaction29_4: _80S_tRNA_eEF3_GTP_4 => _80S_4 + eEF3_GDP + $tRNA; cytoplasm*k29f*_80S_tRNA_eEF3_GTP_4;  // isPartOf GO:0002182
  reaction22_5: aa_tRNA_eEF1A_GTP + _80S_5 -> _80S_aa_tRNA_eEF1A_GTP_5; cytoplasm*(k22f*aa_tRNA_eEF1A_GTP*_80S_5 - k22b*_80S_aa_tRNA_eEF1A_GTP_5);  // isPartOf GO:0002182
  reaction23_5: _80S_aa_tRNA_eEF1A_GTP_5 => _80S_aa_tRNA_5 + eEF1A_GDP; cytoplasm*k23f*_80S_aa_tRNA_eEF1A_GTP_5;  // isPartOf GO:0002182
  reaction25_5: eEF2_GTP + _80S_aa_tRNA_5 -> _80S_aa_tRNA_eEF2_GTP_5; cytoplasm*(k25f*eEF2_GTP*_80S_aa_tRNA_5 - k25b*_80S_aa_tRNA_eEF2_GTP_5);  // isPartOf GO:0002182
  reaction26_5: _80S_aa_tRNA_eEF2_GTP_5 => _80S_tRNA_6 + eEF2_GDP; cytoplasm*function_3(k26f, _80S_aa_tRNA_eEF2_GTP_5, mRNA_tot, _80S_6, _80S_aa_tRNA_eEF1A_GTP_6, _80S_aa_tRNA_6, _80S_aa_tRNA_eEF2_GTP_6, _80S_tRNA_6, _80S_tRNA_eEF3_GTP_6, _80S_7, _80S_aa_tRNA_eEF1A_GTP_7, _80S_aa_tRNA_7, _80S_aa_tRNA_eEF2_GTP_7, _80S_tRNA_7, _80S_tRNA_eEF3_GTP_7, _80S_8, _80S_aa_tRNA_eEF1A_GTP_8, _80S_aa_tRNA_8, _80S_aa_tRNA_eEF2_GTP_8, _80S_tRNA_8, _80S_tRNA_eEF3_GTP_8, _80S_9, _80S_aa_tRNA_eEF1A_GTP_9, _80S_aa_tRNA_9, _80S_aa_tRNA_eEF2_GTP_9, _80S_tRNA_9, _80S_tRNA_eEF3_GTP_9, _80S_10, _80S_aa_tRNA_eEF1A_GTP_10, _80S_aa_tRNA_10, _80S_aa_tRNA_eEF2_GTP_10, _80S_tRNA_10, _80S_tRNA_eEF3_GTP_10, _80S_11, _80S_aa_tRNA_eEF1A_GTP_11, _80S_aa_tRNA_11, _80S_aa_tRNA_eEF2_GTP_11, _80S_tRNA_11, _80S_tRNA_eEF3_GTP_11, _80S_12, _80S_aa_tRNA_eEF1A_GTP_12, _80S_aa_tRNA_12, _80S_aa_tRNA_eEF2_GTP_12, _80S_tRNA_12, _80S_tRNA_eEF3_GTP_12, _80S_13, _80S_aa_tRNA_eEF1A_GTP_13, _80S_aa_tRNA_13, _80S_aa_tRNA_eEF2_GTP_13, _80S_tRNA_13, _80S_tRNA_eEF3_GTP_13, _80S_14, _80S_aa_tRNA_eEF1A_GTP_14, _80S_aa_tRNA_14, _80S_aa_tRNA_eEF2_GTP_14, _80S_tRNA_14, _80S_tRNA_eEF3_GTP_14, _80S_15, _80S_aa_tRNA_eEF1A_GTP_15, _80S_aa_tRNA_15, _80S_aa_tRNA_eEF2_GTP_15, _80S_tRNA_15, _80S_tRNA_eEF3_GTP_15, _80S_16, _80S_aa_tRNA_eEF1A_GTP_16, _80S_aa_tRNA_16, _80S_aa_tRNA_eEF2_GTP_16, _80S_tRNA_16, _80S_tRNA_eEF3_GTP_16, _80S_17, _80S_aa_tRNA_eEF1A_GTP_17, _80S_aa_tRNA_17, _80S_aa_tRNA_eEF2_GTP_17, _80S_tRNA_17, _80S_tRNA_eEF3_GTP_17, _80S_18, _80S_aa_tRNA_eEF1A_GTP_18, _80S_aa_tRNA_18, _80S_aa_tRNA_eEF2_GTP_18, _80S_tRNA_18, _80S_tRNA_eEF3_GTP_18, _80S_19, _80S_aa_tRNA_eEF1A_GTP_19, _80S_aa_tRNA_19, _80S_aa_tRNA_eEF2_GTP_19, _80S_tRNA_19, _80S_tRNA_eEF3_GTP_19, _80S_20, _80S_tRNA_20, _80S_tRNA_eEF3_GTP_20);  // modifiers: _80S_6, _80S_aa_tRNA_eEF1A_GTP_6, _80S_aa_tRNA_6, _80S_aa_tRNA_eEF2_GTP_6, _80S_tRNA_eEF3_GTP_6, _80S_7, _80S_aa_tRNA_eEF1A_GTP_7, _80S_aa_tRNA_7, _80S_aa_tRNA_eEF2_GTP_7, _80S_tRNA_7, _80S_tRNA_eEF3_GTP_7, _80S_8, _80S_aa_tRNA_eEF1A_GTP_8, _80S_aa_tRNA_8, _80S_aa_tRNA_eEF2_GTP_8, _80S_tRNA_8, _80S_tRNA_eEF3_GTP_8, _80S_9, _80S_aa_tRNA_eEF1A_GTP_9, _80S_aa_tRNA_9, _80S_aa_tRNA_eEF2_GTP_9, _80S_tRNA_9, _80S_tRNA_eEF3_GTP_9, _80S_10, _80S_aa_tRNA_eEF1A_GTP_10, _80S_aa_tRNA_10, _80S_aa_tRNA_eEF2_GTP_10, _80S_tRNA_10, _80S_tRNA_eEF3_GTP_10, _80S_11, _80S_aa_tRNA_eEF1A_GTP_11, _80S_aa_tRNA_11, _80S_aa_tRNA_eEF2_GTP_11, _80S_tRNA_11, _80S_tRNA_eEF3_GTP_11, _80S_12, _80S_aa_tRNA_eEF1A_GTP_12, _80S_aa_tRNA_12, _80S_aa_tRNA_eEF2_GTP_12, _80S_tRNA_12, _80S_tRNA_eEF3_GTP_12, _80S_13, _80S_aa_tRNA_eEF1A_GTP_13, _80S_aa_tRNA_13, _80S_aa_tRNA_eEF2_GTP_13, _80S_tRNA_13, _80S_tRNA_eEF3_GTP_13, _80S_14, _80S_aa_tRNA_eEF1A_GTP_14, _80S_aa_tRNA_14, _80S_aa_tRNA_eEF2_GTP_14, _80S_tRNA_14, _80S_tRNA_eEF3_GTP_14, _80S_15, _80S_aa_tRNA_eEF1A_GTP_15, _80S_aa_tRNA_15, _80S_aa_tRNA_eEF2_GTP_15, _80S_tRNA_15, _80S_tRNA_eEF3_GTP_15, _80S_16, _80S_aa_tRNA_eEF1A_GTP_16, _80S_aa_tRNA_16, _80S_aa_tRNA_eEF2_GTP_16, _80S_tRNA_16, _80S_tRNA_eEF3_GTP_16, _80S_17, _80S_aa_tRNA_eEF1A_GTP_17, _80S_aa_tRNA_17, _80S_aa_tRNA_eEF2_GTP_17, _80S_tRNA_17, _80S_tRNA_eEF3_GTP_17, _80S_18, _80S_aa_tRNA_eEF1A_GTP_18, _80S_aa_tRNA_18, _80S_aa_tRNA_eEF2_GTP_18, _80S_tRNA_18, _80S_tRNA_eEF3_GTP_18, _80S_19, _80S_aa_tRNA_eEF1A_GTP_19, _80S_aa_tRNA_19, _80S_aa_tRNA_eEF2_GTP_19, _80S_tRNA_19, _80S_tRNA_eEF3_GTP_19, _80S_20, _80S_tRNA_20, _80S_tRNA_eEF3_GTP_20; isPartOf GO:0002182
  reaction28_5: _80S_tRNA_5 + eEF3_GTP => _80S_tRNA_eEF3_GTP_5; cytoplasm*k28f*_80S_tRNA_5*eEF3_GTP;  // isPartOf GO:0002182
  reaction29_5: _80S_tRNA_eEF3_GTP_5 => _80S_5 + eEF3_GDP + $tRNA; cytoplasm*k29f*_80S_tRNA_eEF3_GTP_5;  // isPartOf GO:0002182
  reaction22_6: aa_tRNA_eEF1A_GTP + _80S_6 -> _80S_aa_tRNA_eEF1A_GTP_6; cytoplasm*(k22f*aa_tRNA_eEF1A_GTP*_80S_6 - k22b*_80S_aa_tRNA_eEF1A_GTP_6);  // isPartOf GO:0002182
  reaction23_6: _80S_aa_tRNA_eEF1A_GTP_6 => _80S_aa_tRNA_6 + eEF1A_GDP; cytoplasm*k23f*_80S_aa_tRNA_eEF1A_GTP_6;  // isPartOf GO:0002182
  reaction25_6: eEF2_GTP + _80S_aa_tRNA_6 -> _80S_aa_tRNA_eEF2_GTP_6; cytoplasm*(k25f*eEF2_GTP*_80S_aa_tRNA_6 - k25b*_80S_aa_tRNA_eEF2_GTP_6);  // isPartOf GO:0002182
  reaction26_6: _80S_aa_tRNA_eEF2_GTP_6 => _80S_tRNA_7 + eEF2_GDP; cytoplasm*k26f*_80S_aa_tRNA_eEF2_GTP_6;  // isPartOf GO:0002182
  reaction28_6: _80S_tRNA_6 + eEF3_GTP => _80S_tRNA_eEF3_GTP_6; cytoplasm*k28f*_80S_tRNA_6*eEF3_GTP;  // isPartOf GO:0002182
  reaction29_6: _80S_tRNA_eEF3_GTP_6 => _80S_6 + eEF3_GDP + $tRNA; cytoplasm*k29f*_80S_tRNA_eEF3_GTP_6;  // isPartOf GO:0002182
  reaction22_7: aa_tRNA_eEF1A_GTP + _80S_7 -> _80S_aa_tRNA_eEF1A_GTP_7; cytoplasm*(k22f*aa_tRNA_eEF1A_GTP*_80S_7 - k22b*_80S_aa_tRNA_eEF1A_GTP_7);  // isPartOf GO:0002182
  reaction23_7: _80S_aa_tRNA_eEF1A_GTP_7 => _80S_aa_tRNA_7 + eEF1A_GDP; cytoplasm*k23f*_80S_aa_tRNA_eEF1A_GTP_7;  // isPartOf GO:0002182
  reaction25_7: eEF2_GTP + _80S_aa_tRNA_7 -> _80S_aa_tRNA_eEF2_GTP_7; cytoplasm*(k25f*eEF2_GTP*_80S_aa_tRNA_7 - k25b*_80S_aa_tRNA_eEF2_GTP_7);  // isPartOf GO:0002182
  reaction26_7: _80S_aa_tRNA_eEF2_GTP_7 => _80S_tRNA_8 + eEF2_GDP; cytoplasm*k26f*_80S_aa_tRNA_eEF2_GTP_7;  // isPartOf GO:0002182
  reaction28_7: _80S_tRNA_7 + eEF3_GTP => _80S_tRNA_eEF3_GTP_7; cytoplasm*k28f*_80S_tRNA_7*eEF3_GTP;  // isPartOf GO:0002182
  reaction29_7: _80S_tRNA_eEF3_GTP_7 => _80S_7 + eEF3_GDP + $tRNA; cytoplasm*k29f*_80S_tRNA_eEF3_GTP_7;  // isPartOf GO:0002182
  reaction22_8: aa_tRNA_eEF1A_GTP + _80S_8 -> _80S_aa_tRNA_eEF1A_GTP_8; cytoplasm*(k22f*aa_tRNA_eEF1A_GTP*_80S_8 - k22b*_80S_aa_tRNA_eEF1A_GTP_8);  // isPartOf GO:0002182
  reaction23_8: _80S_aa_tRNA_eEF1A_GTP_8 => _80S_aa_tRNA_8 + eEF1A_GDP; cytoplasm*k23f*_80S_aa_tRNA_eEF1A_GTP_8;  // isPartOf GO:0002182
  reaction25_8: eEF2_GTP + _80S_aa_tRNA_8 -> _80S_aa_tRNA_eEF2_GTP_8; cytoplasm*(k25f*eEF2_GTP*_80S_aa_tRNA_8 - k25b*_80S_aa_tRNA_eEF2_GTP_8);  // isPartOf GO:0002182
  reaction26_8: _80S_aa_tRNA_eEF2_GTP_8 => _80S_tRNA_9 + eEF2_GDP; cytoplasm*k26f*_80S_aa_tRNA_eEF2_GTP_8;  // isPartOf GO:0002182
  reaction28_8: _80S_tRNA_8 + eEF3_GTP => _80S_tRNA_eEF3_GTP_8; cytoplasm*k28f*_80S_tRNA_8*eEF3_GTP;  // isPartOf GO:0002182
  reaction29_8: _80S_tRNA_eEF3_GTP_8 => _80S_8 + eEF3_GDP + $tRNA; cytoplasm*k29f*_80S_tRNA_eEF3_GTP_8;  // isPartOf GO:0002182
  reaction22_9: aa_tRNA_eEF1A_GTP + _80S_9 -> _80S_aa_tRNA_eEF1A_GTP_9; cytoplasm*(k22f*aa_tRNA_eEF1A_GTP*_80S_9 - k22b*_80S_aa_tRNA_eEF1A_GTP_9);  // isPartOf GO:0002182
  reaction23_9: _80S_aa_tRNA_eEF1A_GTP_9 => _80S_aa_tRNA_9 + eEF1A_GDP; cytoplasm*k23f*_80S_aa_tRNA_eEF1A_GTP_9;  // isPartOf GO:0002182
  reaction25_9: eEF2_GTP + _80S_aa_tRNA_9 -> _80S_aa_tRNA_eEF2_GTP_9; cytoplasm*(k25f*eEF2_GTP*_80S_aa_tRNA_9 - k25b*_80S_aa_tRNA_eEF2_GTP_9);  // isPartOf GO:0002182
  reaction26_9: _80S_aa_tRNA_eEF2_GTP_9 => _80S_tRNA_10 + eEF2_GDP; cytoplasm*k26f*_80S_aa_tRNA_eEF2_GTP_9;  // isPartOf GO:0002182
  reaction28_9: _80S_tRNA_9 + eEF3_GTP => _80S_tRNA_eEF3_GTP_9; cytoplasm*k28f*_80S_tRNA_9*eEF3_GTP;  // isPartOf GO:0002182
  reaction29_9: _80S_tRNA_eEF3_GTP_9 => _80S_9 + eEF3_GDP + $tRNA; cytoplasm*k29f*_80S_tRNA_eEF3_GTP_9;  // isPartOf GO:0002182
  reaction22_10: aa_tRNA_eEF1A_GTP + _80S_10 -> _80S_aa_tRNA_eEF1A_GTP_10; cytoplasm*(k22f*aa_tRNA_eEF1A_GTP*_80S_10 - k22b*_80S_aa_tRNA_eEF1A_GTP_10);  // isPartOf GO:0002182
  reaction23_10: _80S_aa_tRNA_eEF1A_GTP_10 => _80S_aa_tRNA_10 + eEF1A_GDP; cytoplasm*k23f*_80S_aa_tRNA_eEF1A_GTP_10;  // isPartOf GO:0002182
  reaction25_10: eEF2_GTP + _80S_aa_tRNA_10 -> _80S_aa_tRNA_eEF2_GTP_10; cytoplasm*(k25f*eEF2_GTP*_80S_aa_tRNA_10 - k25b*_80S_aa_tRNA_eEF2_GTP_10);  // isPartOf GO:0002182
  reaction26_10: _80S_aa_tRNA_eEF2_GTP_10 => _80S_tRNA_11 + eEF2_GDP; cytoplasm*k26f*_80S_aa_tRNA_eEF2_GTP_10;  // isPartOf GO:0002182
  reaction28_10: _80S_tRNA_10 + eEF3_GTP => _80S_tRNA_eEF3_GTP_10; cytoplasm*k28f*_80S_tRNA_10*eEF3_GTP;  // isPartOf GO:0002182
  reaction29_10: _80S_tRNA_eEF3_GTP_10 => _80S_10 + eEF3_GDP + $tRNA; cytoplasm*k29f*_80S_tRNA_eEF3_GTP_10;  // isPartOf GO:0002182
  reaction22_11: aa_tRNA_eEF1A_GTP + _80S_11 -> _80S_aa_tRNA_eEF1A_GTP_11; cytoplasm*(k22f*aa_tRNA_eEF1A_GTP*_80S_11 - k22b*_80S_aa_tRNA_eEF1A_GTP_11);  // isPartOf GO:0002182
  reaction23_11: _80S_aa_tRNA_eEF1A_GTP_11 => _80S_aa_tRNA_11 + eEF1A_GDP; cytoplasm*k23f*_80S_aa_tRNA_eEF1A_GTP_11;  // isPartOf GO:0002182
  reaction25_11: eEF2_GTP + _80S_aa_tRNA_11 -> _80S_aa_tRNA_eEF2_GTP_11; cytoplasm*(k25f*eEF2_GTP*_80S_aa_tRNA_11 - k25b*_80S_aa_tRNA_eEF2_GTP_11);  // isPartOf GO:0002182
  reaction26_11: _80S_aa_tRNA_eEF2_GTP_11 => _80S_tRNA_12 + eEF2_GDP; cytoplasm*k26f*_80S_aa_tRNA_eEF2_GTP_11;  // isPartOf GO:0002182
  reaction28_11: _80S_tRNA_11 + eEF3_GTP => _80S_tRNA_eEF3_GTP_11; cytoplasm*k28f*_80S_tRNA_11*eEF3_GTP;  // isPartOf GO:0002182
  reaction29_11: _80S_tRNA_eEF3_GTP_11 => _80S_11 + eEF3_GDP + $tRNA; cytoplasm*k29f*_80S_tRNA_eEF3_GTP_11;  // isPartOf GO:0002182
  reaction22_12: aa_tRNA_eEF1A_GTP + _80S_12 -> _80S_aa_tRNA_eEF1A_GTP_12; cytoplasm*(k22f*aa_tRNA_eEF1A_GTP*_80S_12 - k22b*_80S_aa_tRNA_eEF1A_GTP_12);  // isPartOf GO:0002182
  reaction23_12: _80S_aa_tRNA_eEF1A_GTP_12 => _80S_aa_tRNA_12 + eEF1A_GDP; cytoplasm*k23f*_80S_aa_tRNA_eEF1A_GTP_12;  // isPartOf GO:0002182
  reaction25_12: eEF2_GTP + _80S_aa_tRNA_12 -> _80S_aa_tRNA_eEF2_GTP_12; cytoplasm*(k25f*eEF2_GTP*_80S_aa_tRNA_12 - k25b*_80S_aa_tRNA_eEF2_GTP_12);  // isPartOf GO:0002182
  reaction26_12: _80S_aa_tRNA_eEF2_GTP_12 => _80S_tRNA_13 + eEF2_GDP; cytoplasm*k26f*_80S_aa_tRNA_eEF2_GTP_12;  // isPartOf GO:0002182
  reaction28_12: _80S_tRNA_12 + eEF3_GTP => _80S_tRNA_eEF3_GTP_12; cytoplasm*k28f*_80S_tRNA_12*eEF3_GTP;  // isPartOf GO:0002182
  reaction29_12: _80S_tRNA_eEF3_GTP_12 => _80S_12 + eEF3_GDP + $tRNA; cytoplasm*k29f*_80S_tRNA_eEF3_GTP_12;  // isPartOf GO:0002182
  reaction22_13: aa_tRNA_eEF1A_GTP + _80S_13 -> _80S_aa_tRNA_eEF1A_GTP_13; cytoplasm*(k22f*aa_tRNA_eEF1A_GTP*_80S_13 - k22b*_80S_aa_tRNA_eEF1A_GTP_13);  // isPartOf GO:0002182
  reaction23_13: _80S_aa_tRNA_eEF1A_GTP_13 => _80S_aa_tRNA_13 + eEF1A_GDP; cytoplasm*k23f*_80S_aa_tRNA_eEF1A_GTP_13;  // isPartOf GO:0002182
  reaction25_13: eEF2_GTP + _80S_aa_tRNA_13 -> _80S_aa_tRNA_eEF2_GTP_13; cytoplasm*(k25f*eEF2_GTP*_80S_aa_tRNA_13 - k25b*_80S_aa_tRNA_eEF2_GTP_13);  // isPartOf GO:0002182
  reaction26_13: _80S_aa_tRNA_eEF2_GTP_13 => _80S_tRNA_14 + eEF2_GDP; cytoplasm*k26f*_80S_aa_tRNA_eEF2_GTP_13;  // isPartOf GO:0002182
  reaction28_13: _80S_tRNA_13 + eEF3_GTP => _80S_tRNA_eEF3_GTP_13; cytoplasm*k28f*_80S_tRNA_13*eEF3_GTP;  // isPartOf GO:0002182
  reaction29_13: _80S_tRNA_eEF3_GTP_13 => _80S_13 + eEF3_GDP + $tRNA; cytoplasm*k29f*_80S_tRNA_eEF3_GTP_13;  // isPartOf GO:0002182
  reaction22_14: aa_tRNA_eEF1A_GTP + _80S_14 -> _80S_aa_tRNA_eEF1A_GTP_14; cytoplasm*(k22f*aa_tRNA_eEF1A_GTP*_80S_14 - k22b*_80S_aa_tRNA_eEF1A_GTP_14);  // isPartOf GO:0002182
  reaction23_14: _80S_aa_tRNA_eEF1A_GTP_14 => _80S_aa_tRNA_14 + eEF1A_GDP; cytoplasm*k23f*_80S_aa_tRNA_eEF1A_GTP_14;  // isPartOf GO:0002182
  reaction25_14: eEF2_GTP + _80S_aa_tRNA_14 -> _80S_aa_tRNA_eEF2_GTP_14; cytoplasm*(k25f*eEF2_GTP*_80S_aa_tRNA_14 - k25b*_80S_aa_tRNA_eEF2_GTP_14);  // isPartOf GO:0002182
  reaction26_14: _80S_aa_tRNA_eEF2_GTP_14 => _80S_tRNA_15 + eEF2_GDP; cytoplasm*k26f*_80S_aa_tRNA_eEF2_GTP_14;  // isPartOf GO:0002182
  reaction28_14: _80S_tRNA_14 + eEF3_GTP => _80S_tRNA_eEF3_GTP_14; cytoplasm*k28f*_80S_tRNA_14*eEF3_GTP;  // isPartOf GO:0002182
  reaction29_14: _80S_tRNA_eEF3_GTP_14 => _80S_14 + eEF3_GDP + $tRNA; cytoplasm*k29f*_80S_tRNA_eEF3_GTP_14;  // isPartOf GO:0002182
  reaction22_15: aa_tRNA_eEF1A_GTP + _80S_15 -> _80S_aa_tRNA_eEF1A_GTP_15; cytoplasm*(k22f*aa_tRNA_eEF1A_GTP*_80S_15 - k22b*_80S_aa_tRNA_eEF1A_GTP_15);  // isPartOf GO:0002182
  reaction23_15: _80S_aa_tRNA_eEF1A_GTP_15 => _80S_aa_tRNA_15 + eEF1A_GDP; cytoplasm*k23f*_80S_aa_tRNA_eEF1A_GTP_15;  // isPartOf GO:0002182
  reaction25_15: eEF2_GTP + _80S_aa_tRNA_15 -> _80S_aa_tRNA_eEF2_GTP_15; cytoplasm*(k25f*eEF2_GTP*_80S_aa_tRNA_15 - k25b*_80S_aa_tRNA_eEF2_GTP_15);  // isPartOf GO:0002182
  reaction26_15: _80S_aa_tRNA_eEF2_GTP_15 => _80S_tRNA_16 + eEF2_GDP; cytoplasm*k26f*_80S_aa_tRNA_eEF2_GTP_15;  // isPartOf GO:0002182
  reaction28_15: _80S_tRNA_15 + eEF3_GTP => _80S_tRNA_eEF3_GTP_15; cytoplasm*k28f*_80S_tRNA_15*eEF3_GTP;  // isPartOf GO:0002182
  reaction29_15: _80S_tRNA_eEF3_GTP_15 => _80S_15 + eEF3_GDP + $tRNA; cytoplasm*k29f*_80S_tRNA_eEF3_GTP_15;  // isPartOf GO:0002182
  reaction22_16: aa_tRNA_eEF1A_GTP + _80S_16 -> _80S_aa_tRNA_eEF1A_GTP_16; cytoplasm*(k22f*aa_tRNA_eEF1A_GTP*_80S_16 - k22b*_80S_aa_tRNA_eEF1A_GTP_16);  // isPartOf GO:0002182
  reaction23_16: _80S_aa_tRNA_eEF1A_GTP_16 => _80S_aa_tRNA_16 + eEF1A_GDP; cytoplasm*k23f*_80S_aa_tRNA_eEF1A_GTP_16;  // isPartOf GO:0002182
  reaction25_16: eEF2_GTP + _80S_aa_tRNA_16 -> _80S_aa_tRNA_eEF2_GTP_16; cytoplasm*(k25f*eEF2_GTP*_80S_aa_tRNA_16 - k25b*_80S_aa_tRNA_eEF2_GTP_16);  // isPartOf GO:0002182
  reaction26_16: _80S_aa_tRNA_eEF2_GTP_16 => _80S_tRNA_17 + eEF2_GDP; cytoplasm*k26f*_80S_aa_tRNA_eEF2_GTP_16;  // isPartOf GO:0002182
  reaction28_16: _80S_tRNA_16 + eEF3_GTP => _80S_tRNA_eEF3_GTP_16; cytoplasm*k28f*_80S_tRNA_16*eEF3_GTP;  // isPartOf GO:0002182
  reaction29_16: _80S_tRNA_eEF3_GTP_16 => _80S_16 + eEF3_GDP + $tRNA; cytoplasm*k29f*_80S_tRNA_eEF3_GTP_16;  // isPartOf GO:0002182
  reaction22_17: aa_tRNA_eEF1A_GTP + _80S_17 -> _80S_aa_tRNA_eEF1A_GTP_17; cytoplasm*(k22f*aa_tRNA_eEF1A_GTP*_80S_17 - k22b*_80S_aa_tRNA_eEF1A_GTP_17);  // isPartOf GO:0002182
  reaction23_17: _80S_aa_tRNA_eEF1A_GTP_17 => _80S_aa_tRNA_17 + eEF1A_GDP; cytoplasm*k23f*_80S_aa_tRNA_eEF1A_GTP_17;  // isPartOf GO:0002182
  reaction25_17: eEF2_GTP + _80S_aa_tRNA_17 -> _80S_aa_tRNA_eEF2_GTP_17; cytoplasm*(k25f*eEF2_GTP*_80S_aa_tRNA_17 - k25b*_80S_aa_tRNA_eEF2_GTP_17);  // isPartOf GO:0002182
  reaction26_17: _80S_aa_tRNA_eEF2_GTP_17 => _80S_tRNA_18 + eEF2_GDP; cytoplasm*k26f*_80S_aa_tRNA_eEF2_GTP_17;  // isPartOf GO:0002182
  reaction28_17: _80S_tRNA_17 + eEF3_GTP => _80S_tRNA_eEF3_GTP_17; cytoplasm*k28f*_80S_tRNA_17*eEF3_GTP;  // isPartOf GO:0002182
  reaction29_17: _80S_tRNA_eEF3_GTP_17 => _80S_17 + eEF3_GDP + $tRNA; cytoplasm*k29f*_80S_tRNA_eEF3_GTP_17;  // isPartOf GO:0002182
  reaction22_18: aa_tRNA_eEF1A_GTP + _80S_18 -> _80S_aa_tRNA_eEF1A_GTP_18; cytoplasm*(k22f*aa_tRNA_eEF1A_GTP*_80S_18 - k22b*_80S_aa_tRNA_eEF1A_GTP_18);  // isPartOf GO:0002182
  reaction23_18: _80S_aa_tRNA_eEF1A_GTP_18 => _80S_aa_tRNA_18 + eEF1A_GDP; cytoplasm*k23f*_80S_aa_tRNA_eEF1A_GTP_18;  // isPartOf GO:0002182
  reaction25_18: eEF2_GTP + _80S_aa_tRNA_18 -> _80S_aa_tRNA_eEF2_GTP_18; cytoplasm*(k25f*eEF2_GTP*_80S_aa_tRNA_18 - k25b*_80S_aa_tRNA_eEF2_GTP_18);  // isPartOf GO:0002182
  reaction26_18: _80S_aa_tRNA_eEF2_GTP_18 => _80S_tRNA_19 + eEF2_GDP; cytoplasm*k26f*_80S_aa_tRNA_eEF2_GTP_18;  // isPartOf GO:0002182
  reaction28_18: _80S_tRNA_18 + eEF3_GTP => _80S_tRNA_eEF3_GTP_18; cytoplasm*k28f*_80S_tRNA_18*eEF3_GTP;  // isPartOf GO:0002182
  reaction29_18: _80S_tRNA_eEF3_GTP_18 => _80S_18 + eEF3_GDP + $tRNA; cytoplasm*k29f*_80S_tRNA_eEF3_GTP_18;  // isPartOf GO:0002182
  reaction22_19: aa_tRNA_eEF1A_GTP + _80S_19 -> _80S_aa_tRNA_eEF1A_GTP_19; cytoplasm*(k22f*aa_tRNA_eEF1A_GTP*_80S_19 - k22b*_80S_aa_tRNA_eEF1A_GTP_19);  // isPartOf GO:0002182
  reaction23_19: _80S_aa_tRNA_eEF1A_GTP_19 => _80S_aa_tRNA_19 + eEF1A_GDP; cytoplasm*k23f*_80S_aa_tRNA_eEF1A_GTP_19;  // isPartOf GO:0002182
  reaction25_19: eEF2_GTP + _80S_aa_tRNA_19 -> _80S_aa_tRNA_eEF2_GTP_19; cytoplasm*(k25f*eEF2_GTP*_80S_aa_tRNA_19 - k25b*_80S_aa_tRNA_eEF2_GTP_19);  // isPartOf GO:0002182
  reaction26_19: _80S_aa_tRNA_eEF2_GTP_19 => _80S_tRNA_20 + eEF2_GDP; cytoplasm*k26f*_80S_aa_tRNA_eEF2_GTP_19;  // isPartOf GO:0002182
  reaction28_19: _80S_tRNA_19 + eEF3_GTP => _80S_tRNA_eEF3_GTP_19; cytoplasm*k28f*_80S_tRNA_19*eEF3_GTP;  // isPartOf GO:0002182
  reaction29_19: _80S_tRNA_eEF3_GTP_19 => _80S_19 + eEF3_GDP + $tRNA; cytoplasm*k29f*_80S_tRNA_eEF3_GTP_19;  // isPartOf GO:0002182
  reaction28_20: _80S_tRNA_20 + eEF3_GTP => _80S_tRNA_eEF3_GTP_20; cytoplasm*k28f*_80S_tRNA_20*eEF3_GTP;  // isPartOf GO:0002182
  reaction29_20: _80S_tRNA_eEF3_GTP_20 => _80S_20 + eEF3_GDP + $tRNA; cytoplasm*k29f*_80S_tRNA_eEF3_GTP_20;  // isPartOf GO:0002182
  reaction30: eRF3_GDP -> eRF3_GTP; cytoplasm*(reaction30_k1*eRF3_GDP - reaction30_k2*eRF3_GTP);  // isPartOf GO:0002184
    reaction30_k1 = 14200.8; reaction30_k2 = 18032.6;
  reaction31: eRF1 + eRF3_GTP -> eRF1_eRF3_GTP; cytoplasm*(reaction31_k1*eRF1*eRF3_GTP - reaction31_k2*eRF1_eRF3_GTP);  // isPartOf GO:0002184
    reaction31_k1 = 1600000000; reaction31_k2 = 35378.1;
  reaction32: eRF1_eRF3_GTP + _80S_20 => _80S_eRF1_eRF3_GTP; cytoplasm*reaction32_k1*eRF1_eRF3_GTP*_80S_20;  // isPartOf GO:0002184
    reaction32_k1 = 153068000;
  reaction33: _80S_eRF1_eRF3_GTP => _40S + _60S + eRF1 + eRF3_GDP; cytoplasm*reaction33_k1*_80S_eRF1_eRF3_GTP;  // isPartOf GO:0002184
    reaction33_k1 = 3549100000;

  // Unit definitions:
  unit volume = litre;
  unit substance = mole;
  unit area = metre^2;
end
