// SBML level 3 version 2

function Constant_flux_irreversible(v)
  v;
end
Constant_flux_irreversible is "Constant flux (irreversible)";

function Function_for_export_of_InR_RNA_1(kexp, nucleus, nucleus_RNA_InR)
  nucleus_RNA_InR*nucleus*kexp;
end

function function_360(cytoplasm, cytoplasm_RNA_InR, kmdeg)
  cytoplasm_RNA_InR*cytoplasm*kmdeg/cytoplasm;
end
function_360 is "Function for cyto degr of InR RNA_1";

function function_361(cytoplasm, cytoplasm_RNA_InR, ktransl)
  cytoplasm_RNA_InR*cytoplasm*ktransl/cytoplasm;
end
function_361 is "Function for translation of InR_1";

function function_362(cytoplasm, cytoplasm_InR, kpdeg)
  cytoplasm_InR*cytoplasm*kpdeg/cytoplasm;
end
function_362 is "Function for degradation of InR protein_1";

function function_363(kexp, nucleus, nucleus_RNA_SOD2)
  nucleus_RNA_SOD2*nucleus*kexp;
end
function_363 is "Function for export of SOD2 RNA_1";

function function_364(cytoplasm, cytoplasm_RNA_SOD2, kmdeg)
  cytoplasm_RNA_SOD2*cytoplasm*kmdeg/cytoplasm;
end
function_364 is "Function for cyto degr of SOD2 RNA_1";

function function_365(cytoplasm, cytoplasm_RNA_SOD2, ktransl)
  cytoplasm_RNA_SOD2*cytoplasm*ktransl/cytoplasm;
end
function_365 is "Function for translation of SOD2_1";

function function_366(cytoplasm, cytoplasm_SOD2, kpdeg)
  cytoplasm_SOD2*cytoplasm*kpdeg/cytoplasm;
end
function_366 is "Function for degradation of SOD2 protein_1";

function Function_for_R17r_1(PKC_P, PP2A, cytoplasm, kminus12)
  kminus12*PP2A*cytoplasm*PKC_P*cytoplasm/cytoplasm;
end

function Function_for_R20f_1(AS160_P, cytoplasm, cytoplasm_GLUT4, k13, k13_basal)
  (k13_basal + k13*AS160_P*cytoplasm)*cytoplasm_GLUT4*cytoplasm;
end

function Function_for_R20r_1(cellsurface, cellsurface_GLUT4, kminus13)
  kminus13*cellsurface_GLUT4*cellsurface;
end

function Function_for_R30f_1(PTP1B, ROS, cytoplasm, k30f)
  k30f*PTP1B*cytoplasm*ROS*cytoplasm/cytoplasm;
end

function Function_for_R30r_1(GSH, PTP1B_ox, cytoplasm, k30r)
  k30r*PTP1B_ox*cytoplasm*GSH*cytoplasm/cytoplasm;
end

function Function_for_R31f_1(PTEN, ROS, cytoplasm, k31f)
  k31f*PTEN*cytoplasm*ROS*cytoplasm/cytoplasm;
end

function Function_for_R31r_1(GSH, PTEN_ox, cytoplasm, k31r)
  k31r*PTEN_ox*cytoplasm*GSH*cytoplasm/cytoplasm;
end

function Function_for_R34f_1(Ins, NOX_inact, cytoplasm, extracellular, k34f)
  k34f*NOX_inact*cytoplasm*Ins*extracellular;
end

function Function_for_R34r1_1(NOX, cytoplasm, k34r1)
  k34r1*NOX*cytoplasm*NOX*cytoplasm/cytoplasm;
end

function Function_for_R34r2_1(NOX, cytoplasm, k34r2)
  k34r2*NOX*cytoplasm/cytoplasm;
end

function Function_for_R34r3_1(NOX_deact, cytoplasm, k34r3)
  k34r3*NOX_deact*cytoplasm*NOX_deact*cytoplasm/cytoplasm;
end

function Function_for_R35f_1(NOX, cytoplasm, k35f)
  k35f*NOX*cytoplasm/cytoplasm;
end

function Function_for_R35r_1(ROS, cytoplasm, cytoplasm_SOD2, k35r)
  k35r*ROS*cytoplasm*cytoplasm_SOD2*cytoplasm/cytoplasm;
end

function Function_for_R36f_1(Mt, cytoplasm, k36f)
  k36f*Mt*cytoplasm/cytoplasm;
end

function Function_for_R37f_1(extracellular, extracellular_ROS, k_ros_perm)
  k_ros_perm*extracellular_ROS*extracellular;
end

function Function_for_R37r_1(ROS, cytoplasm, extracellular, k_ros_perm)
  k_ros_perm*(extracellular/cytoplasm)*ROS*cytoplasm;
end

function Function_for_R38f_1(GSH, ROS, cytoplasm, k38f)
  k38f*GSH*cytoplasm*ROS*cytoplasm/cytoplasm;
end

function Function_for_R38r_1(GSSG, cytoplasm, k38r)
  k38r*GSSG*cytoplasm/cytoplasm;
end

function Function_for_R12f_1(IRS1, IRp, Ins_2_InR_P, Ins_InR_P, cellsurface, cyto_vol, cytoplasm, k7)
  cyto_vol*(k7*IRS1*cytoplasm*(Ins_2_InR_P*cellsurface + Ins_InR_P*cellsurface)/IRp)/cytoplasm;
end

function Function_for_R12r_1(IRS1_TyrP, PTP1B, cyto_vol, cytoplasm, kminus7a)
  cyto_vol*kminus7a*PTP1B*cytoplasm*IRS1_TyrP*cytoplasm/cytoplasm;
end

function Function_for_R12_a_f_1(IRS1, PKC_P, cyto_vol, cytoplasm, k2psp)
  cyto_vol*k2psp*IRS1*cytoplasm*PKC_P*cytoplasm/cytoplasm;
end

function Function_for_R12_a_r_1(IRS1_PolySerP, PP2A, cyto_vol, cytoplasm, kminus7b)
  cyto_vol*kminus7b*PP2A*cytoplasm*IRS1_PolySerP*cytoplasm/cytoplasm;
end

function Function_for_R12_b_f_1(IRS1_TyrP, PKC_P, cyto_vol, cytoplasm, k2psp)
  cyto_vol*k2psp*IRS1_TyrP*cytoplasm*PKC_P*cytoplasm/cytoplasm;
end

function Function_for_R12_b_r_1(IRS1_TyrP_PolySerP, PP2A, cyto_vol, cytoplasm, kminus7b)
  cyto_vol*kminus7b*PP2A*cytoplasm*IRS1_TyrP_PolySerP*cytoplasm/cytoplasm;
end

function Function_for_R13f_1(IRS1_TyrP, PI3K, cyto_vol, cytoplasm, k8)
  cyto_vol*k8*IRS1_TyrP*cytoplasm*PI3K*cytoplasm/cytoplasm;
end

function Function_for_R13r_1(IRS1_TyrP_PI3K, cyto_vol, cytoplasm, kminus8)
  cyto_vol*kminus8*IRS1_TyrP_PI3K*cytoplasm/cytoplasm;
end

function Function_for_R50f_1(cytoplasm, k_irs1_basal_syn)
  k_irs1_basal_syn/cytoplasm;
end

function Function_for_R50r1_1(IRS1, cytoplasm, k_irs1_basal_degr)
  IRS1*cytoplasm*k_irs1_basal_degr/cytoplasm;
end

function Function_for_R50r2_1(IRS1_TyrP, cytoplasm, k_irs1_basal_degr)
  IRS1_TyrP*cytoplasm*k_irs1_basal_degr/cytoplasm;
end

function Function_for_R50r3_1(IRS1_PolySerP, cytoplasm, k_irs1_polyserp_degr)
  IRS1_PolySerP*cytoplasm*k_irs1_polyserp_degr/cytoplasm;
end

function Function_for_R50r4_1(IRS1_TyrP_PolySerP, cytoplasm, k_irs1_polyserp_degr)
  IRS1_TyrP_PolySerP*cytoplasm*k_irs1_polyserp_degr/cytoplasm;
end

function Function_for_R51f_1(IKK_P, IRS1, Km51, cytoplasm, kcat51)
  kcat51*IRS1*cytoplasm*IKK_P*cytoplasm/(Km51 + IRS1*cytoplasm)/cytoplasm;
end

function Function_for_R52f_1(IRS1, JNK_P, Km52, cytoplasm, kcat52)
  kcat52*IRS1*cytoplasm*JNK_P*cytoplasm/(Km52 + IRS1*cytoplasm)/cytoplasm;
end

function Function_for_R42f_1(JNK, ROS, alpha_ox, cytoplasm, k42f)
  k42f*alpha_ox*JNK*cytoplasm*ROS*cytoplasm/cytoplasm;
end

function Function_for_R42r_1(DUSP, JNK_P, cytoplasm, k42r)
  k42r*JNK_P*cytoplasm*DUSP*cytoplasm/cytoplasm;
end

function Function_for_R43f_1(IKK, ROS, cytoplasm, k43f)
  k43f*IKK*cytoplasm*ROS*cytoplasm/cytoplasm;
end

function Function_for_R43r_1(DUSP, IKK_P, cytoplasm, k43r)
  k43r*IKK_P*cytoplasm*DUSP*cytoplasm/cytoplasm;
end

function Function_for_R32f_1(DUSP, ROS, cytoplasm, k32f)
  k32f*DUSP*cytoplasm*ROS*cytoplasm/cytoplasm;
end

function Function_for_R32r_1(DUSP_ox, GSH, cytoplasm, k32r)
  k32r*DUSP_ox*cytoplasm*GSH*cytoplasm/cytoplasm;
end

function Function_for_Synthesis_1(E2F1, cytoplasm, ksynth)
  E2F1*cytoplasm*ksynth/cytoplasm;
end

function function_62(cytoplasm, cytoplasm_Foxo1_Pa0_Pd0_Pe0_pUb0, ktr)
  cytoplasm_Foxo1_Pa0_Pd0_Pe0_pUb0*cytoplasm*ktr;
end
function_62 is "Function for transport cytoplasm_Foxo1_Pa0_Pd0_Pe0_pUb0 to nucleus_Foxo1_Pa0_Pd0_Pe0_pUb0_1";

function function_63(ktr, nucleus, nucleus_Foxo1_Pa0_Pd0_Pe0_pUb0)
  nucleus_Foxo1_Pa0_Pd0_Pe0_pUb0*nucleus*ktr;
end
function_63 is "Function for transport nucleus_Foxo1_Pa0_Pd0_Pe0_pUb0 to cytoplasm_Foxo1_Pa0_Pd0_Pe0_pUb0_1";

function function_64(ktr, nucleus, nucleus_Foxo1_Pa0_Pd0_Pe0_pUb0)
  nucleus_Foxo1_Pa0_Pd0_Pe0_pUb0*nucleus*ktr;
end
function_64 is "Function for transport nucleus_Foxo1_Pa0_Pd0_Pe0_pUb0 to dnabound_Foxo1_Pa0_Pd0_Pe0_pUb0_1";

function function_65(dnabound, dnabound_Foxo1_Pa0_Pd0_Pe0_pUb0, ktr)
  dnabound_Foxo1_Pa0_Pd0_Pe0_pUb0*dnabound*ktr;
end
function_65 is "Function for transport dnabound_Foxo1_Pa0_Pd0_Pe0_pUb0 to nucleus_Foxo1_Pa0_Pd0_Pe0_pUb0_1";

function function_66(cytoplasm, cytoplasm_Foxo1_Pa0_Pd0_Pe0_pUb1, ktr)
  cytoplasm_Foxo1_Pa0_Pd0_Pe0_pUb1*cytoplasm*ktr;
end
function_66 is "Function for transport cytoplasm_Foxo1_Pa0_Pd0_Pe0_pUb1 to nucleus_Foxo1_Pa0_Pd0_Pe0_pUb1_1";

function function_67(ktr, nucleus, nucleus_Foxo1_Pa0_Pd0_Pe0_pUb1)
  nucleus_Foxo1_Pa0_Pd0_Pe0_pUb1*nucleus*ktr;
end
function_67 is "Function for transport nucleus_Foxo1_Pa0_Pd0_Pe0_pUb1 to cytoplasm_Foxo1_Pa0_Pd0_Pe0_pUb1_1";

function function_68(ktr, nucleus, nucleus_Foxo1_Pa0_Pd0_Pe0_pUb1)
  nucleus_Foxo1_Pa0_Pd0_Pe0_pUb1*nucleus*ktr;
end
function_68 is "Function for transport nucleus_Foxo1_Pa0_Pd0_Pe0_pUb1 to dnabound_Foxo1_Pa0_Pd0_Pe0_pUb1_1";

function function_69(dnabound, dnabound_Foxo1_Pa0_Pd0_Pe0_pUb1, ktr)
  dnabound_Foxo1_Pa0_Pd0_Pe0_pUb1*dnabound*ktr;
end
function_69 is "Function for transport dnabound_Foxo1_Pa0_Pd0_Pe0_pUb1 to nucleus_Foxo1_Pa0_Pd0_Pe0_pUb1_1";

function function_70(cytoplasm, cytoplasm_Foxo1_Pa0_Pd0_Pe1_pUb0, ktr)
  cytoplasm_Foxo1_Pa0_Pd0_Pe1_pUb0*cytoplasm*ktr;
end
function_70 is "Function for transport cytoplasm_Foxo1_Pa0_Pd0_Pe1_pUb0 to nucleus_Foxo1_Pa0_Pd0_Pe1_pUb0_1";

function function_71(ktr, nucleus, nucleus_Foxo1_Pa0_Pd0_Pe1_pUb0)
  nucleus_Foxo1_Pa0_Pd0_Pe1_pUb0*nucleus*ktr;
end
function_71 is "Function for transport nucleus_Foxo1_Pa0_Pd0_Pe1_pUb0 to cytoplasm_Foxo1_Pa0_Pd0_Pe1_pUb0_1";

function function_72(ktr, nucleus, nucleus_Foxo1_Pa0_Pd0_Pe1_pUb0)
  nucleus_Foxo1_Pa0_Pd0_Pe1_pUb0*nucleus*ktr;
end
function_72 is "Function for transport nucleus_Foxo1_Pa0_Pd0_Pe1_pUb0 to dnabound_Foxo1_Pa0_Pd0_Pe1_pUb0_1";

function function_73(dnabound, dnabound_Foxo1_Pa0_Pd0_Pe1_pUb0, ktr)
  dnabound_Foxo1_Pa0_Pd0_Pe1_pUb0*dnabound*ktr;
end
function_73 is "Function for transport dnabound_Foxo1_Pa0_Pd0_Pe1_pUb0 to nucleus_Foxo1_Pa0_Pd0_Pe1_pUb0_1";

function function_74(cytoplasm, cytoplasm_Foxo1_Pa0_Pd0_Pe1_pUb1, ktr)
  cytoplasm_Foxo1_Pa0_Pd0_Pe1_pUb1*cytoplasm*ktr;
end
function_74 is "Function for transport cytoplasm_Foxo1_Pa0_Pd0_Pe1_pUb1 to nucleus_Foxo1_Pa0_Pd0_Pe1_pUb1_1";

function function_75(ktr, nucleus, nucleus_Foxo1_Pa0_Pd0_Pe1_pUb1)
  nucleus_Foxo1_Pa0_Pd0_Pe1_pUb1*nucleus*ktr;
end
function_75 is "Function for transport nucleus_Foxo1_Pa0_Pd0_Pe1_pUb1 to cytoplasm_Foxo1_Pa0_Pd0_Pe1_pUb1_1";

function function_76(ktr, nucleus, nucleus_Foxo1_Pa0_Pd0_Pe1_pUb1)
  nucleus_Foxo1_Pa0_Pd0_Pe1_pUb1*nucleus*ktr;
end
function_76 is "Function for transport nucleus_Foxo1_Pa0_Pd0_Pe1_pUb1 to dnabound_Foxo1_Pa0_Pd0_Pe1_pUb1_1";

function function_77(dnabound, dnabound_Foxo1_Pa0_Pd0_Pe1_pUb1, ktr)
  dnabound_Foxo1_Pa0_Pd0_Pe1_pUb1*dnabound*ktr;
end
function_77 is "Function for transport dnabound_Foxo1_Pa0_Pd0_Pe1_pUb1 to nucleus_Foxo1_Pa0_Pd0_Pe1_pUb1_1";

function function_78(cytoplasm, cytoplasm_Foxo1_Pa0_Pd1_Pe0_pUb0, ktr)
  cytoplasm_Foxo1_Pa0_Pd1_Pe0_pUb0*cytoplasm*ktr;
end
function_78 is "Function for transport cytoplasm_Foxo1_Pa0_Pd1_Pe0_pUb0 to nucleus_Foxo1_Pa0_Pd1_Pe0_pUb0_1";

function function_79(ktr, nucleus, nucleus_Foxo1_Pa0_Pd1_Pe0_pUb0)
  nucleus_Foxo1_Pa0_Pd1_Pe0_pUb0*nucleus*ktr;
end
function_79 is "Function for transport nucleus_Foxo1_Pa0_Pd1_Pe0_pUb0 to cytoplasm_Foxo1_Pa0_Pd1_Pe0_pUb0_1";

function function_80(ktr, nucleus, nucleus_Foxo1_Pa0_Pd1_Pe0_pUb0)
  nucleus_Foxo1_Pa0_Pd1_Pe0_pUb0*nucleus*ktr;
end
function_80 is "Function for transport nucleus_Foxo1_Pa0_Pd1_Pe0_pUb0 to dnabound_Foxo1_Pa0_Pd1_Pe0_pUb0_1";

function function_81(dnabound, dnabound_Foxo1_Pa0_Pd1_Pe0_pUb0, ktr)
  dnabound_Foxo1_Pa0_Pd1_Pe0_pUb0*dnabound*ktr;
end
function_81 is "Function for transport dnabound_Foxo1_Pa0_Pd1_Pe0_pUb0 to nucleus_Foxo1_Pa0_Pd1_Pe0_pUb0_1";

function function_82(cytoplasm, cytoplasm_Foxo1_Pa0_Pd1_Pe0_pUb1, ktr)
  cytoplasm_Foxo1_Pa0_Pd1_Pe0_pUb1*cytoplasm*ktr;
end
function_82 is "Function for transport cytoplasm_Foxo1_Pa0_Pd1_Pe0_pUb1 to nucleus_Foxo1_Pa0_Pd1_Pe0_pUb1_1";

function function_83(ktr, nucleus, nucleus_Foxo1_Pa0_Pd1_Pe0_pUb1)
  nucleus_Foxo1_Pa0_Pd1_Pe0_pUb1*nucleus*ktr;
end
function_83 is "Function for transport nucleus_Foxo1_Pa0_Pd1_Pe0_pUb1 to cytoplasm_Foxo1_Pa0_Pd1_Pe0_pUb1_1";

function function_84(ktr, nucleus, nucleus_Foxo1_Pa0_Pd1_Pe0_pUb1)
  nucleus_Foxo1_Pa0_Pd1_Pe0_pUb1*nucleus*ktr;
end
function_84 is "Function for transport nucleus_Foxo1_Pa0_Pd1_Pe0_pUb1 to dnabound_Foxo1_Pa0_Pd1_Pe0_pUb1_1";

function function_85(dnabound, dnabound_Foxo1_Pa0_Pd1_Pe0_pUb1, ktr)
  dnabound_Foxo1_Pa0_Pd1_Pe0_pUb1*dnabound*ktr;
end
function_85 is "Function for transport dnabound_Foxo1_Pa0_Pd1_Pe0_pUb1 to nucleus_Foxo1_Pa0_Pd1_Pe0_pUb1_1";

function function_86(cytoplasm, cytoplasm_Foxo1_Pa0_Pd1_Pe1_pUb0, ktr)
  cytoplasm_Foxo1_Pa0_Pd1_Pe1_pUb0*cytoplasm*ktr;
end
function_86 is "Function for transport cytoplasm_Foxo1_Pa0_Pd1_Pe1_pUb0 to nucleus_Foxo1_Pa0_Pd1_Pe1_pUb0_1";

function function_87(ktr, nucleus, nucleus_Foxo1_Pa0_Pd1_Pe1_pUb0)
  nucleus_Foxo1_Pa0_Pd1_Pe1_pUb0*nucleus*ktr;
end
function_87 is "Function for transport nucleus_Foxo1_Pa0_Pd1_Pe1_pUb0 to cytoplasm_Foxo1_Pa0_Pd1_Pe1_pUb0_1";

function function_88(ktr, nucleus, nucleus_Foxo1_Pa0_Pd1_Pe1_pUb0)
  nucleus_Foxo1_Pa0_Pd1_Pe1_pUb0*nucleus*ktr;
end
function_88 is "Function for transport nucleus_Foxo1_Pa0_Pd1_Pe1_pUb0 to dnabound_Foxo1_Pa0_Pd1_Pe1_pUb0_1";

function function_89(dnabound, dnabound_Foxo1_Pa0_Pd1_Pe1_pUb0, ktr)
  dnabound_Foxo1_Pa0_Pd1_Pe1_pUb0*dnabound*ktr;
end
function_89 is "Function for transport dnabound_Foxo1_Pa0_Pd1_Pe1_pUb0 to nucleus_Foxo1_Pa0_Pd1_Pe1_pUb0_1";

function function_90(cytoplasm, cytoplasm_Foxo1_Pa0_Pd1_Pe1_pUb1, ktr)
  cytoplasm_Foxo1_Pa0_Pd1_Pe1_pUb1*cytoplasm*ktr;
end
function_90 is "Function for transport cytoplasm_Foxo1_Pa0_Pd1_Pe1_pUb1 to nucleus_Foxo1_Pa0_Pd1_Pe1_pUb1_1";

function function_91(ktr, nucleus, nucleus_Foxo1_Pa0_Pd1_Pe1_pUb1)
  nucleus_Foxo1_Pa0_Pd1_Pe1_pUb1*nucleus*ktr;
end
function_91 is "Function for transport nucleus_Foxo1_Pa0_Pd1_Pe1_pUb1 to cytoplasm_Foxo1_Pa0_Pd1_Pe1_pUb1_1";

function function_92(ktr, nucleus, nucleus_Foxo1_Pa0_Pd1_Pe1_pUb1)
  nucleus_Foxo1_Pa0_Pd1_Pe1_pUb1*nucleus*ktr;
end
function_92 is "Function for transport nucleus_Foxo1_Pa0_Pd1_Pe1_pUb1 to dnabound_Foxo1_Pa0_Pd1_Pe1_pUb1_1";

function function_93(dnabound, dnabound_Foxo1_Pa0_Pd1_Pe1_pUb1, ktr)
  dnabound_Foxo1_Pa0_Pd1_Pe1_pUb1*dnabound*ktr;
end
function_93 is "Function for transport dnabound_Foxo1_Pa0_Pd1_Pe1_pUb1 to nucleus_Foxo1_Pa0_Pd1_Pe1_pUb1_1";

function function_94(cytoplasm, cytoplasm_Foxo1_Pa1_Pd0_Pe0_pUb0, ktr)
  cytoplasm_Foxo1_Pa1_Pd0_Pe0_pUb0*cytoplasm*ktr;
end
function_94 is "Function for transport cytoplasm_Foxo1_Pa1_Pd0_Pe0_pUb0 to nucleus_Foxo1_Pa1_Pd0_Pe0_pUb0_1";

function function_95(ktr, nucleus, nucleus_Foxo1_Pa1_Pd0_Pe0_pUb0)
  nucleus_Foxo1_Pa1_Pd0_Pe0_pUb0*nucleus*ktr;
end
function_95 is "Function for transport nucleus_Foxo1_Pa1_Pd0_Pe0_pUb0 to cytoplasm_Foxo1_Pa1_Pd0_Pe0_pUb0_1";

function function_96(ktr, nucleus, nucleus_Foxo1_Pa1_Pd0_Pe0_pUb0)
  nucleus_Foxo1_Pa1_Pd0_Pe0_pUb0*nucleus*ktr;
end
function_96 is "Function for transport nucleus_Foxo1_Pa1_Pd0_Pe0_pUb0 to dnabound_Foxo1_Pa1_Pd0_Pe0_pUb0_1";

function function_97(dnabound, dnabound_Foxo1_Pa1_Pd0_Pe0_pUb0, ktr)
  dnabound_Foxo1_Pa1_Pd0_Pe0_pUb0*dnabound*ktr;
end
function_97 is "Function for transport dnabound_Foxo1_Pa1_Pd0_Pe0_pUb0 to nucleus_Foxo1_Pa1_Pd0_Pe0_pUb0_1";

function function_98(cytoplasm, cytoplasm_Foxo1_Pa1_Pd0_Pe0_pUb1, ktr)
  cytoplasm_Foxo1_Pa1_Pd0_Pe0_pUb1*cytoplasm*ktr;
end
function_98 is "Function for transport cytoplasm_Foxo1_Pa1_Pd0_Pe0_pUb1 to nucleus_Foxo1_Pa1_Pd0_Pe0_pUb1_1";

function function_99(ktr, nucleus, nucleus_Foxo1_Pa1_Pd0_Pe0_pUb1)
  nucleus_Foxo1_Pa1_Pd0_Pe0_pUb1*nucleus*ktr;
end
function_99 is "Function for transport nucleus_Foxo1_Pa1_Pd0_Pe0_pUb1 to cytoplasm_Foxo1_Pa1_Pd0_Pe0_pUb1_1";

function function_100(ktr, nucleus, nucleus_Foxo1_Pa1_Pd0_Pe0_pUb1)
  nucleus_Foxo1_Pa1_Pd0_Pe0_pUb1*nucleus*ktr;
end
function_100 is "Function for transport nucleus_Foxo1_Pa1_Pd0_Pe0_pUb1 to dnabound_Foxo1_Pa1_Pd0_Pe0_pUb1_1";

function function_101(dnabound, dnabound_Foxo1_Pa1_Pd0_Pe0_pUb1, ktr)
  dnabound_Foxo1_Pa1_Pd0_Pe0_pUb1*dnabound*ktr;
end
function_101 is "Function for transport dnabound_Foxo1_Pa1_Pd0_Pe0_pUb1 to nucleus_Foxo1_Pa1_Pd0_Pe0_pUb1_1";

function function_102(cytoplasm, cytoplasm_Foxo1_Pa1_Pd0_Pe1_pUb0, ktr)
  cytoplasm_Foxo1_Pa1_Pd0_Pe1_pUb0*cytoplasm*ktr;
end
function_102 is "Function for transport cytoplasm_Foxo1_Pa1_Pd0_Pe1_pUb0 to nucleus_Foxo1_Pa1_Pd0_Pe1_pUb0_1";

function function_103(ktr, nucleus, nucleus_Foxo1_Pa1_Pd0_Pe1_pUb0)
  nucleus_Foxo1_Pa1_Pd0_Pe1_pUb0*nucleus*ktr;
end
function_103 is "Function for transport nucleus_Foxo1_Pa1_Pd0_Pe1_pUb0 to cytoplasm_Foxo1_Pa1_Pd0_Pe1_pUb0_1";

function function_104(ktr, nucleus, nucleus_Foxo1_Pa1_Pd0_Pe1_pUb0)
  nucleus_Foxo1_Pa1_Pd0_Pe1_pUb0*nucleus*ktr;
end
function_104 is "Function for transport nucleus_Foxo1_Pa1_Pd0_Pe1_pUb0 to dnabound_Foxo1_Pa1_Pd0_Pe1_pUb0_1";

function function_105(dnabound, dnabound_Foxo1_Pa1_Pd0_Pe1_pUb0, ktr)
  dnabound_Foxo1_Pa1_Pd0_Pe1_pUb0*dnabound*ktr;
end
function_105 is "Function for transport dnabound_Foxo1_Pa1_Pd0_Pe1_pUb0 to nucleus_Foxo1_Pa1_Pd0_Pe1_pUb0_1";

function function_106(cytoplasm, cytoplasm_Foxo1_Pa1_Pd0_Pe1_pUb1, ktr)
  cytoplasm_Foxo1_Pa1_Pd0_Pe1_pUb1*cytoplasm*ktr;
end
function_106 is "Function for transport cytoplasm_Foxo1_Pa1_Pd0_Pe1_pUb1 to nucleus_Foxo1_Pa1_Pd0_Pe1_pUb1_1";

function function_107(ktr, nucleus, nucleus_Foxo1_Pa1_Pd0_Pe1_pUb1)
  nucleus_Foxo1_Pa1_Pd0_Pe1_pUb1*nucleus*ktr;
end
function_107 is "Function for transport nucleus_Foxo1_Pa1_Pd0_Pe1_pUb1 to cytoplasm_Foxo1_Pa1_Pd0_Pe1_pUb1_1";

function function_108(ktr, nucleus, nucleus_Foxo1_Pa1_Pd0_Pe1_pUb1)
  nucleus_Foxo1_Pa1_Pd0_Pe1_pUb1*nucleus*ktr;
end
function_108 is "Function for transport nucleus_Foxo1_Pa1_Pd0_Pe1_pUb1 to dnabound_Foxo1_Pa1_Pd0_Pe1_pUb1_1";

function function_109(dnabound, dnabound_Foxo1_Pa1_Pd0_Pe1_pUb1, ktr)
  dnabound_Foxo1_Pa1_Pd0_Pe1_pUb1*dnabound*ktr;
end
function_109 is "Function for transport dnabound_Foxo1_Pa1_Pd0_Pe1_pUb1 to nucleus_Foxo1_Pa1_Pd0_Pe1_pUb1_1";

function function_110(cytoplasm, cytoplasm_Foxo1_Pa1_Pd1_Pe0_pUb0, ktr)
  cytoplasm_Foxo1_Pa1_Pd1_Pe0_pUb0*cytoplasm*ktr;
end
function_110 is "Function for transport cytoplasm_Foxo1_Pa1_Pd1_Pe0_pUb0 to nucleus_Foxo1_Pa1_Pd1_Pe0_pUb0_1";

function function_111(ktr, nucleus, nucleus_Foxo1_Pa1_Pd1_Pe0_pUb0)
  nucleus_Foxo1_Pa1_Pd1_Pe0_pUb0*nucleus*ktr;
end
function_111 is "Function for transport nucleus_Foxo1_Pa1_Pd1_Pe0_pUb0 to cytoplasm_Foxo1_Pa1_Pd1_Pe0_pUb0_1";

function function_112(ktr, nucleus, nucleus_Foxo1_Pa1_Pd1_Pe0_pUb0)
  nucleus_Foxo1_Pa1_Pd1_Pe0_pUb0*nucleus*ktr;
end
function_112 is "Function for transport nucleus_Foxo1_Pa1_Pd1_Pe0_pUb0 to dnabound_Foxo1_Pa1_Pd1_Pe0_pUb0_1";

function function_113(dnabound, dnabound_Foxo1_Pa1_Pd1_Pe0_pUb0, ktr)
  dnabound_Foxo1_Pa1_Pd1_Pe0_pUb0*dnabound*ktr;
end
function_113 is "Function for transport dnabound_Foxo1_Pa1_Pd1_Pe0_pUb0 to nucleus_Foxo1_Pa1_Pd1_Pe0_pUb0_1";

function function_114(cytoplasm, cytoplasm_Foxo1_Pa1_Pd1_Pe0_pUb1, ktr)
  cytoplasm_Foxo1_Pa1_Pd1_Pe0_pUb1*cytoplasm*ktr;
end
function_114 is "Function for transport cytoplasm_Foxo1_Pa1_Pd1_Pe0_pUb1 to nucleus_Foxo1_Pa1_Pd1_Pe0_pUb1_1";

function function_115(ktr, nucleus, nucleus_Foxo1_Pa1_Pd1_Pe0_pUb1)
  nucleus_Foxo1_Pa1_Pd1_Pe0_pUb1*nucleus*ktr;
end
function_115 is "Function for transport nucleus_Foxo1_Pa1_Pd1_Pe0_pUb1 to cytoplasm_Foxo1_Pa1_Pd1_Pe0_pUb1_1";

function function_116(ktr, nucleus, nucleus_Foxo1_Pa1_Pd1_Pe0_pUb1)
  nucleus_Foxo1_Pa1_Pd1_Pe0_pUb1*nucleus*ktr;
end
function_116 is "Function for transport nucleus_Foxo1_Pa1_Pd1_Pe0_pUb1 to dnabound_Foxo1_Pa1_Pd1_Pe0_pUb1_1";

function function_117(dnabound, dnabound_Foxo1_Pa1_Pd1_Pe0_pUb1, ktr)
  dnabound_Foxo1_Pa1_Pd1_Pe0_pUb1*dnabound*ktr;
end
function_117 is "Function for transport dnabound_Foxo1_Pa1_Pd1_Pe0_pUb1 to nucleus_Foxo1_Pa1_Pd1_Pe0_pUb1_1";

function function_118(cytoplasm, cytoplasm_Foxo1_Pa1_Pd1_Pe1_pUb0, ktr)
  cytoplasm_Foxo1_Pa1_Pd1_Pe1_pUb0*cytoplasm*ktr;
end
function_118 is "Function for transport cytoplasm_Foxo1_Pa1_Pd1_Pe1_pUb0 to nucleus_Foxo1_Pa1_Pd1_Pe1_pUb0_1";

function function_119(ktr, nucleus, nucleus_Foxo1_Pa1_Pd1_Pe1_pUb0)
  nucleus_Foxo1_Pa1_Pd1_Pe1_pUb0*nucleus*ktr;
end
function_119 is "Function for transport nucleus_Foxo1_Pa1_Pd1_Pe1_pUb0 to cytoplasm_Foxo1_Pa1_Pd1_Pe1_pUb0_1";

function function_120(ktr, nucleus, nucleus_Foxo1_Pa1_Pd1_Pe1_pUb0)
  nucleus_Foxo1_Pa1_Pd1_Pe1_pUb0*nucleus*ktr;
end
function_120 is "Function for transport nucleus_Foxo1_Pa1_Pd1_Pe1_pUb0 to dnabound_Foxo1_Pa1_Pd1_Pe1_pUb0_1";

function function_121(dnabound, dnabound_Foxo1_Pa1_Pd1_Pe1_pUb0, ktr)
  dnabound_Foxo1_Pa1_Pd1_Pe1_pUb0*dnabound*ktr;
end
function_121 is "Function for transport dnabound_Foxo1_Pa1_Pd1_Pe1_pUb0 to nucleus_Foxo1_Pa1_Pd1_Pe1_pUb0_1";

function function_122(cytoplasm, cytoplasm_Foxo1_Pa1_Pd1_Pe1_pUb1, ktr)
  cytoplasm_Foxo1_Pa1_Pd1_Pe1_pUb1*cytoplasm*ktr;
end
function_122 is "Function for transport cytoplasm_Foxo1_Pa1_Pd1_Pe1_pUb1 to nucleus_Foxo1_Pa1_Pd1_Pe1_pUb1_1";

function function_123(ktr, nucleus, nucleus_Foxo1_Pa1_Pd1_Pe1_pUb1)
  nucleus_Foxo1_Pa1_Pd1_Pe1_pUb1*nucleus*ktr;
end
function_123 is "Function for transport nucleus_Foxo1_Pa1_Pd1_Pe1_pUb1 to cytoplasm_Foxo1_Pa1_Pd1_Pe1_pUb1_1";

function function_124(ktr, nucleus, nucleus_Foxo1_Pa1_Pd1_Pe1_pUb1)
  nucleus_Foxo1_Pa1_Pd1_Pe1_pUb1*nucleus*ktr;
end
function_124 is "Function for transport nucleus_Foxo1_Pa1_Pd1_Pe1_pUb1 to dnabound_Foxo1_Pa1_Pd1_Pe1_pUb1_1";

function function_125(dnabound, dnabound_Foxo1_Pa1_Pd1_Pe1_pUb1, ktr)
  dnabound_Foxo1_Pa1_Pd1_Pe1_pUb1*dnabound*ktr;
end
function_125 is "Function for transport dnabound_Foxo1_Pa1_Pd1_Pe1_pUb1 to nucleus_Foxo1_Pa1_Pd1_Pe1_pUb1_1";

function function_126(Akt_P2, cytoplasm, cytoplasm_Foxo1_Pa0_Pd0_Pe0_pUb0, kkin)
  cytoplasm_Foxo1_Pa0_Pd0_Pe0_pUb0*cytoplasm*Akt_P2*cytoplasm*kkin/cytoplasm;
end
function_126 is "Function for conversion of cytoplasm_Foxo1_Pa0_Pd0_Pe0_pUb0 to cytoplasm_Foxo1_Pa1_Pd0_Pe0_pUb0 by Akt_P2_1";

function function_127(Akt_P2, cytoplasm, kkin, nucleus, nucleus_Foxo1_Pa0_Pd0_Pe0_pUb0)
  nucleus_Foxo1_Pa0_Pd0_Pe0_pUb0*nucleus*Akt_P2*cytoplasm*kkin/nucleus;
end
function_127 is "Function for conversion of nucleus_Foxo1_Pa0_Pd0_Pe0_pUb0 to nucleus_Foxo1_Pa1_Pd0_Pe0_pUb0 by Akt_P2_1";

function function_128(Akt_P2, cytoplasm, dnabound, dnabound_Foxo1_Pa0_Pd0_Pe0_pUb0, kkin)
  dnabound_Foxo1_Pa0_Pd0_Pe0_pUb0*dnabound*Akt_P2*cytoplasm*kkin/dnabound;
end
function_128 is "Function for conversion of dnabound_Foxo1_Pa0_Pd0_Pe0_pUb0 to dnabound_Foxo1_Pa1_Pd0_Pe0_pUb0 by Akt_P2_1";

function function_129(Akt_P2, cytoplasm, cytoplasm_Foxo1_Pa0_Pd0_Pe0_pUb1, kkin)
  cytoplasm_Foxo1_Pa0_Pd0_Pe0_pUb1*cytoplasm*Akt_P2*cytoplasm*kkin/cytoplasm;
end
function_129 is "Function for conversion of cytoplasm_Foxo1_Pa0_Pd0_Pe0_pUb1 to cytoplasm_Foxo1_Pa1_Pd0_Pe0_pUb1 by Akt_P2_1";

function function_130(Akt_P2, cytoplasm, kkin, nucleus, nucleus_Foxo1_Pa0_Pd0_Pe0_pUb1)
  nucleus_Foxo1_Pa0_Pd0_Pe0_pUb1*nucleus*Akt_P2*cytoplasm*kkin/nucleus;
end
function_130 is "Function for conversion of nucleus_Foxo1_Pa0_Pd0_Pe0_pUb1 to nucleus_Foxo1_Pa1_Pd0_Pe0_pUb1 by Akt_P2_1";

function function_131(Akt_P2, cytoplasm, dnabound, dnabound_Foxo1_Pa0_Pd0_Pe0_pUb1, kkin)
  dnabound_Foxo1_Pa0_Pd0_Pe0_pUb1*dnabound*Akt_P2*cytoplasm*kkin/dnabound;
end
function_131 is "Function for conversion of dnabound_Foxo1_Pa0_Pd0_Pe0_pUb1 to dnabound_Foxo1_Pa1_Pd0_Pe0_pUb1 by Akt_P2_1";

function function_132(Akt_P2, cytoplasm, cytoplasm_Foxo1_Pa0_Pd0_Pe1_pUb0, kkin)
  cytoplasm_Foxo1_Pa0_Pd0_Pe1_pUb0*cytoplasm*Akt_P2*cytoplasm*kkin/cytoplasm;
end
function_132 is "Function for conversion of cytoplasm_Foxo1_Pa0_Pd0_Pe1_pUb0 to cytoplasm_Foxo1_Pa1_Pd0_Pe1_pUb0 by Akt_P2_1";

function function_133(Akt_P2, cytoplasm, kkin, nucleus, nucleus_Foxo1_Pa0_Pd0_Pe1_pUb0)
  nucleus_Foxo1_Pa0_Pd0_Pe1_pUb0*nucleus*Akt_P2*cytoplasm*kkin/nucleus;
end
function_133 is "Function for conversion of nucleus_Foxo1_Pa0_Pd0_Pe1_pUb0 to nucleus_Foxo1_Pa1_Pd0_Pe1_pUb0 by Akt_P2_1";

function function_134(Akt_P2, cytoplasm, dnabound, dnabound_Foxo1_Pa0_Pd0_Pe1_pUb0, kkin)
  dnabound_Foxo1_Pa0_Pd0_Pe1_pUb0*dnabound*Akt_P2*cytoplasm*kkin/dnabound;
end
function_134 is "Function for conversion of dnabound_Foxo1_Pa0_Pd0_Pe1_pUb0 to dnabound_Foxo1_Pa1_Pd0_Pe1_pUb0 by Akt_P2_1";

function function_135(Akt_P2, cytoplasm, cytoplasm_Foxo1_Pa0_Pd0_Pe1_pUb1, kkin)
  cytoplasm_Foxo1_Pa0_Pd0_Pe1_pUb1*cytoplasm*Akt_P2*cytoplasm*kkin/cytoplasm;
end
function_135 is "Function for conversion of cytoplasm_Foxo1_Pa0_Pd0_Pe1_pUb1 to cytoplasm_Foxo1_Pa1_Pd0_Pe1_pUb1 by Akt_P2_1";

function function_136(Akt_P2, cytoplasm, kkin, nucleus, nucleus_Foxo1_Pa0_Pd0_Pe1_pUb1)
  nucleus_Foxo1_Pa0_Pd0_Pe1_pUb1*nucleus*Akt_P2*cytoplasm*kkin/nucleus;
end
function_136 is "Function for conversion of nucleus_Foxo1_Pa0_Pd0_Pe1_pUb1 to nucleus_Foxo1_Pa1_Pd0_Pe1_pUb1 by Akt_P2_1";

function function_137(Akt_P2, cytoplasm, dnabound, dnabound_Foxo1_Pa0_Pd0_Pe1_pUb1, kkin)
  dnabound_Foxo1_Pa0_Pd0_Pe1_pUb1*dnabound*Akt_P2*cytoplasm*kkin/dnabound;
end
function_137 is "Function for conversion of dnabound_Foxo1_Pa0_Pd0_Pe1_pUb1 to dnabound_Foxo1_Pa1_Pd0_Pe1_pUb1 by Akt_P2_1";

function function_138(Akt_P2, cytoplasm, cytoplasm_Foxo1_Pa0_Pd1_Pe0_pUb0, kkin)
  cytoplasm_Foxo1_Pa0_Pd1_Pe0_pUb0*cytoplasm*Akt_P2*cytoplasm*kkin/cytoplasm;
end
function_138 is "Function for conversion of cytoplasm_Foxo1_Pa0_Pd1_Pe0_pUb0 to cytoplasm_Foxo1_Pa1_Pd1_Pe0_pUb0 by Akt_P2_1";

function function_139(Akt_P2, cytoplasm, kkin, nucleus, nucleus_Foxo1_Pa0_Pd1_Pe0_pUb0)
  nucleus_Foxo1_Pa0_Pd1_Pe0_pUb0*nucleus*Akt_P2*cytoplasm*kkin/nucleus;
end
function_139 is "Function for conversion of nucleus_Foxo1_Pa0_Pd1_Pe0_pUb0 to nucleus_Foxo1_Pa1_Pd1_Pe0_pUb0 by Akt_P2_1";

function function_140(Akt_P2, cytoplasm, dnabound, dnabound_Foxo1_Pa0_Pd1_Pe0_pUb0, kkin)
  dnabound_Foxo1_Pa0_Pd1_Pe0_pUb0*dnabound*Akt_P2*cytoplasm*kkin/dnabound;
end
function_140 is "Function for conversion of dnabound_Foxo1_Pa0_Pd1_Pe0_pUb0 to dnabound_Foxo1_Pa1_Pd1_Pe0_pUb0 by Akt_P2_1";

function function_141(Akt_P2, cytoplasm, cytoplasm_Foxo1_Pa0_Pd1_Pe0_pUb1, kkin)
  cytoplasm_Foxo1_Pa0_Pd1_Pe0_pUb1*cytoplasm*Akt_P2*cytoplasm*kkin/cytoplasm;
end
function_141 is "Function for conversion of cytoplasm_Foxo1_Pa0_Pd1_Pe0_pUb1 to cytoplasm_Foxo1_Pa1_Pd1_Pe0_pUb1 by Akt_P2_1";

function function_142(Akt_P2, cytoplasm, kkin, nucleus, nucleus_Foxo1_Pa0_Pd1_Pe0_pUb1)
  nucleus_Foxo1_Pa0_Pd1_Pe0_pUb1*nucleus*Akt_P2*cytoplasm*kkin/nucleus;
end
function_142 is "Function for conversion of nucleus_Foxo1_Pa0_Pd1_Pe0_pUb1 to nucleus_Foxo1_Pa1_Pd1_Pe0_pUb1 by Akt_P2_1";

function function_143(Akt_P2, cytoplasm, dnabound, dnabound_Foxo1_Pa0_Pd1_Pe0_pUb1, kkin)
  dnabound_Foxo1_Pa0_Pd1_Pe0_pUb1*dnabound*Akt_P2*cytoplasm*kkin/dnabound;
end
function_143 is "Function for conversion of dnabound_Foxo1_Pa0_Pd1_Pe0_pUb1 to dnabound_Foxo1_Pa1_Pd1_Pe0_pUb1 by Akt_P2_1";

function function_144(Akt_P2, cytoplasm, cytoplasm_Foxo1_Pa0_Pd1_Pe1_pUb0, kkin)
  cytoplasm_Foxo1_Pa0_Pd1_Pe1_pUb0*cytoplasm*Akt_P2*cytoplasm*kkin/cytoplasm;
end
function_144 is "Function for conversion of cytoplasm_Foxo1_Pa0_Pd1_Pe1_pUb0 to cytoplasm_Foxo1_Pa1_Pd1_Pe1_pUb0 by Akt_P2_1";

function function_145(Akt_P2, cytoplasm, kkin, nucleus, nucleus_Foxo1_Pa0_Pd1_Pe1_pUb0)
  nucleus_Foxo1_Pa0_Pd1_Pe1_pUb0*nucleus*Akt_P2*cytoplasm*kkin/nucleus;
end
function_145 is "Function for conversion of nucleus_Foxo1_Pa0_Pd1_Pe1_pUb0 to nucleus_Foxo1_Pa1_Pd1_Pe1_pUb0 by Akt_P2_1";

function function_146(Akt_P2, cytoplasm, dnabound, dnabound_Foxo1_Pa0_Pd1_Pe1_pUb0, kkin)
  dnabound_Foxo1_Pa0_Pd1_Pe1_pUb0*dnabound*Akt_P2*cytoplasm*kkin/dnabound;
end
function_146 is "Function for conversion of dnabound_Foxo1_Pa0_Pd1_Pe1_pUb0 to dnabound_Foxo1_Pa1_Pd1_Pe1_pUb0 by Akt_P2_1";

function function_147(Akt_P2, cytoplasm, cytoplasm_Foxo1_Pa0_Pd1_Pe1_pUb1, kkin)
  cytoplasm_Foxo1_Pa0_Pd1_Pe1_pUb1*cytoplasm*Akt_P2*cytoplasm*kkin/cytoplasm;
end
function_147 is "Function for conversion of cytoplasm_Foxo1_Pa0_Pd1_Pe1_pUb1 to cytoplasm_Foxo1_Pa1_Pd1_Pe1_pUb1 by Akt_P2_1";

function function_148(Akt_P2, cytoplasm, kkin, nucleus, nucleus_Foxo1_Pa0_Pd1_Pe1_pUb1)
  nucleus_Foxo1_Pa0_Pd1_Pe1_pUb1*nucleus*Akt_P2*cytoplasm*kkin/nucleus;
end
function_148 is "Function for conversion of nucleus_Foxo1_Pa0_Pd1_Pe1_pUb1 to nucleus_Foxo1_Pa1_Pd1_Pe1_pUb1 by Akt_P2_1";

function function_149(Akt_P2, cytoplasm, dnabound, dnabound_Foxo1_Pa0_Pd1_Pe1_pUb1, kkin)
  dnabound_Foxo1_Pa0_Pd1_Pe1_pUb1*dnabound*Akt_P2*cytoplasm*kkin/dnabound;
end
function_149 is "Function for conversion of dnabound_Foxo1_Pa0_Pd1_Pe1_pUb1 to dnabound_Foxo1_Pa1_Pd1_Pe1_pUb1 by Akt_P2_1";

function function_150(SGK, cytoplasm, cytoplasm_Foxo1_Pa0_Pd0_Pe0_pUb0, kkin)
  cytoplasm_Foxo1_Pa0_Pd0_Pe0_pUb0*cytoplasm*SGK*cytoplasm*kkin/cytoplasm;
end
function_150 is "Function for conversion of cytoplasm_Foxo1_Pa0_Pd0_Pe0_pUb0 to cytoplasm_Foxo1_Pa1_Pd0_Pe0_pUb0 by SGK_1";

function function_151(SGK, cytoplasm, kkin, nucleus, nucleus_Foxo1_Pa0_Pd0_Pe0_pUb0)
  nucleus_Foxo1_Pa0_Pd0_Pe0_pUb0*nucleus*SGK*cytoplasm*kkin/nucleus;
end
function_151 is "Function for conversion of nucleus_Foxo1_Pa0_Pd0_Pe0_pUb0 to nucleus_Foxo1_Pa1_Pd0_Pe0_pUb0 by SGK_1";

function function_152(SGK, cytoplasm, dnabound, dnabound_Foxo1_Pa0_Pd0_Pe0_pUb0, kkin)
  dnabound_Foxo1_Pa0_Pd0_Pe0_pUb0*dnabound*SGK*cytoplasm*kkin/dnabound;
end
function_152 is "Function for conversion of dnabound_Foxo1_Pa0_Pd0_Pe0_pUb0 to dnabound_Foxo1_Pa1_Pd0_Pe0_pUb0 by SGK_1";

function function_153(SGK, cytoplasm, cytoplasm_Foxo1_Pa0_Pd0_Pe0_pUb1, kkin)
  cytoplasm_Foxo1_Pa0_Pd0_Pe0_pUb1*cytoplasm*SGK*cytoplasm*kkin/cytoplasm;
end
function_153 is "Function for conversion of cytoplasm_Foxo1_Pa0_Pd0_Pe0_pUb1 to cytoplasm_Foxo1_Pa1_Pd0_Pe0_pUb1 by SGK_1";

function function_154(SGK, cytoplasm, kkin, nucleus, nucleus_Foxo1_Pa0_Pd0_Pe0_pUb1)
  nucleus_Foxo1_Pa0_Pd0_Pe0_pUb1*nucleus*SGK*cytoplasm*kkin/nucleus;
end
function_154 is "Function for conversion of nucleus_Foxo1_Pa0_Pd0_Pe0_pUb1 to nucleus_Foxo1_Pa1_Pd0_Pe0_pUb1 by SGK_1";

function function_155(SGK, cytoplasm, dnabound, dnabound_Foxo1_Pa0_Pd0_Pe0_pUb1, kkin)
  dnabound_Foxo1_Pa0_Pd0_Pe0_pUb1*dnabound*SGK*cytoplasm*kkin/dnabound;
end
function_155 is "Function for conversion of dnabound_Foxo1_Pa0_Pd0_Pe0_pUb1 to dnabound_Foxo1_Pa1_Pd0_Pe0_pUb1 by SGK_1";

function function_156(SGK, cytoplasm, cytoplasm_Foxo1_Pa0_Pd0_Pe1_pUb0, kkin)
  cytoplasm_Foxo1_Pa0_Pd0_Pe1_pUb0*cytoplasm*SGK*cytoplasm*kkin/cytoplasm;
end
function_156 is "Function for conversion of cytoplasm_Foxo1_Pa0_Pd0_Pe1_pUb0 to cytoplasm_Foxo1_Pa1_Pd0_Pe1_pUb0 by SGK_1";

function function_157(SGK, cytoplasm, kkin, nucleus, nucleus_Foxo1_Pa0_Pd0_Pe1_pUb0)
  nucleus_Foxo1_Pa0_Pd0_Pe1_pUb0*nucleus*SGK*cytoplasm*kkin/nucleus;
end
function_157 is "Function for conversion of nucleus_Foxo1_Pa0_Pd0_Pe1_pUb0 to nucleus_Foxo1_Pa1_Pd0_Pe1_pUb0 by SGK_1";

function function_158(SGK, cytoplasm, dnabound, dnabound_Foxo1_Pa0_Pd0_Pe1_pUb0, kkin)
  dnabound_Foxo1_Pa0_Pd0_Pe1_pUb0*dnabound*SGK*cytoplasm*kkin/dnabound;
end
function_158 is "Function for conversion of dnabound_Foxo1_Pa0_Pd0_Pe1_pUb0 to dnabound_Foxo1_Pa1_Pd0_Pe1_pUb0 by SGK_1";

function function_159(SGK, cytoplasm, cytoplasm_Foxo1_Pa0_Pd0_Pe1_pUb1, kkin)
  cytoplasm_Foxo1_Pa0_Pd0_Pe1_pUb1*cytoplasm*SGK*cytoplasm*kkin/cytoplasm;
end
function_159 is "Function for conversion of cytoplasm_Foxo1_Pa0_Pd0_Pe1_pUb1 to cytoplasm_Foxo1_Pa1_Pd0_Pe1_pUb1 by SGK_1";

function function_160(SGK, cytoplasm, kkin, nucleus, nucleus_Foxo1_Pa0_Pd0_Pe1_pUb1)
  nucleus_Foxo1_Pa0_Pd0_Pe1_pUb1*nucleus*SGK*cytoplasm*kkin/nucleus;
end
function_160 is "Function for conversion of nucleus_Foxo1_Pa0_Pd0_Pe1_pUb1 to nucleus_Foxo1_Pa1_Pd0_Pe1_pUb1 by SGK_1";

function function_161(SGK, cytoplasm, dnabound, dnabound_Foxo1_Pa0_Pd0_Pe1_pUb1, kkin)
  dnabound_Foxo1_Pa0_Pd0_Pe1_pUb1*dnabound*SGK*cytoplasm*kkin/dnabound;
end
function_161 is "Function for conversion of dnabound_Foxo1_Pa0_Pd0_Pe1_pUb1 to dnabound_Foxo1_Pa1_Pd0_Pe1_pUb1 by SGK_1";

function function_162(SGK, cytoplasm, cytoplasm_Foxo1_Pa0_Pd1_Pe0_pUb0, kkin)
  cytoplasm_Foxo1_Pa0_Pd1_Pe0_pUb0*cytoplasm*SGK*cytoplasm*kkin/cytoplasm;
end
function_162 is "Function for conversion of cytoplasm_Foxo1_Pa0_Pd1_Pe0_pUb0 to cytoplasm_Foxo1_Pa1_Pd1_Pe0_pUb0 by SGK_1";

function function_163(SGK, cytoplasm, kkin, nucleus, nucleus_Foxo1_Pa0_Pd1_Pe0_pUb0)
  nucleus_Foxo1_Pa0_Pd1_Pe0_pUb0*nucleus*SGK*cytoplasm*kkin/nucleus;
end
function_163 is "Function for conversion of nucleus_Foxo1_Pa0_Pd1_Pe0_pUb0 to nucleus_Foxo1_Pa1_Pd1_Pe0_pUb0 by SGK_1";

function function_164(SGK, cytoplasm, dnabound, dnabound_Foxo1_Pa0_Pd1_Pe0_pUb0, kkin)
  dnabound_Foxo1_Pa0_Pd1_Pe0_pUb0*dnabound*SGK*cytoplasm*kkin/dnabound;
end
function_164 is "Function for conversion of dnabound_Foxo1_Pa0_Pd1_Pe0_pUb0 to dnabound_Foxo1_Pa1_Pd1_Pe0_pUb0 by SGK_1";

function function_165(SGK, cytoplasm, cytoplasm_Foxo1_Pa0_Pd1_Pe0_pUb1, kkin)
  cytoplasm_Foxo1_Pa0_Pd1_Pe0_pUb1*cytoplasm*SGK*cytoplasm*kkin/cytoplasm;
end
function_165 is "Function for conversion of cytoplasm_Foxo1_Pa0_Pd1_Pe0_pUb1 to cytoplasm_Foxo1_Pa1_Pd1_Pe0_pUb1 by SGK_1";

function Function_for_R17f_1(PI345P3, PKC, cytoplasm, k12, pip3_basal)
  k12*PKC*cytoplasm*piecewise(PI345P3*cytoplasm - pip3_basal, PI345P3*cytoplasm > pip3_basal, 0)/cytoplasm;
end

function function_166(SGK, cytoplasm, kkin, nucleus, nucleus_Foxo1_Pa0_Pd1_Pe0_pUb1)
  nucleus_Foxo1_Pa0_Pd1_Pe0_pUb1*nucleus*SGK*cytoplasm*kkin/nucleus;
end
function_166 is "Function for conversion of nucleus_Foxo1_Pa0_Pd1_Pe0_pUb1 to nucleus_Foxo1_Pa1_Pd1_Pe0_pUb1 by SGK_1";

function function_167(SGK, cytoplasm, dnabound, dnabound_Foxo1_Pa0_Pd1_Pe0_pUb1, kkin)
  dnabound_Foxo1_Pa0_Pd1_Pe0_pUb1*dnabound*SGK*cytoplasm*kkin/dnabound;
end
function_167 is "Function for conversion of dnabound_Foxo1_Pa0_Pd1_Pe0_pUb1 to dnabound_Foxo1_Pa1_Pd1_Pe0_pUb1 by SGK_1";

function function_168(SGK, cytoplasm, cytoplasm_Foxo1_Pa0_Pd1_Pe1_pUb0, kkin)
  cytoplasm_Foxo1_Pa0_Pd1_Pe1_pUb0*cytoplasm*SGK*cytoplasm*kkin/cytoplasm;
end
function_168 is "Function for conversion of cytoplasm_Foxo1_Pa0_Pd1_Pe1_pUb0 to cytoplasm_Foxo1_Pa1_Pd1_Pe1_pUb0 by SGK_1";

function function_169(SGK, cytoplasm, kkin, nucleus, nucleus_Foxo1_Pa0_Pd1_Pe1_pUb0)
  nucleus_Foxo1_Pa0_Pd1_Pe1_pUb0*nucleus*SGK*cytoplasm*kkin/nucleus;
end
function_169 is "Function for conversion of nucleus_Foxo1_Pa0_Pd1_Pe1_pUb0 to nucleus_Foxo1_Pa1_Pd1_Pe1_pUb0 by SGK_1";

function function_170(SGK, cytoplasm, dnabound, dnabound_Foxo1_Pa0_Pd1_Pe1_pUb0, kkin)
  dnabound_Foxo1_Pa0_Pd1_Pe1_pUb0*dnabound*SGK*cytoplasm*kkin/dnabound;
end
function_170 is "Function for conversion of dnabound_Foxo1_Pa0_Pd1_Pe1_pUb0 to dnabound_Foxo1_Pa1_Pd1_Pe1_pUb0 by SGK_1";

function function_171(SGK, cytoplasm, cytoplasm_Foxo1_Pa0_Pd1_Pe1_pUb1, kkin)
  cytoplasm_Foxo1_Pa0_Pd1_Pe1_pUb1*cytoplasm*SGK*cytoplasm*kkin/cytoplasm;
end
function_171 is "Function for conversion of cytoplasm_Foxo1_Pa0_Pd1_Pe1_pUb1 to cytoplasm_Foxo1_Pa1_Pd1_Pe1_pUb1 by SGK_1";

function function_172(SGK, cytoplasm, kkin, nucleus, nucleus_Foxo1_Pa0_Pd1_Pe1_pUb1)
  nucleus_Foxo1_Pa0_Pd1_Pe1_pUb1*nucleus*SGK*cytoplasm*kkin/nucleus;
end
function_172 is "Function for conversion of nucleus_Foxo1_Pa0_Pd1_Pe1_pUb1 to nucleus_Foxo1_Pa1_Pd1_Pe1_pUb1 by SGK_1";

function function_173(SGK, cytoplasm, dnabound, dnabound_Foxo1_Pa0_Pd1_Pe1_pUb1, kkin)
  dnabound_Foxo1_Pa0_Pd1_Pe1_pUb1*dnabound*SGK*cytoplasm*kkin/dnabound;
end
function_173 is "Function for conversion of dnabound_Foxo1_Pa0_Pd1_Pe1_pUb1 to dnabound_Foxo1_Pa1_Pd1_Pe1_pUb1 by SGK_1";

function function_174(PP2A, cytoplasm, cytoplasm_Foxo1_Pa1_Pd0_Pe0_pUb0, kdephos)
  cytoplasm_Foxo1_Pa1_Pd0_Pe0_pUb0*cytoplasm*PP2A*cytoplasm*kdephos/cytoplasm;
end
function_174 is "Function for conversion of cytoplasm_Foxo1_Pa1_Pd0_Pe0_pUb0 to cytoplasm_Foxo1_Pa0_Pd0_Pe0_pUb0 by PP2A_1";

function function_175(PP2A, cytoplasm, kdephos, nucleus, nucleus_Foxo1_Pa1_Pd0_Pe0_pUb0)
  nucleus_Foxo1_Pa1_Pd0_Pe0_pUb0*nucleus*PP2A*cytoplasm*kdephos/nucleus;
end
function_175 is "Function for conversion of nucleus_Foxo1_Pa1_Pd0_Pe0_pUb0 to nucleus_Foxo1_Pa0_Pd0_Pe0_pUb0 by PP2A_1";

function function_176(PP2A, cytoplasm, dnabound, dnabound_Foxo1_Pa1_Pd0_Pe0_pUb0, kdephos)
  dnabound_Foxo1_Pa1_Pd0_Pe0_pUb0*dnabound*PP2A*cytoplasm*kdephos/dnabound;
end
function_176 is "Function for conversion of dnabound_Foxo1_Pa1_Pd0_Pe0_pUb0 to dnabound_Foxo1_Pa0_Pd0_Pe0_pUb0 by PP2A_1";

function function_177(PP2A, cytoplasm, cytoplasm_Foxo1_Pa1_Pd0_Pe0_pUb1, kdephos)
  cytoplasm_Foxo1_Pa1_Pd0_Pe0_pUb1*cytoplasm*PP2A*cytoplasm*kdephos/cytoplasm;
end
function_177 is "Function for conversion of cytoplasm_Foxo1_Pa1_Pd0_Pe0_pUb1 to cytoplasm_Foxo1_Pa0_Pd0_Pe0_pUb1 by PP2A_1";

function function_178(PP2A, cytoplasm, kdephos, nucleus, nucleus_Foxo1_Pa1_Pd0_Pe0_pUb1)
  nucleus_Foxo1_Pa1_Pd0_Pe0_pUb1*nucleus*PP2A*cytoplasm*kdephos/nucleus;
end
function_178 is "Function for conversion of nucleus_Foxo1_Pa1_Pd0_Pe0_pUb1 to nucleus_Foxo1_Pa0_Pd0_Pe0_pUb1 by PP2A_1";

function function_179(PP2A, cytoplasm, dnabound, dnabound_Foxo1_Pa1_Pd0_Pe0_pUb1, kdephos)
  dnabound_Foxo1_Pa1_Pd0_Pe0_pUb1*dnabound*PP2A*cytoplasm*kdephos/dnabound;
end
function_179 is "Function for conversion of dnabound_Foxo1_Pa1_Pd0_Pe0_pUb1 to dnabound_Foxo1_Pa0_Pd0_Pe0_pUb1 by PP2A_1";

function function_180(PP2A, cytoplasm, cytoplasm_Foxo1_Pa1_Pd0_Pe1_pUb0, kdephos)
  cytoplasm_Foxo1_Pa1_Pd0_Pe1_pUb0*cytoplasm*PP2A*cytoplasm*kdephos/cytoplasm;
end
function_180 is "Function for conversion of cytoplasm_Foxo1_Pa1_Pd0_Pe1_pUb0 to cytoplasm_Foxo1_Pa0_Pd0_Pe1_pUb0 by PP2A_1";

function function_181(PP2A, cytoplasm, kdephos, nucleus, nucleus_Foxo1_Pa1_Pd0_Pe1_pUb0)
  nucleus_Foxo1_Pa1_Pd0_Pe1_pUb0*nucleus*PP2A*cytoplasm*kdephos/nucleus;
end
function_181 is "Function for conversion of nucleus_Foxo1_Pa1_Pd0_Pe1_pUb0 to nucleus_Foxo1_Pa0_Pd0_Pe1_pUb0 by PP2A_1";

function function_182(PP2A, cytoplasm, dnabound, dnabound_Foxo1_Pa1_Pd0_Pe1_pUb0, kdephos)
  dnabound_Foxo1_Pa1_Pd0_Pe1_pUb0*dnabound*PP2A*cytoplasm*kdephos/dnabound;
end
function_182 is "Function for conversion of dnabound_Foxo1_Pa1_Pd0_Pe1_pUb0 to dnabound_Foxo1_Pa0_Pd0_Pe1_pUb0 by PP2A_1";

function function_183(PP2A, cytoplasm, cytoplasm_Foxo1_Pa1_Pd0_Pe1_pUb1, kdephos)
  cytoplasm_Foxo1_Pa1_Pd0_Pe1_pUb1*cytoplasm*PP2A*cytoplasm*kdephos/cytoplasm;
end
function_183 is "Function for conversion of cytoplasm_Foxo1_Pa1_Pd0_Pe1_pUb1 to cytoplasm_Foxo1_Pa0_Pd0_Pe1_pUb1 by PP2A_1";

function function_184(PP2A, cytoplasm, kdephos, nucleus, nucleus_Foxo1_Pa1_Pd0_Pe1_pUb1)
  nucleus_Foxo1_Pa1_Pd0_Pe1_pUb1*nucleus*PP2A*cytoplasm*kdephos/nucleus;
end
function_184 is "Function for conversion of nucleus_Foxo1_Pa1_Pd0_Pe1_pUb1 to nucleus_Foxo1_Pa0_Pd0_Pe1_pUb1 by PP2A_1";

function function_185(PP2A, cytoplasm, dnabound, dnabound_Foxo1_Pa1_Pd0_Pe1_pUb1, kdephos)
  dnabound_Foxo1_Pa1_Pd0_Pe1_pUb1*dnabound*PP2A*cytoplasm*kdephos/dnabound;
end
function_185 is "Function for conversion of dnabound_Foxo1_Pa1_Pd0_Pe1_pUb1 to dnabound_Foxo1_Pa0_Pd0_Pe1_pUb1 by PP2A_1";

function function_186(PP2A, cytoplasm, cytoplasm_Foxo1_Pa1_Pd1_Pe0_pUb0, kdephos)
  cytoplasm_Foxo1_Pa1_Pd1_Pe0_pUb0*cytoplasm*PP2A*cytoplasm*kdephos/cytoplasm;
end
function_186 is "Function for conversion of cytoplasm_Foxo1_Pa1_Pd1_Pe0_pUb0 to cytoplasm_Foxo1_Pa0_Pd1_Pe0_pUb0 by PP2A_1";

function function_187(PP2A, cytoplasm, kdephos, nucleus, nucleus_Foxo1_Pa1_Pd1_Pe0_pUb0)
  nucleus_Foxo1_Pa1_Pd1_Pe0_pUb0*nucleus*PP2A*cytoplasm*kdephos/nucleus;
end
function_187 is "Function for conversion of nucleus_Foxo1_Pa1_Pd1_Pe0_pUb0 to nucleus_Foxo1_Pa0_Pd1_Pe0_pUb0 by PP2A_1";

function function_188(PP2A, cytoplasm, dnabound, dnabound_Foxo1_Pa1_Pd1_Pe0_pUb0, kdephos)
  dnabound_Foxo1_Pa1_Pd1_Pe0_pUb0*dnabound*PP2A*cytoplasm*kdephos/dnabound;
end
function_188 is "Function for conversion of dnabound_Foxo1_Pa1_Pd1_Pe0_pUb0 to dnabound_Foxo1_Pa0_Pd1_Pe0_pUb0 by PP2A_1";

function function_189(PP2A, cytoplasm, cytoplasm_Foxo1_Pa1_Pd1_Pe0_pUb1, kdephos)
  cytoplasm_Foxo1_Pa1_Pd1_Pe0_pUb1*cytoplasm*PP2A*cytoplasm*kdephos/cytoplasm;
end
function_189 is "Function for conversion of cytoplasm_Foxo1_Pa1_Pd1_Pe0_pUb1 to cytoplasm_Foxo1_Pa0_Pd1_Pe0_pUb1 by PP2A_1";

function function_190(PP2A, cytoplasm, kdephos, nucleus, nucleus_Foxo1_Pa1_Pd1_Pe0_pUb1)
  nucleus_Foxo1_Pa1_Pd1_Pe0_pUb1*nucleus*PP2A*cytoplasm*kdephos/nucleus;
end
function_190 is "Function for conversion of nucleus_Foxo1_Pa1_Pd1_Pe0_pUb1 to nucleus_Foxo1_Pa0_Pd1_Pe0_pUb1 by PP2A_1";

function function_191(PP2A, cytoplasm, dnabound, dnabound_Foxo1_Pa1_Pd1_Pe0_pUb1, kdephos)
  dnabound_Foxo1_Pa1_Pd1_Pe0_pUb1*dnabound*PP2A*cytoplasm*kdephos/dnabound;
end
function_191 is "Function for conversion of dnabound_Foxo1_Pa1_Pd1_Pe0_pUb1 to dnabound_Foxo1_Pa0_Pd1_Pe0_pUb1 by PP2A_1";

function function_192(PP2A, cytoplasm, cytoplasm_Foxo1_Pa1_Pd1_Pe1_pUb0, kdephos)
  cytoplasm_Foxo1_Pa1_Pd1_Pe1_pUb0*cytoplasm*PP2A*cytoplasm*kdephos/cytoplasm;
end
function_192 is "Function for conversion of cytoplasm_Foxo1_Pa1_Pd1_Pe1_pUb0 to cytoplasm_Foxo1_Pa0_Pd1_Pe1_pUb0 by PP2A_1";

function function_193(PP2A, cytoplasm, kdephos, nucleus, nucleus_Foxo1_Pa1_Pd1_Pe1_pUb0)
  nucleus_Foxo1_Pa1_Pd1_Pe1_pUb0*nucleus*PP2A*cytoplasm*kdephos/nucleus;
end
function_193 is "Function for conversion of nucleus_Foxo1_Pa1_Pd1_Pe1_pUb0 to nucleus_Foxo1_Pa0_Pd1_Pe1_pUb0 by PP2A_1";

function function_194(PP2A, cytoplasm, dnabound, dnabound_Foxo1_Pa1_Pd1_Pe1_pUb0, kdephos)
  dnabound_Foxo1_Pa1_Pd1_Pe1_pUb0*dnabound*PP2A*cytoplasm*kdephos/dnabound;
end
function_194 is "Function for conversion of dnabound_Foxo1_Pa1_Pd1_Pe1_pUb0 to dnabound_Foxo1_Pa0_Pd1_Pe1_pUb0 by PP2A_1";

function function_195(PP2A, cytoplasm, cytoplasm_Foxo1_Pa1_Pd1_Pe1_pUb1, kdephos)
  cytoplasm_Foxo1_Pa1_Pd1_Pe1_pUb1*cytoplasm*PP2A*cytoplasm*kdephos/cytoplasm;
end
function_195 is "Function for conversion of cytoplasm_Foxo1_Pa1_Pd1_Pe1_pUb1 to cytoplasm_Foxo1_Pa0_Pd1_Pe1_pUb1 by PP2A_1";

function function_196(PP2A, cytoplasm, kdephos, nucleus, nucleus_Foxo1_Pa1_Pd1_Pe1_pUb1)
  nucleus_Foxo1_Pa1_Pd1_Pe1_pUb1*nucleus*PP2A*cytoplasm*kdephos/nucleus;
end
function_196 is "Function for conversion of nucleus_Foxo1_Pa1_Pd1_Pe1_pUb1 to nucleus_Foxo1_Pa0_Pd1_Pe1_pUb1 by PP2A_1";

function function_197(PP2A, cytoplasm, dnabound, dnabound_Foxo1_Pa1_Pd1_Pe1_pUb1, kdephos)
  dnabound_Foxo1_Pa1_Pd1_Pe1_pUb1*dnabound*PP2A*cytoplasm*kdephos/dnabound;
end
function_197 is "Function for conversion of dnabound_Foxo1_Pa1_Pd1_Pe1_pUb1 to dnabound_Foxo1_Pa0_Pd1_Pe1_pUb1 by PP2A_1";

function function_198(IKK_P, by_ikk_phos_factor, cytoplasm, cytoplasm_Foxo1_Pa0_Pd0_Pe0_pUb0, kkin)
  cytoplasm_Foxo1_Pa0_Pd0_Pe0_pUb0*cytoplasm*IKK_P*cytoplasm*by_ikk_phos_factor*kkin/cytoplasm;
end
function_198 is "Function for conversion of cytoplasm_Foxo1_Pa0_Pd0_Pe0_pUb0 to cytoplasm_Foxo1_Pa0_Pd1_Pe0_pUb0 by IKK_P_1";

function function_199(IKK_P, by_ikk_phos_factor, cytoplasm, kkin, nucleus, nucleus_Foxo1_Pa0_Pd0_Pe0_pUb0)
  nucleus_Foxo1_Pa0_Pd0_Pe0_pUb0*nucleus*IKK_P*cytoplasm*by_ikk_phos_factor*kkin/nucleus;
end
function_199 is "Function for conversion of nucleus_Foxo1_Pa0_Pd0_Pe0_pUb0 to nucleus_Foxo1_Pa0_Pd1_Pe0_pUb0 by IKK_P_1";

function function_200(IKK_P, by_ikk_phos_factor, cytoplasm, dnabound, dnabound_Foxo1_Pa0_Pd0_Pe0_pUb0, kkin)
  dnabound_Foxo1_Pa0_Pd0_Pe0_pUb0*dnabound*IKK_P*cytoplasm*by_ikk_phos_factor*kkin/dnabound;
end
function_200 is "Function for conversion of dnabound_Foxo1_Pa0_Pd0_Pe0_pUb0 to dnabound_Foxo1_Pa0_Pd1_Pe0_pUb0 by IKK_P_1";

function function_201(IKK_P, by_ikk_phos_factor, cytoplasm, cytoplasm_Foxo1_Pa0_Pd0_Pe0_pUb1, kkin)
  cytoplasm_Foxo1_Pa0_Pd0_Pe0_pUb1*cytoplasm*IKK_P*cytoplasm*by_ikk_phos_factor*kkin/cytoplasm;
end
function_201 is "Function for conversion of cytoplasm_Foxo1_Pa0_Pd0_Pe0_pUb1 to cytoplasm_Foxo1_Pa0_Pd1_Pe0_pUb1 by IKK_P_1";

function function_202(IKK_P, by_ikk_phos_factor, cytoplasm, kkin, nucleus, nucleus_Foxo1_Pa0_Pd0_Pe0_pUb1)
  nucleus_Foxo1_Pa0_Pd0_Pe0_pUb1*nucleus*IKK_P*cytoplasm*by_ikk_phos_factor*kkin/nucleus;
end
function_202 is "Function for conversion of nucleus_Foxo1_Pa0_Pd0_Pe0_pUb1 to nucleus_Foxo1_Pa0_Pd1_Pe0_pUb1 by IKK_P_1";

function function_203(IKK_P, by_ikk_phos_factor, cytoplasm, dnabound, dnabound_Foxo1_Pa0_Pd0_Pe0_pUb1, kkin)
  dnabound_Foxo1_Pa0_Pd0_Pe0_pUb1*dnabound*IKK_P*cytoplasm*by_ikk_phos_factor*kkin/dnabound;
end
function_203 is "Function for conversion of dnabound_Foxo1_Pa0_Pd0_Pe0_pUb1 to dnabound_Foxo1_Pa0_Pd1_Pe0_pUb1 by IKK_P_1";

function function_204(IKK_P, by_ikk_phos_factor, cytoplasm, cytoplasm_Foxo1_Pa0_Pd0_Pe1_pUb0, kkin)
  cytoplasm_Foxo1_Pa0_Pd0_Pe1_pUb0*cytoplasm*IKK_P*cytoplasm*by_ikk_phos_factor*kkin/cytoplasm;
end
function_204 is "Function for conversion of cytoplasm_Foxo1_Pa0_Pd0_Pe1_pUb0 to cytoplasm_Foxo1_Pa0_Pd1_Pe1_pUb0 by IKK_P_1";

function function_205(IKK_P, by_ikk_phos_factor, cytoplasm, kkin, nucleus, nucleus_Foxo1_Pa0_Pd0_Pe1_pUb0)
  nucleus_Foxo1_Pa0_Pd0_Pe1_pUb0*nucleus*IKK_P*cytoplasm*by_ikk_phos_factor*kkin/nucleus;
end
function_205 is "Function for conversion of nucleus_Foxo1_Pa0_Pd0_Pe1_pUb0 to nucleus_Foxo1_Pa0_Pd1_Pe1_pUb0 by IKK_P_1";

function function_206(IKK_P, by_ikk_phos_factor, cytoplasm, dnabound, dnabound_Foxo1_Pa0_Pd0_Pe1_pUb0, kkin)
  dnabound_Foxo1_Pa0_Pd0_Pe1_pUb0*dnabound*IKK_P*cytoplasm*by_ikk_phos_factor*kkin/dnabound;
end
function_206 is "Function for conversion of dnabound_Foxo1_Pa0_Pd0_Pe1_pUb0 to dnabound_Foxo1_Pa0_Pd1_Pe1_pUb0 by IKK_P_1";

function function_207(IKK_P, by_ikk_phos_factor, cytoplasm, cytoplasm_Foxo1_Pa0_Pd0_Pe1_pUb1, kkin)
  cytoplasm_Foxo1_Pa0_Pd0_Pe1_pUb1*cytoplasm*IKK_P*cytoplasm*by_ikk_phos_factor*kkin/cytoplasm;
end
function_207 is "Function for conversion of cytoplasm_Foxo1_Pa0_Pd0_Pe1_pUb1 to cytoplasm_Foxo1_Pa0_Pd1_Pe1_pUb1 by IKK_P_1";

function function_208(IKK_P, by_ikk_phos_factor, cytoplasm, kkin, nucleus, nucleus_Foxo1_Pa0_Pd0_Pe1_pUb1)
  nucleus_Foxo1_Pa0_Pd0_Pe1_pUb1*nucleus*IKK_P*cytoplasm*by_ikk_phos_factor*kkin/nucleus;
end
function_208 is "Function for conversion of nucleus_Foxo1_Pa0_Pd0_Pe1_pUb1 to nucleus_Foxo1_Pa0_Pd1_Pe1_pUb1 by IKK_P_1";

function function_209(IKK_P, by_ikk_phos_factor, cytoplasm, dnabound, dnabound_Foxo1_Pa0_Pd0_Pe1_pUb1, kkin)
  dnabound_Foxo1_Pa0_Pd0_Pe1_pUb1*dnabound*IKK_P*cytoplasm*by_ikk_phos_factor*kkin/dnabound;
end
function_209 is "Function for conversion of dnabound_Foxo1_Pa0_Pd0_Pe1_pUb1 to dnabound_Foxo1_Pa0_Pd1_Pe1_pUb1 by IKK_P_1";

function function_210(PP2A, cytoplasm, cytoplasm_Foxo1_Pa0_Pd1_Pe0_pUb0, kdephos)
  cytoplasm_Foxo1_Pa0_Pd1_Pe0_pUb0*cytoplasm*PP2A*cytoplasm*kdephos/cytoplasm;
end
function_210 is "Function for conversion of cytoplasm_Foxo1_Pa0_Pd1_Pe0_pUb0 to cytoplasm_Foxo1_Pa0_Pd0_Pe0_pUb0 by PP2A_1";

function function_211(PP2A, cytoplasm, kdephos, nucleus, nucleus_Foxo1_Pa0_Pd1_Pe0_pUb0)
  nucleus_Foxo1_Pa0_Pd1_Pe0_pUb0*nucleus*PP2A*cytoplasm*kdephos/nucleus;
end
function_211 is "Function for conversion of nucleus_Foxo1_Pa0_Pd1_Pe0_pUb0 to nucleus_Foxo1_Pa0_Pd0_Pe0_pUb0 by PP2A_1";

function function_212(PP2A, cytoplasm, dnabound, dnabound_Foxo1_Pa0_Pd1_Pe0_pUb0, kdephos)
  dnabound_Foxo1_Pa0_Pd1_Pe0_pUb0*dnabound*PP2A*cytoplasm*kdephos/dnabound;
end
function_212 is "Function for conversion of dnabound_Foxo1_Pa0_Pd1_Pe0_pUb0 to dnabound_Foxo1_Pa0_Pd0_Pe0_pUb0 by PP2A_1";

function function_213(PP2A, cytoplasm, cytoplasm_Foxo1_Pa0_Pd1_Pe0_pUb1, kdephos)
  cytoplasm_Foxo1_Pa0_Pd1_Pe0_pUb1*cytoplasm*PP2A*cytoplasm*kdephos/cytoplasm;
end
function_213 is "Function for conversion of cytoplasm_Foxo1_Pa0_Pd1_Pe0_pUb1 to cytoplasm_Foxo1_Pa0_Pd0_Pe0_pUb1 by PP2A_1";

function function_214(PP2A, cytoplasm, kdephos, nucleus, nucleus_Foxo1_Pa0_Pd1_Pe0_pUb1)
  nucleus_Foxo1_Pa0_Pd1_Pe0_pUb1*nucleus*PP2A*cytoplasm*kdephos/nucleus;
end
function_214 is "Function for conversion of nucleus_Foxo1_Pa0_Pd1_Pe0_pUb1 to nucleus_Foxo1_Pa0_Pd0_Pe0_pUb1 by PP2A_1";

function function_215(PP2A, cytoplasm, dnabound, dnabound_Foxo1_Pa0_Pd1_Pe0_pUb1, kdephos)
  dnabound_Foxo1_Pa0_Pd1_Pe0_pUb1*dnabound*PP2A*cytoplasm*kdephos/dnabound;
end
function_215 is "Function for conversion of dnabound_Foxo1_Pa0_Pd1_Pe0_pUb1 to dnabound_Foxo1_Pa0_Pd0_Pe0_pUb1 by PP2A_1";

function function_216(PP2A, cytoplasm, cytoplasm_Foxo1_Pa0_Pd1_Pe1_pUb0, kdephos)
  cytoplasm_Foxo1_Pa0_Pd1_Pe1_pUb0*cytoplasm*PP2A*cytoplasm*kdephos/cytoplasm;
end
function_216 is "Function for conversion of cytoplasm_Foxo1_Pa0_Pd1_Pe1_pUb0 to cytoplasm_Foxo1_Pa0_Pd0_Pe1_pUb0 by PP2A_1";

function function_217(PP2A, cytoplasm, kdephos, nucleus, nucleus_Foxo1_Pa0_Pd1_Pe1_pUb0)
  nucleus_Foxo1_Pa0_Pd1_Pe1_pUb0*nucleus*PP2A*cytoplasm*kdephos/nucleus;
end
function_217 is "Function for conversion of nucleus_Foxo1_Pa0_Pd1_Pe1_pUb0 to nucleus_Foxo1_Pa0_Pd0_Pe1_pUb0 by PP2A_1";

function function_218(PP2A, cytoplasm, dnabound, dnabound_Foxo1_Pa0_Pd1_Pe1_pUb0, kdephos)
  dnabound_Foxo1_Pa0_Pd1_Pe1_pUb0*dnabound*PP2A*cytoplasm*kdephos/dnabound;
end
function_218 is "Function for conversion of dnabound_Foxo1_Pa0_Pd1_Pe1_pUb0 to dnabound_Foxo1_Pa0_Pd0_Pe1_pUb0 by PP2A_1";

function function_219(PP2A, cytoplasm, cytoplasm_Foxo1_Pa0_Pd1_Pe1_pUb1, kdephos)
  cytoplasm_Foxo1_Pa0_Pd1_Pe1_pUb1*cytoplasm*PP2A*cytoplasm*kdephos/cytoplasm;
end
function_219 is "Function for conversion of cytoplasm_Foxo1_Pa0_Pd1_Pe1_pUb1 to cytoplasm_Foxo1_Pa0_Pd0_Pe1_pUb1 by PP2A_1";

function function_220(PP2A, cytoplasm, kdephos, nucleus, nucleus_Foxo1_Pa0_Pd1_Pe1_pUb1)
  nucleus_Foxo1_Pa0_Pd1_Pe1_pUb1*nucleus*PP2A*cytoplasm*kdephos/nucleus;
end
function_220 is "Function for conversion of nucleus_Foxo1_Pa0_Pd1_Pe1_pUb1 to nucleus_Foxo1_Pa0_Pd0_Pe1_pUb1 by PP2A_1";

function function_221(PP2A, cytoplasm, dnabound, dnabound_Foxo1_Pa0_Pd1_Pe1_pUb1, kdephos)
  dnabound_Foxo1_Pa0_Pd1_Pe1_pUb1*dnabound*PP2A*cytoplasm*kdephos/dnabound;
end
function_221 is "Function for conversion of dnabound_Foxo1_Pa0_Pd1_Pe1_pUb1 to dnabound_Foxo1_Pa0_Pd0_Pe1_pUb1 by PP2A_1";

function function_222(IKK_P, by_ikk_phos_factor, cytoplasm, cytoplasm_Foxo1_Pa1_Pd0_Pe0_pUb0, kkin)
  cytoplasm_Foxo1_Pa1_Pd0_Pe0_pUb0*cytoplasm*IKK_P*cytoplasm*by_ikk_phos_factor*kkin/cytoplasm;
end
function_222 is "Function for conversion of cytoplasm_Foxo1_Pa1_Pd0_Pe0_pUb0 to cytoplasm_Foxo1_Pa1_Pd1_Pe0_pUb0 by IKK_P_1";

function function_223(IKK_P, by_ikk_phos_factor, cytoplasm, kkin, nucleus, nucleus_Foxo1_Pa1_Pd0_Pe0_pUb0)
  nucleus_Foxo1_Pa1_Pd0_Pe0_pUb0*nucleus*IKK_P*cytoplasm*by_ikk_phos_factor*kkin/nucleus;
end
function_223 is "Function for conversion of nucleus_Foxo1_Pa1_Pd0_Pe0_pUb0 to nucleus_Foxo1_Pa1_Pd1_Pe0_pUb0 by IKK_P_1";

function function_224(IKK_P, by_ikk_phos_factor, cytoplasm, dnabound, dnabound_Foxo1_Pa1_Pd0_Pe0_pUb0, kkin)
  dnabound_Foxo1_Pa1_Pd0_Pe0_pUb0*dnabound*IKK_P*cytoplasm*by_ikk_phos_factor*kkin/dnabound;
end
function_224 is "Function for conversion of dnabound_Foxo1_Pa1_Pd0_Pe0_pUb0 to dnabound_Foxo1_Pa1_Pd1_Pe0_pUb0 by IKK_P_1";

function function_225(IKK_P, by_ikk_phos_factor, cytoplasm, cytoplasm_Foxo1_Pa1_Pd0_Pe0_pUb1, kkin)
  cytoplasm_Foxo1_Pa1_Pd0_Pe0_pUb1*cytoplasm*IKK_P*cytoplasm*by_ikk_phos_factor*kkin/cytoplasm;
end
function_225 is "Function for conversion of cytoplasm_Foxo1_Pa1_Pd0_Pe0_pUb1 to cytoplasm_Foxo1_Pa1_Pd1_Pe0_pUb1 by IKK_P_1";

function function_226(IKK_P, by_ikk_phos_factor, cytoplasm, kkin, nucleus, nucleus_Foxo1_Pa1_Pd0_Pe0_pUb1)
  nucleus_Foxo1_Pa1_Pd0_Pe0_pUb1*nucleus*IKK_P*cytoplasm*by_ikk_phos_factor*kkin/nucleus;
end
function_226 is "Function for conversion of nucleus_Foxo1_Pa1_Pd0_Pe0_pUb1 to nucleus_Foxo1_Pa1_Pd1_Pe0_pUb1 by IKK_P_1";

function function_227(IKK_P, by_ikk_phos_factor, cytoplasm, dnabound, dnabound_Foxo1_Pa1_Pd0_Pe0_pUb1, kkin)
  dnabound_Foxo1_Pa1_Pd0_Pe0_pUb1*dnabound*IKK_P*cytoplasm*by_ikk_phos_factor*kkin/dnabound;
end
function_227 is "Function for conversion of dnabound_Foxo1_Pa1_Pd0_Pe0_pUb1 to dnabound_Foxo1_Pa1_Pd1_Pe0_pUb1 by IKK_P_1";

function function_228(IKK_P, by_ikk_phos_factor, cytoplasm, cytoplasm_Foxo1_Pa1_Pd0_Pe1_pUb0, kkin)
  cytoplasm_Foxo1_Pa1_Pd0_Pe1_pUb0*cytoplasm*IKK_P*cytoplasm*by_ikk_phos_factor*kkin/cytoplasm;
end
function_228 is "Function for conversion of cytoplasm_Foxo1_Pa1_Pd0_Pe1_pUb0 to cytoplasm_Foxo1_Pa1_Pd1_Pe1_pUb0 by IKK_P_1";

function function_229(IKK_P, by_ikk_phos_factor, cytoplasm, kkin, nucleus, nucleus_Foxo1_Pa1_Pd0_Pe1_pUb0)
  nucleus_Foxo1_Pa1_Pd0_Pe1_pUb0*nucleus*IKK_P*cytoplasm*by_ikk_phos_factor*kkin/nucleus;
end
function_229 is "Function for conversion of nucleus_Foxo1_Pa1_Pd0_Pe1_pUb0 to nucleus_Foxo1_Pa1_Pd1_Pe1_pUb0 by IKK_P_1";

function function_230(IKK_P, by_ikk_phos_factor, cytoplasm, dnabound, dnabound_Foxo1_Pa1_Pd0_Pe1_pUb0, kkin)
  dnabound_Foxo1_Pa1_Pd0_Pe1_pUb0*dnabound*IKK_P*cytoplasm*by_ikk_phos_factor*kkin/dnabound;
end
function_230 is "Function for conversion of dnabound_Foxo1_Pa1_Pd0_Pe1_pUb0 to dnabound_Foxo1_Pa1_Pd1_Pe1_pUb0 by IKK_P_1";

function function_231(IKK_P, by_ikk_phos_factor, cytoplasm, cytoplasm_Foxo1_Pa1_Pd0_Pe1_pUb1, kkin)
  cytoplasm_Foxo1_Pa1_Pd0_Pe1_pUb1*cytoplasm*IKK_P*cytoplasm*by_ikk_phos_factor*kkin/cytoplasm;
end
function_231 is "Function for conversion of cytoplasm_Foxo1_Pa1_Pd0_Pe1_pUb1 to cytoplasm_Foxo1_Pa1_Pd1_Pe1_pUb1 by IKK_P_1";

function function_232(IKK_P, by_ikk_phos_factor, cytoplasm, kkin, nucleus, nucleus_Foxo1_Pa1_Pd0_Pe1_pUb1)
  nucleus_Foxo1_Pa1_Pd0_Pe1_pUb1*nucleus*IKK_P*cytoplasm*by_ikk_phos_factor*kkin/nucleus;
end
function_232 is "Function for conversion of nucleus_Foxo1_Pa1_Pd0_Pe1_pUb1 to nucleus_Foxo1_Pa1_Pd1_Pe1_pUb1 by IKK_P_1";

function function_233(IKK_P, by_ikk_phos_factor, cytoplasm, dnabound, dnabound_Foxo1_Pa1_Pd0_Pe1_pUb1, kkin)
  dnabound_Foxo1_Pa1_Pd0_Pe1_pUb1*dnabound*IKK_P*cytoplasm*by_ikk_phos_factor*kkin/dnabound;
end
function_233 is "Function for conversion of dnabound_Foxo1_Pa1_Pd0_Pe1_pUb1 to dnabound_Foxo1_Pa1_Pd1_Pe1_pUb1 by IKK_P_1";

function function_234(PP2A, cytoplasm, cytoplasm_Foxo1_Pa1_Pd1_Pe0_pUb0, kdephos)
  cytoplasm_Foxo1_Pa1_Pd1_Pe0_pUb0*cytoplasm*PP2A*cytoplasm*kdephos/cytoplasm;
end
function_234 is "Function for conversion of cytoplasm_Foxo1_Pa1_Pd1_Pe0_pUb0 to cytoplasm_Foxo1_Pa1_Pd0_Pe0_pUb0 by PP2A_1";

function function_235(PP2A, cytoplasm, kdephos, nucleus, nucleus_Foxo1_Pa1_Pd1_Pe0_pUb0)
  nucleus_Foxo1_Pa1_Pd1_Pe0_pUb0*nucleus*PP2A*cytoplasm*kdephos/nucleus;
end
function_235 is "Function for conversion of nucleus_Foxo1_Pa1_Pd1_Pe0_pUb0 to nucleus_Foxo1_Pa1_Pd0_Pe0_pUb0 by PP2A_1";

function function_236(PP2A, cytoplasm, dnabound, dnabound_Foxo1_Pa1_Pd1_Pe0_pUb0, kdephos)
  dnabound_Foxo1_Pa1_Pd1_Pe0_pUb0*dnabound*PP2A*cytoplasm*kdephos/dnabound;
end
function_236 is "Function for conversion of dnabound_Foxo1_Pa1_Pd1_Pe0_pUb0 to dnabound_Foxo1_Pa1_Pd0_Pe0_pUb0 by PP2A_1";

function function_237(PP2A, cytoplasm, cytoplasm_Foxo1_Pa1_Pd1_Pe0_pUb1, kdephos)
  cytoplasm_Foxo1_Pa1_Pd1_Pe0_pUb1*cytoplasm*PP2A*cytoplasm*kdephos/cytoplasm;
end
function_237 is "Function for conversion of cytoplasm_Foxo1_Pa1_Pd1_Pe0_pUb1 to cytoplasm_Foxo1_Pa1_Pd0_Pe0_pUb1 by PP2A_1";

function function_238(PP2A, cytoplasm, kdephos, nucleus, nucleus_Foxo1_Pa1_Pd1_Pe0_pUb1)
  nucleus_Foxo1_Pa1_Pd1_Pe0_pUb1*nucleus*PP2A*cytoplasm*kdephos/nucleus;
end
function_238 is "Function for conversion of nucleus_Foxo1_Pa1_Pd1_Pe0_pUb1 to nucleus_Foxo1_Pa1_Pd0_Pe0_pUb1 by PP2A_1";

function function_239(PP2A, cytoplasm, dnabound, dnabound_Foxo1_Pa1_Pd1_Pe0_pUb1, kdephos)
  dnabound_Foxo1_Pa1_Pd1_Pe0_pUb1*dnabound*PP2A*cytoplasm*kdephos/dnabound;
end
function_239 is "Function for conversion of dnabound_Foxo1_Pa1_Pd1_Pe0_pUb1 to dnabound_Foxo1_Pa1_Pd0_Pe0_pUb1 by PP2A_1";

function function_240(PP2A, cytoplasm, cytoplasm_Foxo1_Pa1_Pd1_Pe1_pUb0, kdephos)
  cytoplasm_Foxo1_Pa1_Pd1_Pe1_pUb0*cytoplasm*PP2A*cytoplasm*kdephos/cytoplasm;
end
function_240 is "Function for conversion of cytoplasm_Foxo1_Pa1_Pd1_Pe1_pUb0 to cytoplasm_Foxo1_Pa1_Pd0_Pe1_pUb0 by PP2A_1";

function function_241(PP2A, cytoplasm, kdephos, nucleus, nucleus_Foxo1_Pa1_Pd1_Pe1_pUb0)
  nucleus_Foxo1_Pa1_Pd1_Pe1_pUb0*nucleus*PP2A*cytoplasm*kdephos/nucleus;
end
function_241 is "Function for conversion of nucleus_Foxo1_Pa1_Pd1_Pe1_pUb0 to nucleus_Foxo1_Pa1_Pd0_Pe1_pUb0 by PP2A_1";

function function_242(PP2A, cytoplasm, dnabound, dnabound_Foxo1_Pa1_Pd1_Pe1_pUb0, kdephos)
  dnabound_Foxo1_Pa1_Pd1_Pe1_pUb0*dnabound*PP2A*cytoplasm*kdephos/dnabound;
end
function_242 is "Function for conversion of dnabound_Foxo1_Pa1_Pd1_Pe1_pUb0 to dnabound_Foxo1_Pa1_Pd0_Pe1_pUb0 by PP2A_1";

function function_243(PP2A, cytoplasm, cytoplasm_Foxo1_Pa1_Pd1_Pe1_pUb1, kdephos)
  cytoplasm_Foxo1_Pa1_Pd1_Pe1_pUb1*cytoplasm*PP2A*cytoplasm*kdephos/cytoplasm;
end
function_243 is "Function for conversion of cytoplasm_Foxo1_Pa1_Pd1_Pe1_pUb1 to cytoplasm_Foxo1_Pa1_Pd0_Pe1_pUb1 by PP2A_1";

function function_244(PP2A, cytoplasm, kdephos, nucleus, nucleus_Foxo1_Pa1_Pd1_Pe1_pUb1)
  nucleus_Foxo1_Pa1_Pd1_Pe1_pUb1*nucleus*PP2A*cytoplasm*kdephos/nucleus;
end
function_244 is "Function for conversion of nucleus_Foxo1_Pa1_Pd1_Pe1_pUb1 to nucleus_Foxo1_Pa1_Pd0_Pe1_pUb1 by PP2A_1";

function function_245(PP2A, cytoplasm, dnabound, dnabound_Foxo1_Pa1_Pd1_Pe1_pUb1, kdephos)
  dnabound_Foxo1_Pa1_Pd1_Pe1_pUb1*dnabound*PP2A*cytoplasm*kdephos/dnabound;
end
function_245 is "Function for conversion of dnabound_Foxo1_Pa1_Pd1_Pe1_pUb1 to dnabound_Foxo1_Pa1_Pd0_Pe1_pUb1 by PP2A_1";

function function_246(JNK_P, by_jnk_phos_factor, cytoplasm, cytoplasm_Foxo1_Pa0_Pd0_Pe0_pUb0, kkin)
  cytoplasm_Foxo1_Pa0_Pd0_Pe0_pUb0*cytoplasm*JNK_P*cytoplasm*by_jnk_phos_factor*kkin/cytoplasm;
end
function_246 is "Function for conversion of cytoplasm_Foxo1_Pa0_Pd0_Pe0_pUb0 to cytoplasm_Foxo1_Pa0_Pd0_Pe1_pUb0 by JNK_P_1";

function function_247(JNK_P, by_jnk_phos_factor, cytoplasm, kkin, nucleus, nucleus_Foxo1_Pa0_Pd0_Pe0_pUb0)
  nucleus_Foxo1_Pa0_Pd0_Pe0_pUb0*nucleus*JNK_P*cytoplasm*by_jnk_phos_factor*kkin/nucleus;
end
function_247 is "Function for conversion of nucleus_Foxo1_Pa0_Pd0_Pe0_pUb0 to nucleus_Foxo1_Pa0_Pd0_Pe1_pUb0 by JNK_P_1";

function function_248(JNK_P, by_jnk_phos_factor, cytoplasm, dnabound, dnabound_Foxo1_Pa0_Pd0_Pe0_pUb0, kkin)
  dnabound_Foxo1_Pa0_Pd0_Pe0_pUb0*dnabound*JNK_P*cytoplasm*by_jnk_phos_factor*kkin/dnabound;
end
function_248 is "Function for conversion of dnabound_Foxo1_Pa0_Pd0_Pe0_pUb0 to dnabound_Foxo1_Pa0_Pd0_Pe1_pUb0 by JNK_P_1";

function function_249(JNK_P, by_jnk_phos_factor, cytoplasm, cytoplasm_Foxo1_Pa0_Pd0_Pe0_pUb1, kkin)
  cytoplasm_Foxo1_Pa0_Pd0_Pe0_pUb1*cytoplasm*JNK_P*cytoplasm*by_jnk_phos_factor*kkin/cytoplasm;
end
function_249 is "Function for conversion of cytoplasm_Foxo1_Pa0_Pd0_Pe0_pUb1 to cytoplasm_Foxo1_Pa0_Pd0_Pe1_pUb1 by JNK_P_1";

function function_250(JNK_P, by_jnk_phos_factor, cytoplasm, kkin, nucleus, nucleus_Foxo1_Pa0_Pd0_Pe0_pUb1)
  nucleus_Foxo1_Pa0_Pd0_Pe0_pUb1*nucleus*JNK_P*cytoplasm*by_jnk_phos_factor*kkin/nucleus;
end
function_250 is "Function for conversion of nucleus_Foxo1_Pa0_Pd0_Pe0_pUb1 to nucleus_Foxo1_Pa0_Pd0_Pe1_pUb1 by JNK_P_1";

function function_251(JNK_P, by_jnk_phos_factor, cytoplasm, dnabound, dnabound_Foxo1_Pa0_Pd0_Pe0_pUb1, kkin)
  dnabound_Foxo1_Pa0_Pd0_Pe0_pUb1*dnabound*JNK_P*cytoplasm*by_jnk_phos_factor*kkin/dnabound;
end
function_251 is "Function for conversion of dnabound_Foxo1_Pa0_Pd0_Pe0_pUb1 to dnabound_Foxo1_Pa0_Pd0_Pe1_pUb1 by JNK_P_1";

function function_252(PP2A, cytoplasm, cytoplasm_Foxo1_Pa0_Pd0_Pe1_pUb0, kdephos)
  cytoplasm_Foxo1_Pa0_Pd0_Pe1_pUb0*cytoplasm*PP2A*cytoplasm*kdephos/cytoplasm;
end
function_252 is "Function for conversion of cytoplasm_Foxo1_Pa0_Pd0_Pe1_pUb0 to cytoplasm_Foxo1_Pa0_Pd0_Pe0_pUb0 by PP2A_1";

function function_253(PP2A, cytoplasm, kdephos, nucleus, nucleus_Foxo1_Pa0_Pd0_Pe1_pUb0)
  nucleus_Foxo1_Pa0_Pd0_Pe1_pUb0*nucleus*PP2A*cytoplasm*kdephos/nucleus;
end
function_253 is "Function for conversion of nucleus_Foxo1_Pa0_Pd0_Pe1_pUb0 to nucleus_Foxo1_Pa0_Pd0_Pe0_pUb0 by PP2A_1";

function function_254(PP2A, cytoplasm, dnabound, dnabound_Foxo1_Pa0_Pd0_Pe1_pUb0, kdephos)
  dnabound_Foxo1_Pa0_Pd0_Pe1_pUb0*dnabound*PP2A*cytoplasm*kdephos/dnabound;
end
function_254 is "Function for conversion of dnabound_Foxo1_Pa0_Pd0_Pe1_pUb0 to dnabound_Foxo1_Pa0_Pd0_Pe0_pUb0 by PP2A_1";

function function_255(PP2A, cytoplasm, cytoplasm_Foxo1_Pa0_Pd0_Pe1_pUb1, kdephos)
  cytoplasm_Foxo1_Pa0_Pd0_Pe1_pUb1*cytoplasm*PP2A*cytoplasm*kdephos/cytoplasm;
end
function_255 is "Function for conversion of cytoplasm_Foxo1_Pa0_Pd0_Pe1_pUb1 to cytoplasm_Foxo1_Pa0_Pd0_Pe0_pUb1 by PP2A_1";

function function_256(PP2A, cytoplasm, kdephos, nucleus, nucleus_Foxo1_Pa0_Pd0_Pe1_pUb1)
  nucleus_Foxo1_Pa0_Pd0_Pe1_pUb1*nucleus*PP2A*cytoplasm*kdephos/nucleus;
end
function_256 is "Function for conversion of nucleus_Foxo1_Pa0_Pd0_Pe1_pUb1 to nucleus_Foxo1_Pa0_Pd0_Pe0_pUb1 by PP2A_1";

function function_257(PP2A, cytoplasm, dnabound, dnabound_Foxo1_Pa0_Pd0_Pe1_pUb1, kdephos)
  dnabound_Foxo1_Pa0_Pd0_Pe1_pUb1*dnabound*PP2A*cytoplasm*kdephos/dnabound;
end
function_257 is "Function for conversion of dnabound_Foxo1_Pa0_Pd0_Pe1_pUb1 to dnabound_Foxo1_Pa0_Pd0_Pe0_pUb1 by PP2A_1";

function function_258(JNK_P, by_jnk_phos_factor, cytoplasm, cytoplasm_Foxo1_Pa0_Pd1_Pe0_pUb0, kkin)
  cytoplasm_Foxo1_Pa0_Pd1_Pe0_pUb0*cytoplasm*JNK_P*cytoplasm*by_jnk_phos_factor*kkin/cytoplasm;
end
function_258 is "Function for conversion of cytoplasm_Foxo1_Pa0_Pd1_Pe0_pUb0 to cytoplasm_Foxo1_Pa0_Pd1_Pe1_pUb0 by JNK_P_1";

function function_259(JNK_P, by_jnk_phos_factor, cytoplasm, kkin, nucleus, nucleus_Foxo1_Pa0_Pd1_Pe0_pUb0)
  nucleus_Foxo1_Pa0_Pd1_Pe0_pUb0*nucleus*JNK_P*cytoplasm*by_jnk_phos_factor*kkin/nucleus;
end
function_259 is "Function for conversion of nucleus_Foxo1_Pa0_Pd1_Pe0_pUb0 to nucleus_Foxo1_Pa0_Pd1_Pe1_pUb0 by JNK_P_1";

function function_260(JNK_P, by_jnk_phos_factor, cytoplasm, dnabound, dnabound_Foxo1_Pa0_Pd1_Pe0_pUb0, kkin)
  dnabound_Foxo1_Pa0_Pd1_Pe0_pUb0*dnabound*JNK_P*cytoplasm*by_jnk_phos_factor*kkin/dnabound;
end
function_260 is "Function for conversion of dnabound_Foxo1_Pa0_Pd1_Pe0_pUb0 to dnabound_Foxo1_Pa0_Pd1_Pe1_pUb0 by JNK_P_1";

function function_261(JNK_P, by_jnk_phos_factor, cytoplasm, cytoplasm_Foxo1_Pa0_Pd1_Pe0_pUb1, kkin)
  cytoplasm_Foxo1_Pa0_Pd1_Pe0_pUb1*cytoplasm*JNK_P*cytoplasm*by_jnk_phos_factor*kkin/cytoplasm;
end
function_261 is "Function for conversion of cytoplasm_Foxo1_Pa0_Pd1_Pe0_pUb1 to cytoplasm_Foxo1_Pa0_Pd1_Pe1_pUb1 by JNK_P_1";

function function_262(JNK_P, by_jnk_phos_factor, cytoplasm, kkin, nucleus, nucleus_Foxo1_Pa0_Pd1_Pe0_pUb1)
  nucleus_Foxo1_Pa0_Pd1_Pe0_pUb1*nucleus*JNK_P*cytoplasm*by_jnk_phos_factor*kkin/nucleus;
end
function_262 is "Function for conversion of nucleus_Foxo1_Pa0_Pd1_Pe0_pUb1 to nucleus_Foxo1_Pa0_Pd1_Pe1_pUb1 by JNK_P_1";

function function_263(JNK_P, by_jnk_phos_factor, cytoplasm, dnabound, dnabound_Foxo1_Pa0_Pd1_Pe0_pUb1, kkin)
  dnabound_Foxo1_Pa0_Pd1_Pe0_pUb1*dnabound*JNK_P*cytoplasm*by_jnk_phos_factor*kkin/dnabound;
end
function_263 is "Function for conversion of dnabound_Foxo1_Pa0_Pd1_Pe0_pUb1 to dnabound_Foxo1_Pa0_Pd1_Pe1_pUb1 by JNK_P_1";

function function_264(PP2A, cytoplasm, cytoplasm_Foxo1_Pa0_Pd1_Pe1_pUb0, kdephos)
  cytoplasm_Foxo1_Pa0_Pd1_Pe1_pUb0*cytoplasm*PP2A*cytoplasm*kdephos/cytoplasm;
end
function_264 is "Function for conversion of cytoplasm_Foxo1_Pa0_Pd1_Pe1_pUb0 to cytoplasm_Foxo1_Pa0_Pd1_Pe0_pUb0 by PP2A_1";

function function_265(PP2A, cytoplasm, kdephos, nucleus, nucleus_Foxo1_Pa0_Pd1_Pe1_pUb0)
  nucleus_Foxo1_Pa0_Pd1_Pe1_pUb0*nucleus*PP2A*cytoplasm*kdephos/nucleus;
end
function_265 is "Function for conversion of nucleus_Foxo1_Pa0_Pd1_Pe1_pUb0 to nucleus_Foxo1_Pa0_Pd1_Pe0_pUb0 by PP2A_1";

function function_266(PP2A, cytoplasm, dnabound, dnabound_Foxo1_Pa0_Pd1_Pe1_pUb0, kdephos)
  dnabound_Foxo1_Pa0_Pd1_Pe1_pUb0*dnabound*PP2A*cytoplasm*kdephos/dnabound;
end
function_266 is "Function for conversion of dnabound_Foxo1_Pa0_Pd1_Pe1_pUb0 to dnabound_Foxo1_Pa0_Pd1_Pe0_pUb0 by PP2A_1";

function function_267(PP2A, cytoplasm, cytoplasm_Foxo1_Pa0_Pd1_Pe1_pUb1, kdephos)
  cytoplasm_Foxo1_Pa0_Pd1_Pe1_pUb1*cytoplasm*PP2A*cytoplasm*kdephos/cytoplasm;
end
function_267 is "Function for conversion of cytoplasm_Foxo1_Pa0_Pd1_Pe1_pUb1 to cytoplasm_Foxo1_Pa0_Pd1_Pe0_pUb1 by PP2A_1";

function function_268(PP2A, cytoplasm, kdephos, nucleus, nucleus_Foxo1_Pa0_Pd1_Pe1_pUb1)
  nucleus_Foxo1_Pa0_Pd1_Pe1_pUb1*nucleus*PP2A*cytoplasm*kdephos/nucleus;
end
function_268 is "Function for conversion of nucleus_Foxo1_Pa0_Pd1_Pe1_pUb1 to nucleus_Foxo1_Pa0_Pd1_Pe0_pUb1 by PP2A_1";

function function_269(PP2A, cytoplasm, dnabound, dnabound_Foxo1_Pa0_Pd1_Pe1_pUb1, kdephos)
  dnabound_Foxo1_Pa0_Pd1_Pe1_pUb1*dnabound*PP2A*cytoplasm*kdephos/dnabound;
end
function_269 is "Function for conversion of dnabound_Foxo1_Pa0_Pd1_Pe1_pUb1 to dnabound_Foxo1_Pa0_Pd1_Pe0_pUb1 by PP2A_1";

function function_270(JNK_P, by_jnk_phos_factor, cytoplasm, cytoplasm_Foxo1_Pa1_Pd0_Pe0_pUb0, kkin)
  cytoplasm_Foxo1_Pa1_Pd0_Pe0_pUb0*cytoplasm*JNK_P*cytoplasm*by_jnk_phos_factor*kkin/cytoplasm;
end
function_270 is "Function for conversion of cytoplasm_Foxo1_Pa1_Pd0_Pe0_pUb0 to cytoplasm_Foxo1_Pa1_Pd0_Pe1_pUb0 by JNK_P_1";

function function_271(JNK_P, by_jnk_phos_factor, cytoplasm, kkin, nucleus, nucleus_Foxo1_Pa1_Pd0_Pe0_pUb0)
  nucleus_Foxo1_Pa1_Pd0_Pe0_pUb0*nucleus*JNK_P*cytoplasm*by_jnk_phos_factor*kkin/nucleus;
end
function_271 is "Function for conversion of nucleus_Foxo1_Pa1_Pd0_Pe0_pUb0 to nucleus_Foxo1_Pa1_Pd0_Pe1_pUb0 by JNK_P_1";

function function_272(JNK_P, by_jnk_phos_factor, cytoplasm, dnabound, dnabound_Foxo1_Pa1_Pd0_Pe0_pUb0, kkin)
  dnabound_Foxo1_Pa1_Pd0_Pe0_pUb0*dnabound*JNK_P*cytoplasm*by_jnk_phos_factor*kkin/dnabound;
end
function_272 is "Function for conversion of dnabound_Foxo1_Pa1_Pd0_Pe0_pUb0 to dnabound_Foxo1_Pa1_Pd0_Pe1_pUb0 by JNK_P_1";

function function_273(JNK_P, by_jnk_phos_factor, cytoplasm, cytoplasm_Foxo1_Pa1_Pd0_Pe0_pUb1, kkin)
  cytoplasm_Foxo1_Pa1_Pd0_Pe0_pUb1*cytoplasm*JNK_P*cytoplasm*by_jnk_phos_factor*kkin/cytoplasm;
end
function_273 is "Function for conversion of cytoplasm_Foxo1_Pa1_Pd0_Pe0_pUb1 to cytoplasm_Foxo1_Pa1_Pd0_Pe1_pUb1 by JNK_P_1";

function function_274(JNK_P, by_jnk_phos_factor, cytoplasm, kkin, nucleus, nucleus_Foxo1_Pa1_Pd0_Pe0_pUb1)
  nucleus_Foxo1_Pa1_Pd0_Pe0_pUb1*nucleus*JNK_P*cytoplasm*by_jnk_phos_factor*kkin/nucleus;
end
function_274 is "Function for conversion of nucleus_Foxo1_Pa1_Pd0_Pe0_pUb1 to nucleus_Foxo1_Pa1_Pd0_Pe1_pUb1 by JNK_P_1";

function function_275(JNK_P, by_jnk_phos_factor, cytoplasm, dnabound, dnabound_Foxo1_Pa1_Pd0_Pe0_pUb1, kkin)
  dnabound_Foxo1_Pa1_Pd0_Pe0_pUb1*dnabound*JNK_P*cytoplasm*by_jnk_phos_factor*kkin/dnabound;
end
function_275 is "Function for conversion of dnabound_Foxo1_Pa1_Pd0_Pe0_pUb1 to dnabound_Foxo1_Pa1_Pd0_Pe1_pUb1 by JNK_P_1";

function function_276(PP2A, cytoplasm, cytoplasm_Foxo1_Pa1_Pd0_Pe1_pUb0, kdephos)
  cytoplasm_Foxo1_Pa1_Pd0_Pe1_pUb0*cytoplasm*PP2A*cytoplasm*kdephos/cytoplasm;
end
function_276 is "Function for conversion of cytoplasm_Foxo1_Pa1_Pd0_Pe1_pUb0 to cytoplasm_Foxo1_Pa1_Pd0_Pe0_pUb0 by PP2A_1";

function function_277(PP2A, cytoplasm, kdephos, nucleus, nucleus_Foxo1_Pa1_Pd0_Pe1_pUb0)
  nucleus_Foxo1_Pa1_Pd0_Pe1_pUb0*nucleus*PP2A*cytoplasm*kdephos/nucleus;
end
function_277 is "Function for conversion of nucleus_Foxo1_Pa1_Pd0_Pe1_pUb0 to nucleus_Foxo1_Pa1_Pd0_Pe0_pUb0 by PP2A_1";

function function_278(PP2A, cytoplasm, dnabound, dnabound_Foxo1_Pa1_Pd0_Pe1_pUb0, kdephos)
  dnabound_Foxo1_Pa1_Pd0_Pe1_pUb0*dnabound*PP2A*cytoplasm*kdephos/dnabound;
end
function_278 is "Function for conversion of dnabound_Foxo1_Pa1_Pd0_Pe1_pUb0 to dnabound_Foxo1_Pa1_Pd0_Pe0_pUb0 by PP2A_1";

function function_279(PP2A, cytoplasm, cytoplasm_Foxo1_Pa1_Pd0_Pe1_pUb1, kdephos)
  cytoplasm_Foxo1_Pa1_Pd0_Pe1_pUb1*cytoplasm*PP2A*cytoplasm*kdephos/cytoplasm;
end
function_279 is "Function for conversion of cytoplasm_Foxo1_Pa1_Pd0_Pe1_pUb1 to cytoplasm_Foxo1_Pa1_Pd0_Pe0_pUb1 by PP2A_1";

function function_280(PP2A, cytoplasm, kdephos, nucleus, nucleus_Foxo1_Pa1_Pd0_Pe1_pUb1)
  nucleus_Foxo1_Pa1_Pd0_Pe1_pUb1*nucleus*PP2A*cytoplasm*kdephos/nucleus;
end
function_280 is "Function for conversion of nucleus_Foxo1_Pa1_Pd0_Pe1_pUb1 to nucleus_Foxo1_Pa1_Pd0_Pe0_pUb1 by PP2A_1";

function function_281(PP2A, cytoplasm, dnabound, dnabound_Foxo1_Pa1_Pd0_Pe1_pUb1, kdephos)
  dnabound_Foxo1_Pa1_Pd0_Pe1_pUb1*dnabound*PP2A*cytoplasm*kdephos/dnabound;
end
function_281 is "Function for conversion of dnabound_Foxo1_Pa1_Pd0_Pe1_pUb1 to dnabound_Foxo1_Pa1_Pd0_Pe0_pUb1 by PP2A_1";

function function_282(JNK_P, by_jnk_phos_factor, cytoplasm, cytoplasm_Foxo1_Pa1_Pd1_Pe0_pUb0, kkin)
  cytoplasm_Foxo1_Pa1_Pd1_Pe0_pUb0*cytoplasm*JNK_P*cytoplasm*by_jnk_phos_factor*kkin/cytoplasm;
end
function_282 is "Function for conversion of cytoplasm_Foxo1_Pa1_Pd1_Pe0_pUb0 to cytoplasm_Foxo1_Pa1_Pd1_Pe1_pUb0 by JNK_P_1";

function function_283(JNK_P, by_jnk_phos_factor, cytoplasm, kkin, nucleus, nucleus_Foxo1_Pa1_Pd1_Pe0_pUb0)
  nucleus_Foxo1_Pa1_Pd1_Pe0_pUb0*nucleus*JNK_P*cytoplasm*by_jnk_phos_factor*kkin/nucleus;
end
function_283 is "Function for conversion of nucleus_Foxo1_Pa1_Pd1_Pe0_pUb0 to nucleus_Foxo1_Pa1_Pd1_Pe1_pUb0 by JNK_P_1";

function function_284(JNK_P, by_jnk_phos_factor, cytoplasm, dnabound, dnabound_Foxo1_Pa1_Pd1_Pe0_pUb0, kkin)
  dnabound_Foxo1_Pa1_Pd1_Pe0_pUb0*dnabound*JNK_P*cytoplasm*by_jnk_phos_factor*kkin/dnabound;
end
function_284 is "Function for conversion of dnabound_Foxo1_Pa1_Pd1_Pe0_pUb0 to dnabound_Foxo1_Pa1_Pd1_Pe1_pUb0 by JNK_P_1";

function function_285(JNK_P, by_jnk_phos_factor, cytoplasm, cytoplasm_Foxo1_Pa1_Pd1_Pe0_pUb1, kkin)
  cytoplasm_Foxo1_Pa1_Pd1_Pe0_pUb1*cytoplasm*JNK_P*cytoplasm*by_jnk_phos_factor*kkin/cytoplasm;
end
function_285 is "Function for conversion of cytoplasm_Foxo1_Pa1_Pd1_Pe0_pUb1 to cytoplasm_Foxo1_Pa1_Pd1_Pe1_pUb1 by JNK_P_1";

function function_286(JNK_P, by_jnk_phos_factor, cytoplasm, kkin, nucleus, nucleus_Foxo1_Pa1_Pd1_Pe0_pUb1)
  nucleus_Foxo1_Pa1_Pd1_Pe0_pUb1*nucleus*JNK_P*cytoplasm*by_jnk_phos_factor*kkin/nucleus;
end
function_286 is "Function for conversion of nucleus_Foxo1_Pa1_Pd1_Pe0_pUb1 to nucleus_Foxo1_Pa1_Pd1_Pe1_pUb1 by JNK_P_1";

function function_287(JNK_P, by_jnk_phos_factor, cytoplasm, dnabound, dnabound_Foxo1_Pa1_Pd1_Pe0_pUb1, kkin)
  dnabound_Foxo1_Pa1_Pd1_Pe0_pUb1*dnabound*JNK_P*cytoplasm*by_jnk_phos_factor*kkin/dnabound;
end
function_287 is "Function for conversion of dnabound_Foxo1_Pa1_Pd1_Pe0_pUb1 to dnabound_Foxo1_Pa1_Pd1_Pe1_pUb1 by JNK_P_1";

function function_288(PP2A, cytoplasm, cytoplasm_Foxo1_Pa1_Pd1_Pe1_pUb0, kdephos)
  cytoplasm_Foxo1_Pa1_Pd1_Pe1_pUb0*cytoplasm*PP2A*cytoplasm*kdephos/cytoplasm;
end
function_288 is "Function for conversion of cytoplasm_Foxo1_Pa1_Pd1_Pe1_pUb0 to cytoplasm_Foxo1_Pa1_Pd1_Pe0_pUb0 by PP2A_1";

function function_289(PP2A, cytoplasm, kdephos, nucleus, nucleus_Foxo1_Pa1_Pd1_Pe1_pUb0)
  nucleus_Foxo1_Pa1_Pd1_Pe1_pUb0*nucleus*PP2A*cytoplasm*kdephos/nucleus;
end
function_289 is "Function for conversion of nucleus_Foxo1_Pa1_Pd1_Pe1_pUb0 to nucleus_Foxo1_Pa1_Pd1_Pe0_pUb0 by PP2A_1";

function function_290(PP2A, cytoplasm, dnabound, dnabound_Foxo1_Pa1_Pd1_Pe1_pUb0, kdephos)
  dnabound_Foxo1_Pa1_Pd1_Pe1_pUb0*dnabound*PP2A*cytoplasm*kdephos/dnabound;
end
function_290 is "Function for conversion of dnabound_Foxo1_Pa1_Pd1_Pe1_pUb0 to dnabound_Foxo1_Pa1_Pd1_Pe0_pUb0 by PP2A_1";

function function_291(PP2A, cytoplasm, cytoplasm_Foxo1_Pa1_Pd1_Pe1_pUb1, kdephos)
  cytoplasm_Foxo1_Pa1_Pd1_Pe1_pUb1*cytoplasm*PP2A*cytoplasm*kdephos/cytoplasm;
end
function_291 is "Function for conversion of cytoplasm_Foxo1_Pa1_Pd1_Pe1_pUb1 to cytoplasm_Foxo1_Pa1_Pd1_Pe0_pUb1 by PP2A_1";

function function_292(PP2A, cytoplasm, kdephos, nucleus, nucleus_Foxo1_Pa1_Pd1_Pe1_pUb1)
  nucleus_Foxo1_Pa1_Pd1_Pe1_pUb1*nucleus*PP2A*cytoplasm*kdephos/nucleus;
end
function_292 is "Function for conversion of nucleus_Foxo1_Pa1_Pd1_Pe1_pUb1 to nucleus_Foxo1_Pa1_Pd1_Pe0_pUb1 by PP2A_1";

function function_293(PP2A, cytoplasm, dnabound, dnabound_Foxo1_Pa1_Pd1_Pe1_pUb1, kdephos)
  dnabound_Foxo1_Pa1_Pd1_Pe1_pUb1*dnabound*PP2A*cytoplasm*kdephos/dnabound;
end
function_293 is "Function for conversion of dnabound_Foxo1_Pa1_Pd1_Pe1_pUb1 to dnabound_Foxo1_Pa1_Pd1_Pe0_pUb1 by PP2A_1";

function function_294(SCF, cytoplasm, cytoplasm_Foxo1_Pa0_Pd0_Pe0_pUb0, kub)
  cytoplasm_Foxo1_Pa0_Pd0_Pe0_pUb0*cytoplasm*SCF*cytoplasm*kub/cytoplasm;
end
function_294 is "Function for conversion of cytoplasm_Foxo1_Pa0_Pd0_Pe0_pUb0 to cytoplasm_Foxo1_Pa0_Pd0_Pe0_pUb1 by SCF_1";

function function_295(SCF, cytoplasm, kub, nucleus, nucleus_Foxo1_Pa0_Pd0_Pe0_pUb0)
  nucleus_Foxo1_Pa0_Pd0_Pe0_pUb0*nucleus*SCF*cytoplasm*kub/nucleus;
end
function_295 is "Function for conversion of nucleus_Foxo1_Pa0_Pd0_Pe0_pUb0 to nucleus_Foxo1_Pa0_Pd0_Pe0_pUb1 by SCF_1";

function function_296(SCF, cytoplasm, dnabound, dnabound_Foxo1_Pa0_Pd0_Pe0_pUb0, kub)
  dnabound_Foxo1_Pa0_Pd0_Pe0_pUb0*dnabound*SCF*cytoplasm*kub/dnabound;
end
function_296 is "Function for conversion of dnabound_Foxo1_Pa0_Pd0_Pe0_pUb0 to dnabound_Foxo1_Pa0_Pd0_Pe0_pUb1 by SCF_1";

function function_297(SCF, cytoplasm, cytoplasm_Foxo1_Pa0_Pd0_Pe1_pUb0, kub)
  cytoplasm_Foxo1_Pa0_Pd0_Pe1_pUb0*cytoplasm*SCF*cytoplasm*kub/cytoplasm;
end
function_297 is "Function for conversion of cytoplasm_Foxo1_Pa0_Pd0_Pe1_pUb0 to cytoplasm_Foxo1_Pa0_Pd0_Pe1_pUb1 by SCF_1";

function function_298(SCF, cytoplasm, kub, nucleus, nucleus_Foxo1_Pa0_Pd0_Pe1_pUb0)
  nucleus_Foxo1_Pa0_Pd0_Pe1_pUb0*nucleus*SCF*cytoplasm*kub/nucleus;
end
function_298 is "Function for conversion of nucleus_Foxo1_Pa0_Pd0_Pe1_pUb0 to nucleus_Foxo1_Pa0_Pd0_Pe1_pUb1 by SCF_1";

function function_299(SCF, cytoplasm, dnabound, dnabound_Foxo1_Pa0_Pd0_Pe1_pUb0, kub)
  dnabound_Foxo1_Pa0_Pd0_Pe1_pUb0*dnabound*SCF*cytoplasm*kub/dnabound;
end
function_299 is "Function for conversion of dnabound_Foxo1_Pa0_Pd0_Pe1_pUb0 to dnabound_Foxo1_Pa0_Pd0_Pe1_pUb1 by SCF_1";

function function_300(SCF, cytoplasm, cytoplasm_Foxo1_Pa0_Pd1_Pe0_pUb0, kub)
  cytoplasm_Foxo1_Pa0_Pd1_Pe0_pUb0*cytoplasm*SCF*cytoplasm*kub/cytoplasm;
end
function_300 is "Function for conversion of cytoplasm_Foxo1_Pa0_Pd1_Pe0_pUb0 to cytoplasm_Foxo1_Pa0_Pd1_Pe0_pUb1 by SCF_1";

function function_301(SCF, cytoplasm, kub, nucleus, nucleus_Foxo1_Pa0_Pd1_Pe0_pUb0)
  nucleus_Foxo1_Pa0_Pd1_Pe0_pUb0*nucleus*SCF*cytoplasm*kub/nucleus;
end
function_301 is "Function for conversion of nucleus_Foxo1_Pa0_Pd1_Pe0_pUb0 to nucleus_Foxo1_Pa0_Pd1_Pe0_pUb1 by SCF_1";

function function_302(SCF, cytoplasm, dnabound, dnabound_Foxo1_Pa0_Pd1_Pe0_pUb0, kub)
  dnabound_Foxo1_Pa0_Pd1_Pe0_pUb0*dnabound*SCF*cytoplasm*kub/dnabound;
end
function_302 is "Function for conversion of dnabound_Foxo1_Pa0_Pd1_Pe0_pUb0 to dnabound_Foxo1_Pa0_Pd1_Pe0_pUb1 by SCF_1";

function function_303(SCF, cytoplasm, cytoplasm_Foxo1_Pa0_Pd1_Pe1_pUb0, kub)
  cytoplasm_Foxo1_Pa0_Pd1_Pe1_pUb0*cytoplasm*SCF*cytoplasm*kub/cytoplasm;
end
function_303 is "Function for conversion of cytoplasm_Foxo1_Pa0_Pd1_Pe1_pUb0 to cytoplasm_Foxo1_Pa0_Pd1_Pe1_pUb1 by SCF_1";

function function_304(SCF, cytoplasm, kub, nucleus, nucleus_Foxo1_Pa0_Pd1_Pe1_pUb0)
  nucleus_Foxo1_Pa0_Pd1_Pe1_pUb0*nucleus*SCF*cytoplasm*kub/nucleus;
end
function_304 is "Function for conversion of nucleus_Foxo1_Pa0_Pd1_Pe1_pUb0 to nucleus_Foxo1_Pa0_Pd1_Pe1_pUb1 by SCF_1";

function function_305(SCF, cytoplasm, dnabound, dnabound_Foxo1_Pa0_Pd1_Pe1_pUb0, kub)
  dnabound_Foxo1_Pa0_Pd1_Pe1_pUb0*dnabound*SCF*cytoplasm*kub/dnabound;
end
function_305 is "Function for conversion of dnabound_Foxo1_Pa0_Pd1_Pe1_pUb0 to dnabound_Foxo1_Pa0_Pd1_Pe1_pUb1 by SCF_1";

function function_306(SCF, cytoplasm, cytoplasm_Foxo1_Pa1_Pd0_Pe0_pUb0, kub)
  cytoplasm_Foxo1_Pa1_Pd0_Pe0_pUb0*cytoplasm*SCF*cytoplasm*kub/cytoplasm;
end
function_306 is "Function for conversion of cytoplasm_Foxo1_Pa1_Pd0_Pe0_pUb0 to cytoplasm_Foxo1_Pa1_Pd0_Pe0_pUb1 by SCF_1";

function function_307(SCF, cytoplasm, kub, nucleus, nucleus_Foxo1_Pa1_Pd0_Pe0_pUb0)
  nucleus_Foxo1_Pa1_Pd0_Pe0_pUb0*nucleus*SCF*cytoplasm*kub/nucleus;
end
function_307 is "Function for conversion of nucleus_Foxo1_Pa1_Pd0_Pe0_pUb0 to nucleus_Foxo1_Pa1_Pd0_Pe0_pUb1 by SCF_1";

function function_308(SCF, cytoplasm, dnabound, dnabound_Foxo1_Pa1_Pd0_Pe0_pUb0, kub)
  dnabound_Foxo1_Pa1_Pd0_Pe0_pUb0*dnabound*SCF*cytoplasm*kub/dnabound;
end
function_308 is "Function for conversion of dnabound_Foxo1_Pa1_Pd0_Pe0_pUb0 to dnabound_Foxo1_Pa1_Pd0_Pe0_pUb1 by SCF_1";

function function_309(SCF, cytoplasm, cytoplasm_Foxo1_Pa1_Pd0_Pe1_pUb0, kub)
  cytoplasm_Foxo1_Pa1_Pd0_Pe1_pUb0*cytoplasm*SCF*cytoplasm*kub/cytoplasm;
end
function_309 is "Function for conversion of cytoplasm_Foxo1_Pa1_Pd0_Pe1_pUb0 to cytoplasm_Foxo1_Pa1_Pd0_Pe1_pUb1 by SCF_1";

function function_310(SCF, cytoplasm, kub, nucleus, nucleus_Foxo1_Pa1_Pd0_Pe1_pUb0)
  nucleus_Foxo1_Pa1_Pd0_Pe1_pUb0*nucleus*SCF*cytoplasm*kub/nucleus;
end
function_310 is "Function for conversion of nucleus_Foxo1_Pa1_Pd0_Pe1_pUb0 to nucleus_Foxo1_Pa1_Pd0_Pe1_pUb1 by SCF_1";

function function_311(SCF, cytoplasm, dnabound, dnabound_Foxo1_Pa1_Pd0_Pe1_pUb0, kub)
  dnabound_Foxo1_Pa1_Pd0_Pe1_pUb0*dnabound*SCF*cytoplasm*kub/dnabound;
end
function_311 is "Function for conversion of dnabound_Foxo1_Pa1_Pd0_Pe1_pUb0 to dnabound_Foxo1_Pa1_Pd0_Pe1_pUb1 by SCF_1";

function function_312(SCF, cytoplasm, cytoplasm_Foxo1_Pa1_Pd1_Pe0_pUb0, kub)
  cytoplasm_Foxo1_Pa1_Pd1_Pe0_pUb0*cytoplasm*SCF*cytoplasm*kub/cytoplasm;
end
function_312 is "Function for conversion of cytoplasm_Foxo1_Pa1_Pd1_Pe0_pUb0 to cytoplasm_Foxo1_Pa1_Pd1_Pe0_pUb1 by SCF_1";

function function_313(SCF, cytoplasm, kub, nucleus, nucleus_Foxo1_Pa1_Pd1_Pe0_pUb0)
  nucleus_Foxo1_Pa1_Pd1_Pe0_pUb0*nucleus*SCF*cytoplasm*kub/nucleus;
end
function_313 is "Function for conversion of nucleus_Foxo1_Pa1_Pd1_Pe0_pUb0 to nucleus_Foxo1_Pa1_Pd1_Pe0_pUb1 by SCF_1";

function function_314(SCF, cytoplasm, dnabound, dnabound_Foxo1_Pa1_Pd1_Pe0_pUb0, kub)
  dnabound_Foxo1_Pa1_Pd1_Pe0_pUb0*dnabound*SCF*cytoplasm*kub/dnabound;
end
function_314 is "Function for conversion of dnabound_Foxo1_Pa1_Pd1_Pe0_pUb0 to dnabound_Foxo1_Pa1_Pd1_Pe0_pUb1 by SCF_1";

function function_315(SCF, cytoplasm, cytoplasm_Foxo1_Pa1_Pd1_Pe1_pUb0, kub)
  cytoplasm_Foxo1_Pa1_Pd1_Pe1_pUb0*cytoplasm*SCF*cytoplasm*kub/cytoplasm;
end
function_315 is "Function for conversion of cytoplasm_Foxo1_Pa1_Pd1_Pe1_pUb0 to cytoplasm_Foxo1_Pa1_Pd1_Pe1_pUb1 by SCF_1";

function function_316(SCF, cytoplasm, kub, nucleus, nucleus_Foxo1_Pa1_Pd1_Pe1_pUb0)
  nucleus_Foxo1_Pa1_Pd1_Pe1_pUb0*nucleus*SCF*cytoplasm*kub/nucleus;
end
function_316 is "Function for conversion of nucleus_Foxo1_Pa1_Pd1_Pe1_pUb0 to nucleus_Foxo1_Pa1_Pd1_Pe1_pUb1 by SCF_1";

function function_317(SCF, cytoplasm, dnabound, dnabound_Foxo1_Pa1_Pd1_Pe1_pUb0, kub)
  dnabound_Foxo1_Pa1_Pd1_Pe1_pUb0*dnabound*SCF*cytoplasm*kub/dnabound;
end
function_317 is "Function for conversion of dnabound_Foxo1_Pa1_Pd1_Pe1_pUb0 to dnabound_Foxo1_Pa1_Pd1_Pe1_pUb1 by SCF_1";

function function_318(Proteasome, cytoplasm, cytoplasm_Foxo1_Pa0_Pd0_Pe0_pUb1, kdeg)
  cytoplasm_Foxo1_Pa0_Pd0_Pe0_pUb1*cytoplasm*Proteasome*cytoplasm*kdeg/cytoplasm;
end
function_318 is "Function for degradation of cytoplasm_Foxo1_Pa0_Pd0_Pe0_pUb1_1";

function function_319(Proteasome, cytoplasm, cytoplasm_Foxo1_Pa0_Pd0_Pe1_pUb1, kdeg)
  cytoplasm_Foxo1_Pa0_Pd0_Pe1_pUb1*cytoplasm*Proteasome*cytoplasm*kdeg/cytoplasm;
end
function_319 is "Function for degradation of cytoplasm_Foxo1_Pa0_Pd0_Pe1_pUb1_1";

function function_320(Proteasome, cytoplasm, cytoplasm_Foxo1_Pa0_Pd1_Pe0_pUb1, kdeg)
  cytoplasm_Foxo1_Pa0_Pd1_Pe0_pUb1*cytoplasm*Proteasome*cytoplasm*kdeg/cytoplasm;
end
function_320 is "Function for degradation of cytoplasm_Foxo1_Pa0_Pd1_Pe0_pUb1_1";

function function_321(Proteasome, cytoplasm, cytoplasm_Foxo1_Pa0_Pd1_Pe1_pUb1, kdeg)
  cytoplasm_Foxo1_Pa0_Pd1_Pe1_pUb1*cytoplasm*Proteasome*cytoplasm*kdeg/cytoplasm;
end
function_321 is "Function for degradation of cytoplasm_Foxo1_Pa0_Pd1_Pe1_pUb1_1";

function function_322(Proteasome, cytoplasm, cytoplasm_Foxo1_Pa1_Pd0_Pe0_pUb1, kdeg)
  cytoplasm_Foxo1_Pa1_Pd0_Pe0_pUb1*cytoplasm*Proteasome*cytoplasm*kdeg/cytoplasm;
end
function_322 is "Function for degradation of cytoplasm_Foxo1_Pa1_Pd0_Pe0_pUb1_1";

function function_323(Proteasome, cytoplasm, cytoplasm_Foxo1_Pa1_Pd0_Pe1_pUb1, kdeg)
  cytoplasm_Foxo1_Pa1_Pd0_Pe1_pUb1*cytoplasm*Proteasome*cytoplasm*kdeg/cytoplasm;
end
function_323 is "Function for degradation of cytoplasm_Foxo1_Pa1_Pd0_Pe1_pUb1_1";

function function_324(Proteasome, cytoplasm, cytoplasm_Foxo1_Pa1_Pd1_Pe0_pUb1, kdeg)
  cytoplasm_Foxo1_Pa1_Pd1_Pe0_pUb1*cytoplasm*Proteasome*cytoplasm*kdeg/cytoplasm;
end
function_324 is "Function for degradation of cytoplasm_Foxo1_Pa1_Pd1_Pe0_pUb1_1";

function function_325(Proteasome, cytoplasm, cytoplasm_Foxo1_Pa1_Pd1_Pe1_pUb1, kdeg)
  cytoplasm_Foxo1_Pa1_Pd1_Pe1_pUb1*cytoplasm*Proteasome*cytoplasm*kdeg/cytoplasm;
end
function_325 is "Function for degradation of cytoplasm_Foxo1_Pa1_Pd1_Pe1_pUb1_1";

function function_326(dnabound, dnabound_Foxo1_Pa0_Pd0_Pe0_pUb0, ktranscr)
  dnabound_Foxo1_Pa0_Pd0_Pe0_pUb0*dnabound*ktranscr;
end
function_326 is "Function for transcription of InR by dnabound_Foxo1_Pa0_Pd0_Pe0_pUb0_1";

function function_327(dnabound, dnabound_Foxo1_Pa0_Pd0_Pe0_pUb0, ktranscr)
  dnabound_Foxo1_Pa0_Pd0_Pe0_pUb0*dnabound*ktranscr;
end
function_327 is "Function for transcription of SOD2 by dnabound_Foxo1_Pa0_Pd0_Pe0_pUb0_1";

function function_328(dnabound, dnabound_Foxo1_Pa0_Pd0_Pe0_pUb1, ktranscr)
  dnabound_Foxo1_Pa0_Pd0_Pe0_pUb1*dnabound*ktranscr;
end
function_328 is "Function for transcription of InR by dnabound_Foxo1_Pa0_Pd0_Pe0_pUb1_1";

function function_329(dnabound, dnabound_Foxo1_Pa0_Pd0_Pe0_pUb1, ktranscr)
  dnabound_Foxo1_Pa0_Pd0_Pe0_pUb1*dnabound*ktranscr;
end
function_329 is "Function for transcription of SOD2 by dnabound_Foxo1_Pa0_Pd0_Pe0_pUb1_1";

function function_330(dnabound, dnabound_Foxo1_Pa0_Pd0_Pe1_pUb0, ktranscr)
  dnabound_Foxo1_Pa0_Pd0_Pe1_pUb0*dnabound*ktranscr;
end
function_330 is "Function for transcription of InR by dnabound_Foxo1_Pa0_Pd0_Pe1_pUb0_1";

function function_331(dnabound, dnabound_Foxo1_Pa0_Pd0_Pe1_pUb0, ktranscr)
  dnabound_Foxo1_Pa0_Pd0_Pe1_pUb0*dnabound*ktranscr;
end
function_331 is "Function for transcription of SOD2 by dnabound_Foxo1_Pa0_Pd0_Pe1_pUb0_1";

function function_332(dnabound, dnabound_Foxo1_Pa0_Pd0_Pe1_pUb1, ktranscr)
  dnabound_Foxo1_Pa0_Pd0_Pe1_pUb1*dnabound*ktranscr;
end
function_332 is "Function for transcription of InR by dnabound_Foxo1_Pa0_Pd0_Pe1_pUb1_1";

function function_333(dnabound, dnabound_Foxo1_Pa0_Pd0_Pe1_pUb1, ktranscr)
  dnabound_Foxo1_Pa0_Pd0_Pe1_pUb1*dnabound*ktranscr;
end
function_333 is "Function for transcription of SOD2 by dnabound_Foxo1_Pa0_Pd0_Pe1_pUb1_1";

function function_334(dnabound, dnabound_Foxo1_Pa0_Pd1_Pe0_pUb0, ktranscr)
  dnabound_Foxo1_Pa0_Pd1_Pe0_pUb0*dnabound*ktranscr;
end
function_334 is "Function for transcription of InR by dnabound_Foxo1_Pa0_Pd1_Pe0_pUb0_1";

function function_335(dnabound, dnabound_Foxo1_Pa0_Pd1_Pe0_pUb0, ktranscr)
  dnabound_Foxo1_Pa0_Pd1_Pe0_pUb0*dnabound*ktranscr;
end
function_335 is "Function for transcription of SOD2 by dnabound_Foxo1_Pa0_Pd1_Pe0_pUb0_1";

function function_336(dnabound, dnabound_Foxo1_Pa0_Pd1_Pe0_pUb1, ktranscr)
  dnabound_Foxo1_Pa0_Pd1_Pe0_pUb1*dnabound*ktranscr;
end
function_336 is "Function for transcription of InR by dnabound_Foxo1_Pa0_Pd1_Pe0_pUb1_1";

function function_337(dnabound, dnabound_Foxo1_Pa0_Pd1_Pe0_pUb1, ktranscr)
  dnabound_Foxo1_Pa0_Pd1_Pe0_pUb1*dnabound*ktranscr;
end
function_337 is "Function for transcription of SOD2 by dnabound_Foxo1_Pa0_Pd1_Pe0_pUb1_1";

function function_338(dnabound, dnabound_Foxo1_Pa0_Pd1_Pe1_pUb0, ktranscr)
  dnabound_Foxo1_Pa0_Pd1_Pe1_pUb0*dnabound*ktranscr;
end
function_338 is "Function for transcription of InR by dnabound_Foxo1_Pa0_Pd1_Pe1_pUb0_1";

function function_339(dnabound, dnabound_Foxo1_Pa0_Pd1_Pe1_pUb0, ktranscr)
  dnabound_Foxo1_Pa0_Pd1_Pe1_pUb0*dnabound*ktranscr;
end
function_339 is "Function for transcription of SOD2 by dnabound_Foxo1_Pa0_Pd1_Pe1_pUb0_1";

function function_340(dnabound, dnabound_Foxo1_Pa0_Pd1_Pe1_pUb1, ktranscr)
  dnabound_Foxo1_Pa0_Pd1_Pe1_pUb1*dnabound*ktranscr;
end
function_340 is "Function for transcription of InR by dnabound_Foxo1_Pa0_Pd1_Pe1_pUb1_1";

function function_341(dnabound, dnabound_Foxo1_Pa0_Pd1_Pe1_pUb1, ktranscr)
  dnabound_Foxo1_Pa0_Pd1_Pe1_pUb1*dnabound*ktranscr;
end
function_341 is "Function for transcription of SOD2 by dnabound_Foxo1_Pa0_Pd1_Pe1_pUb1_1";

function function_342(dnabound, dnabound_Foxo1_Pa1_Pd0_Pe0_pUb0, ktranscr)
  dnabound_Foxo1_Pa1_Pd0_Pe0_pUb0*dnabound*ktranscr;
end
function_342 is "Function for transcription of InR by dnabound_Foxo1_Pa1_Pd0_Pe0_pUb0_1";

function function_343(dnabound, dnabound_Foxo1_Pa1_Pd0_Pe0_pUb0, ktranscr)
  dnabound_Foxo1_Pa1_Pd0_Pe0_pUb0*dnabound*ktranscr;
end
function_343 is "Function for transcription of SOD2 by dnabound_Foxo1_Pa1_Pd0_Pe0_pUb0_1";

function function_344(dnabound, dnabound_Foxo1_Pa1_Pd0_Pe0_pUb1, ktranscr)
  dnabound_Foxo1_Pa1_Pd0_Pe0_pUb1*dnabound*ktranscr;
end
function_344 is "Function for transcription of InR by dnabound_Foxo1_Pa1_Pd0_Pe0_pUb1_1";

function function_345(dnabound, dnabound_Foxo1_Pa1_Pd0_Pe0_pUb1, ktranscr)
  dnabound_Foxo1_Pa1_Pd0_Pe0_pUb1*dnabound*ktranscr;
end
function_345 is "Function for transcription of SOD2 by dnabound_Foxo1_Pa1_Pd0_Pe0_pUb1_1";

function function_346(dnabound, dnabound_Foxo1_Pa1_Pd0_Pe1_pUb0, ktranscr)
  dnabound_Foxo1_Pa1_Pd0_Pe1_pUb0*dnabound*ktranscr;
end
function_346 is "Function for transcription of InR by dnabound_Foxo1_Pa1_Pd0_Pe1_pUb0_1";

function function_347(dnabound, dnabound_Foxo1_Pa1_Pd0_Pe1_pUb0, ktranscr)
  dnabound_Foxo1_Pa1_Pd0_Pe1_pUb0*dnabound*ktranscr;
end
function_347 is "Function for transcription of SOD2 by dnabound_Foxo1_Pa1_Pd0_Pe1_pUb0_1";

function function_348(dnabound, dnabound_Foxo1_Pa1_Pd0_Pe1_pUb1, ktranscr)
  dnabound_Foxo1_Pa1_Pd0_Pe1_pUb1*dnabound*ktranscr;
end
function_348 is "Function for transcription of InR by dnabound_Foxo1_Pa1_Pd0_Pe1_pUb1_1";

function function_349(dnabound, dnabound_Foxo1_Pa1_Pd0_Pe1_pUb1, ktranscr)
  dnabound_Foxo1_Pa1_Pd0_Pe1_pUb1*dnabound*ktranscr;
end
function_349 is "Function for transcription of SOD2 by dnabound_Foxo1_Pa1_Pd0_Pe1_pUb1_1";

function function_350(dnabound, dnabound_Foxo1_Pa1_Pd1_Pe0_pUb0, ktranscr)
  dnabound_Foxo1_Pa1_Pd1_Pe0_pUb0*dnabound*ktranscr;
end
function_350 is "Function for transcription of InR by dnabound_Foxo1_Pa1_Pd1_Pe0_pUb0_1";

function function_351(dnabound, dnabound_Foxo1_Pa1_Pd1_Pe0_pUb0, ktranscr)
  dnabound_Foxo1_Pa1_Pd1_Pe0_pUb0*dnabound*ktranscr;
end
function_351 is "Function for transcription of SOD2 by dnabound_Foxo1_Pa1_Pd1_Pe0_pUb0_1";

function function_352(dnabound, dnabound_Foxo1_Pa1_Pd1_Pe0_pUb1, ktranscr)
  dnabound_Foxo1_Pa1_Pd1_Pe0_pUb1*dnabound*ktranscr;
end
function_352 is "Function for transcription of InR by dnabound_Foxo1_Pa1_Pd1_Pe0_pUb1_1";

function function_353(dnabound, dnabound_Foxo1_Pa1_Pd1_Pe0_pUb1, ktranscr)
  dnabound_Foxo1_Pa1_Pd1_Pe0_pUb1*dnabound*ktranscr;
end
function_353 is "Function for transcription of SOD2 by dnabound_Foxo1_Pa1_Pd1_Pe0_pUb1_1";

function function_354(dnabound, dnabound_Foxo1_Pa1_Pd1_Pe1_pUb0, ktranscr)
  dnabound_Foxo1_Pa1_Pd1_Pe1_pUb0*dnabound*ktranscr;
end
function_354 is "Function for transcription of InR by dnabound_Foxo1_Pa1_Pd1_Pe1_pUb0_1";

function function_355(dnabound, dnabound_Foxo1_Pa1_Pd1_Pe1_pUb0, ktranscr)
  dnabound_Foxo1_Pa1_Pd1_Pe1_pUb0*dnabound*ktranscr;
end
function_355 is "Function for transcription of SOD2 by dnabound_Foxo1_Pa1_Pd1_Pe1_pUb0_1";

function function_356(dnabound, dnabound_Foxo1_Pa1_Pd1_Pe1_pUb1, ktranscr)
  dnabound_Foxo1_Pa1_Pd1_Pe1_pUb1*dnabound*ktranscr;
end
function_356 is "Function for transcription of InR by dnabound_Foxo1_Pa1_Pd1_Pe1_pUb1_1";

function function_357(dnabound, dnabound_Foxo1_Pa1_Pd1_Pe1_pUb1, ktranscr)
  dnabound_Foxo1_Pa1_Pd1_Pe1_pUb1*dnabound*ktranscr;
end
function_357 is "Function for transcription of SOD2 by dnabound_Foxo1_Pa1_Pd1_Pe1_pUb1_1";

function Function_for_R1f_1(InR, Ins, cellsurface, extracellular, k1)
  k1*Ins*extracellular*InR*cellsurface;
end

function Function_for_R1r_1(Ins_InR, cellsurface, kminus1)
  kminus1*Ins_InR*cellsurface;
end

function Function_for_R2_1(Ins_InR, cellsurface, k3)
  k3*Ins_InR*cellsurface/cellsurface;
end

function Function_for_R3f_1(Ins, Ins_InR_P, cellsurface, extracellular, k2)
  k2*Ins*extracellular*Ins_InR_P*cellsurface;
end

function Function_for_R3r_1(Ins_2_InR_P, cellsurface, kminus2)
  kminus2*Ins_2_InR_P*cellsurface;
end

function Function_for_R4_1(Ins_InR_P, PTP1B, cellsurface, cytoplasm, kminus3)
  kminus3*PTP1B*cytoplasm*Ins_InR_P*cellsurface/cellsurface;
end

function Function_for_R5f_1(InR, cellsurface, k4)
  k4*InR*cellsurface;
end

function Function_for_R5r_1(cytoplasm, cytoplasm_InR, kminus4)
  kminus4*cytoplasm_InR*cytoplasm;
end

function Function_for_R6f_1(Ins_2_InR_P, cellsurface, k4prime)
  k4prime*Ins_2_InR_P*cellsurface;
end

function Function_for_R6r_1(cytoplasm, cytoplasm_Ins_2_InR_P, kminus4prime)
  kminus4prime*cytoplasm_Ins_2_InR_P*cytoplasm;
end

function Function_for_R7f_1(Ins_InR_P, cellsurface, k4prime)
  k4prime*Ins_InR_P*cellsurface;
end

function Function_for_R7r_1(cytoplasm, cytoplasm_Ins_InR_P, kminus4prime)
  kminus4prime*cytoplasm_Ins_InR_P*cytoplasm;
end

function Function_for_R10_1(PTP1B, cytoplasm, cytoplasm_Ins_2_InR_P, k6)
  k6*PTP1B*cytoplasm*cytoplasm_Ins_2_InR_P*cytoplasm/cytoplasm;
end

function Function_for_R11_1(PTP1B, cytoplasm, cytoplasm_Ins_InR_P, k6)
  k6*PTP1B*cytoplasm*cytoplasm_Ins_InR_P*cytoplasm/cytoplasm;
end

function Function_for_R14f_1(IRS1_TyrP_PI3K, PIP2, cytoplasm, k9, k9_basal)
  (k9_basal + k9*IRS1_TyrP_PI3K*cytoplasm)*PIP2*cytoplasm/cytoplasm;
end

function Function_for_R14r_1(PI345P3, PTEN, cytoplasm, kminus9, kminus9_basal)
  (kminus9_basal + kminus9*PTEN*cytoplasm)*PI345P3*cytoplasm/cytoplasm;
end

function Function_for_R16f_1(Akt, PI345P3, cytoplasm, k11, pip3_basal)
  k11*Akt*cytoplasm*piecewise(PI345P3*cytoplasm - pip3_basal, PI345P3*cytoplasm > pip3_basal, 0)/cytoplasm;
end

function Function_for_R16r_1(Akt_P2, PP2A, cytoplasm, kminus11)
  kminus11*PP2A*cytoplasm*Akt_P2*cytoplasm/cytoplasm;
end

function Function_for_R16a_f_1(AS160, Akt_P2, cytoplasm, kr16a)
  kr16a*Akt_P2*cytoplasm*AS160*cytoplasm/cytoplasm;
end

function Function_for_R16a_r_1(AS160_P, PP2A, cytoplasm, kminusr16a)
  kminusr16a*PP2A*cytoplasm*AS160_P*cytoplasm/cytoplasm;
end

model MODEL1212210000()
  // Smith2013 - Regulation of Insulin Signalling by Oxidative Stress
  // The model describes insulin signalling (in rodent adipocytes), which includes in addition to the core pathway, the transcriptional feedback through the Forkhead box type O (FOXO) transcription factor and interaction with oxidative stress.
  // This model is described in the article:
  // Computational modelling of the regulation of Insulin signalling by oxidative stress.
  // Smith GR, Shanley DP.
  // BMC Syst Biol. 2013 May 24;7:41.
  // Abstract:
  // BACKGROUND: Existing models of insulin signalling focus on short term dynamics, rather than the longer term dynamics necessary to understand many physiologically relevant behaviours. We have developed a model of insulin signalling in rodent adipocytes that includes both transcriptional feedback through the Forkhead box type O (FOXO) transcription factor, and interaction with oxidative stress, in addition to the core pathway. In the model Reactive Oxygen Species are both generated endogenously and can be applied externally. They regulate signalling though inhibition of phosphatases and induction of the activity of Stress Activated Protein Kinases, which themselves modulate feedbacks to insulin signalling and FOXO.
  // RESULTS: Insulin and oxidative stress combined produce a lower degree of activation of insulin signalling than insulin alone. Fasting (nutrient withdrawal) and weak oxidative stress upregulate antioxidant defences while stronger oxidative stress leads to a short term activation of insulin signalling but if prolonged can have other effects including degradation of the insulin receptor substrate (IRS1) and FOXO. At high insulin the protective effect of moderate oxidative stress may disappear.
  // CONCLUSION: Our model is consistent with a wide range of experimental data, some of which is difficult to explain. Oxidative stress can have effects that are both up- and down-regulatory on insulin signalling. Our model therefore shows the complexity of the interaction between the two pathways and highlights the need for such integrated computational models to give insight into the dysregulation of insulin signalling along with more data at the individual level.A complete SBML model file can be downloaded from BIOMODELS (https://www.ebi.ac.uk/biomodels-main) with unique identifier MODEL1212210000.Other files and scripts are available as additional files with this journal article and can be downloaded from https://github.com/graham1034/Smith2012_insulin_signalling.
  // This model is hosted on BioModels Database and identified by: BIOMD0000000474 .
  // To cite BioModels Database, please use: BioModels Database: An enhanced, curated and annotated resource for published quantitative kinetic models .
  // To the extent possible under law, all copyright and related or neighbouring rights to this encoded model have been dedicated to the public domain worldwide. Please refer to CC0 Public Domain Dedication for more information.
  // biomodels.db:MODEL1212210000
  // biomodels.db:BIOMD0000000474
  // isDescribedBy pubmed:23705851
  // isDerivedFrom biomodels.db:BIOMD0000000137
  // occursIn BTO:0000443
  // hasTaxon taxonomy:10114
  // model units - substance: substance, time: time, volume: volume, area: area, length: metre, extent: substance

  // Compartments:
  compartment extracellular = 8.3e-12 volume;  // isVersionOf GO:0005576
  compartment cellsurface = 6.4e-14 volume;  // isVersionOf FMA:67653
  compartment cytoplasm = 1.65e-11 volume;  // isVersionOf GO:0005737
  compartment nucleus = 5e-13 volume;  // isVersionOf GO:0005634
  compartment dnabound = 1e-13 volume;
  // Species:
  species $NULL in cytoplasm = 0;
  species $Ins in extracellular = 0;  // isVersionOf uniprot:P01322
  species InR in cellsurface = 90000/cellsurface;  // isVersionOf uniprot:P15127
  species Ins_InR in cellsurface = 0;  // hasPart uniprot:P15127 uniprot:P01322
  species Ins_InR_P in cellsurface = 0;  // hasPart uniprot:P15127 uniprot:P01322
  species Ins_2_InR_P in cellsurface = 0;  // hasPart uniprot:P15127 uniprot:P01322
  species cytoplasm_InR in cytoplasm = 10000/cytoplasm;  // isVersionOf uniprot:P15127
  species cytoplasm_Ins_2_InR_P in cytoplasm = 0;  // hasProperty PATO:0002220; hasPart uniprot:P15127 uniprot:P01322
  species cytoplasm_Ins_InR_P in cytoplasm = 0;  // hasProperty PATO:0002220; hasPart uniprot:P15127 uniprot:P01322
  species $InR_tot in cytoplasm;  // isVersionOf uniprot:P15127
  species $InR_bound in cytoplasm;  // isVersionOf uniprot:P15127
  species $InR_active in cytoplasm;  // isVersionOf uniprot:P15127
  species PTP1B in cytoplasm = 100000/cytoplasm;  // isVersionOf uniprot:P20417
  species IRS1_TyrP_PI3K in cytoplasm = 0;  // hasProperty PATO:0002220; hasPart uniprot:O88763 uniprot:P35570
  species PI345P3 in cytoplasm = 1000/cytoplasm;  // isVersionOf CHEBI:60169
  species PIP2 in cytoplasm = 200000/cytoplasm;  // isVersionOf CHEBI:37328
  species $PI345P3_mol in cytoplasm;  // isVersionOf CHEBI:60169
  species $PIP2_mol in cytoplasm;  // isVersionOf CHEBI:37328
  species Akt in cytoplasm = 100000/cytoplasm;  // isVersionOf uniprot:P47196
  species Akt_P2 in cytoplasm = 0;  // hasProperty PATO:0002220; hasPart uniprot:P47196
  species PKC in cytoplasm = 100000/cytoplasm;  // ec-code:2.7.11.13
  species PKC_P in cytoplasm = 0;  // hasProperty PATO:0002220; ec-code:2.7.11.13
  species AS160 in cytoplasm = 20000/cytoplasm;  // isVersionOf uniprot:O60343
  species AS160_P in cytoplasm = 0;  // hasProperty PATO:0002220; isVersionOf uniprot:O60343
  species cytoplasm_GLUT4 in cytoplasm = 96000/cytoplasm;  // isVersionOf uniprot:P19357
  species cellsurface_GLUT4 in cellsurface = 4000/cellsurface;  // isVersionOf uniprot:P19357
  species PTEN in cytoplasm = 100000/cytoplasm;  // isVersionOf uniprot:O54857
  species PP2A in cytoplasm = 500000/cytoplasm;
  species $extracellular_ROS in extracellular = 0;  // occursIn GO:0005576; isVersionOf CHEBI:26523
  species PTP1B_ox in cytoplasm = 0;
  species $PTP1B_plus_PTP1B_ox in cytoplasm;
  species PTEN_ox in cytoplasm = 0;  // hasProperty PATO:0002223; isVersionOf uniprot:O54857
  species $PTEN_plus_PTEN_ox in cytoplasm;  // hasPart uniprot:O54857; hasProperty PATO:0002223
  species ROS in cytoplasm = 0;  // isVersionOf CHEBI:26523
  species GSH in cytoplasm = 100/cytoplasm;  // isVersionOf CHEBI:16856
  species GSSG in cytoplasm = 0;  // isVersionOf CHEBI:17858
  species cytoplasm_SOD2 in cytoplasm = 41700/cytoplasm;  // isVersionOf uniprot:P07895
  species NOX_inact in cytoplasm = 100/cytoplasm;  // hasProperty PATO:0002355; isVersionOf ec-code:1.6.3.1
  species NOX in cytoplasm = 0;  // isVersionOf ec-code:1.6.3.1
  species NOX_deact in cytoplasm = 0;  // isVersionOf ec-code:1.6.3.1
  species $NOX_total in cytoplasm;  // isVersionOf ec-code:1.6.3.1
  species $Mt in cytoplasm = 50/cytoplasm;  // isVersionOf uniprot:P42346
  species IRS1 in cytoplasm = 100000/cytoplasm;  // isVersionOf uniprot:P35570
  species IRS1_TyrP in cytoplasm = 0;  // hasProperty PATO:0002220; isVersionOf uniprot:P35570
  species IRS1_PolySerP in cytoplasm = 0;  // hasProperty PATO:0002220; isVersionOf uniprot:P35570
  species IRS1_TyrP_PolySerP in cytoplasm = 0;  // hasProperty PATO:0002220; hasPart uniprot:P35570
  species $IRS_total in cytoplasm;  // isVersionOf uniprot:P35570
  species PI3K in cytoplasm = 10000/cytoplasm;  // isVersionOf uniprot:O88763
  species JNK_P in cytoplasm = 0;  // isVersionOf uniprot:A9LRT4
  species IKK_P in cytoplasm = 0;  // hasProperty PATO:0002220; isVersionOf uniprot:Q9QY78
  species JNK in cytoplasm = 16000/cytoplasm;  // isVersionOf uniprot:A9LRT4
  species $JNK_plus_JNK_P in cytoplasm;  // hasPart uniprot:A9LRT4; hasProperty PATO:0002220
  species IKK in cytoplasm = 2000/cytoplasm;  // isVersionOf uniprot:Q9QY78
  species $IKK_plus_IKK_P in cytoplasm;  // hasProperty PATO:0002220; hasPart uniprot:Q9QY78
  species DUSP in cytoplasm = 100000/cytoplasm;  // isVersionOf uniprot:Q64623
  species DUSP_ox in cytoplasm = 0;  // hasProperty PATO:0002223; isVersionOf uniprot:Q64623
  species $DUSP_plus_DUSP_ox in cytoplasm;  // hasProperty PATO:0002223; hasPart uniprot:Q64623
  species $null in cytoplasm = 0;
  species degr_Foxo1 in cytoplasm = 0;
  species cytoplasm_Foxo1_Pa0_Pd0_Pe0_pUb0 in cytoplasm = 1000/cytoplasm;  // isVersionOf uniprot:G3V7R4
  species nucleus_Foxo1_Pa0_Pd0_Pe0_pUb0 in nucleus = 0;  // isVersionOf uniprot:G3V7R4
  species dnabound_Foxo1_Pa0_Pd0_Pe0_pUb0 in dnabound = 0;  // hasPart CHEBI:4705 uniprot:G3V7R4
  species cytoplasm_Foxo1_Pa0_Pd0_Pe0_pUb1 in cytoplasm = 0;  // isVersionOf uniprot:G3V7R4
  species nucleus_Foxo1_Pa0_Pd0_Pe0_pUb1 in nucleus = 0;  // isVersionOf uniprot:G3V7R4
  species dnabound_Foxo1_Pa0_Pd0_Pe0_pUb1 in dnabound = 0;  // hasPart CHEBI:4705 uniprot:G3V7R4
  species cytoplasm_Foxo1_Pa0_Pd0_Pe1_pUb0 in cytoplasm = 0;  // isVersionOf uniprot:G3V7R4
  species nucleus_Foxo1_Pa0_Pd0_Pe1_pUb0 in nucleus = 0;  // isVersionOf uniprot:G3V7R4
  species dnabound_Foxo1_Pa0_Pd0_Pe1_pUb0 in dnabound = 0;  // hasPart CHEBI:4705 uniprot:G3V7R4
  species cytoplasm_Foxo1_Pa0_Pd0_Pe1_pUb1 in cytoplasm = 0;  // isVersionOf uniprot:G3V7R4
  species nucleus_Foxo1_Pa0_Pd0_Pe1_pUb1 in nucleus = 0;  // isVersionOf uniprot:G3V7R4
  species dnabound_Foxo1_Pa0_Pd0_Pe1_pUb1 in dnabound = 0;  // hasPart CHEBI:4705 uniprot:G3V7R4
  species cytoplasm_Foxo1_Pa0_Pd1_Pe0_pUb0 in cytoplasm = 0;  // isVersionOf uniprot:G3V7R4
  species nucleus_Foxo1_Pa0_Pd1_Pe0_pUb0 in nucleus = 0;  // isVersionOf uniprot:G3V7R4
  species dnabound_Foxo1_Pa0_Pd1_Pe0_pUb0 in dnabound = 0;  // hasPart CHEBI:4705 uniprot:G3V7R4
  species cytoplasm_Foxo1_Pa0_Pd1_Pe0_pUb1 in cytoplasm = 0;  // isVersionOf uniprot:G3V7R4
  species nucleus_Foxo1_Pa0_Pd1_Pe0_pUb1 in nucleus = 0;  // isVersionOf uniprot:G3V7R4
  species dnabound_Foxo1_Pa0_Pd1_Pe0_pUb1 in dnabound = 0;  // hasPart CHEBI:4705 uniprot:G3V7R4
  species cytoplasm_Foxo1_Pa0_Pd1_Pe1_pUb0 in cytoplasm = 0;  // isVersionOf uniprot:G3V7R4
  species nucleus_Foxo1_Pa0_Pd1_Pe1_pUb0 in nucleus = 0;  // isVersionOf uniprot:G3V7R4
  species dnabound_Foxo1_Pa0_Pd1_Pe1_pUb0 in dnabound = 0;  // hasPart CHEBI:4705 uniprot:G3V7R4
  species cytoplasm_Foxo1_Pa0_Pd1_Pe1_pUb1 in cytoplasm = 0;  // isVersionOf uniprot:G3V7R4
  species nucleus_Foxo1_Pa0_Pd1_Pe1_pUb1 in nucleus = 0;  // isVersionOf uniprot:G3V7R4
  species dnabound_Foxo1_Pa0_Pd1_Pe1_pUb1 in dnabound = 0;  // hasPart CHEBI:4705 uniprot:G3V7R4
  species cytoplasm_Foxo1_Pa1_Pd0_Pe0_pUb0 in cytoplasm = 0;  // isVersionOf uniprot:G3V7R4
  species nucleus_Foxo1_Pa1_Pd0_Pe0_pUb0 in nucleus = 0;  // isVersionOf uniprot:G3V7R4
  species dnabound_Foxo1_Pa1_Pd0_Pe0_pUb0 in dnabound = 0;  // hasPart CHEBI:4705 uniprot:G3V7R4
  species cytoplasm_Foxo1_Pa1_Pd0_Pe0_pUb1 in cytoplasm = 0;  // isVersionOf uniprot:G3V7R4
  species nucleus_Foxo1_Pa1_Pd0_Pe0_pUb1 in nucleus = 0;  // isVersionOf uniprot:G3V7R4
  species dnabound_Foxo1_Pa1_Pd0_Pe0_pUb1 in dnabound = 0;  // hasPart CHEBI:4705 uniprot:G3V7R4
  species cytoplasm_Foxo1_Pa1_Pd0_Pe1_pUb0 in cytoplasm = 0;  // isVersionOf uniprot:G3V7R4
  species nucleus_Foxo1_Pa1_Pd0_Pe1_pUb0 in nucleus = 0;  // isVersionOf uniprot:G3V7R4
  species dnabound_Foxo1_Pa1_Pd0_Pe1_pUb0 in dnabound = 0;  // hasPart CHEBI:4705 uniprot:G3V7R4
  species cytoplasm_Foxo1_Pa1_Pd0_Pe1_pUb1 in cytoplasm = 0;  // isVersionOf uniprot:G3V7R4
  species nucleus_Foxo1_Pa1_Pd0_Pe1_pUb1 in nucleus = 0;  // isVersionOf uniprot:G3V7R4
  species dnabound_Foxo1_Pa1_Pd0_Pe1_pUb1 in dnabound = 0;  // hasPart CHEBI:4705 uniprot:G3V7R4
  species cytoplasm_Foxo1_Pa1_Pd1_Pe0_pUb0 in cytoplasm = 0;  // isVersionOf uniprot:G3V7R4
  species nucleus_Foxo1_Pa1_Pd1_Pe0_pUb0 in nucleus = 0;  // isVersionOf uniprot:G3V7R4
  species dnabound_Foxo1_Pa1_Pd1_Pe0_pUb0 in dnabound = 0;  // hasPart CHEBI:4705 uniprot:G3V7R4
  species cytoplasm_Foxo1_Pa1_Pd1_Pe0_pUb1 in cytoplasm = 0;  // isVersionOf uniprot:G3V7R4
  species nucleus_Foxo1_Pa1_Pd1_Pe0_pUb1 in nucleus = 0;  // isVersionOf uniprot:G3V7R4
  species dnabound_Foxo1_Pa1_Pd1_Pe0_pUb1 in dnabound = 0;  // hasPart CHEBI:4705 uniprot:G3V7R4
  species cytoplasm_Foxo1_Pa1_Pd1_Pe1_pUb0 in cytoplasm = 0;  // isVersionOf uniprot:G3V7R4
  species nucleus_Foxo1_Pa1_Pd1_Pe1_pUb0 in nucleus = 0;  // isVersionOf uniprot:G3V7R4
  species dnabound_Foxo1_Pa1_Pd1_Pe1_pUb0 in dnabound = 0;  // hasPart CHEBI:4705 uniprot:G3V7R4
  species cytoplasm_Foxo1_Pa1_Pd1_Pe1_pUb1 in cytoplasm = 0;  // isVersionOf uniprot:G3V7R4
  species nucleus_Foxo1_Pa1_Pd1_Pe1_pUb1 in nucleus = 0;  // isVersionOf uniprot:G3V7R4
  species dnabound_Foxo1_Pa1_Pd1_Pe1_pUb1 in dnabound = 0;  // hasPart CHEBI:4705 uniprot:G3V7R4
  species $Foxo1_Pa0_tot in extracellular;  // isVersionOf uniprot:G3V7R4
  species $Foxo1_Pa1_tot in extracellular;  // isVersionOf uniprot:G3V7R4
  species $Foxo1_Pd0_tot in extracellular;  // isVersionOf uniprot:G3V7R4
  species $Foxo1_Pd1_tot in extracellular;  // isVersionOf uniprot:G3V7R4
  species $Foxo1_Pe0_tot in extracellular;  // isVersionOf uniprot:G3V7R4
  species $Foxo1_Pe1_tot in extracellular;  // isVersionOf uniprot:G3V7R4
  species $Foxo1_pUb0_tot in extracellular;  // isVersionOf uniprot:G3V7R4
  species $Foxo1_pUb1_tot in extracellular;  // isVersionOf uniprot:G3V7R4
  species $cytoplasm_Foxo1_tot in extracellular;  // isVersionOf uniprot:G3V7R4; occursIn GO:0005737
  species $nucleus_Foxo1_tot in extracellular;  // isVersionOf uniprot:G3V7R4; occursIn GO:0005634
  species $dnabound_Foxo1_tot in extracellular;  // hasPart CHEBI:4705 uniprot:G3V7R4
  species $Foxo1_all in extracellular;  // isVersionOf uniprot:G3V7R4
  species nucleus_RNA_InR in nucleus = 0;  // hasPart CHEBI:33697 uniprot:P15127
  species cytoplasm_RNA_InR in cytoplasm = 0;  // hasPart CHEBI:33697 uniprot:P15127
  species nucleus_RNA_SOD2 in nucleus = 0;  // hasPart CHEBI:33697 uniprot:P07895
  species cytoplasm_RNA_SOD2 in cytoplasm = 0;  // hasPart CHEBI:33697 uniprot:P07895
  species E2F1 in cytoplasm = 300/cytoplasm;  // isVersionOf uniprot:O09139
  species SGK in cytoplasm = 0;  // isVersionOf uniprot:Q06226
  species CDK2 in cytoplasm = 0;  // isVersionOf uniprot:Q63699
  species AMPK in cytoplasm = 0;  // isVersionOf uniprot:Q09137
  species CBPP300 in cytoplasm = 10/cytoplasm;  // isVersionOf uniprot:Q99MA1
  species SIRT1 in cytoplasm = 1000/cytoplasm;  // isVersionOf uniprot:F1LTP2
  species E3 in cytoplasm = 0;  // isVersionOf uniprot:Q62671
  species USP7 in cytoplasm = 1000/cytoplasm;  // isVersionOf uniprot:Q4VSI4
  species SCF in cytoplasm = 1000/cytoplasm;  // isVersionOf uniprot:P21581
  species Proteasome in cytoplasm = 1000/cytoplasm;  // isVersionOf GO:0005839

  // Parameters:
  k1 = 2e-5;
  kminus1 = 12072;
  k2 = 1.2e-5;
  kminus2 = 90000;
  k3 = 2500;
  kminus3 = 2e-6;
  k4 = 0.033333334;
  kminus4 = 0.3;
  k4prime = 0.0021;
  kminus4prime = 0.00021;
  k6 = 4.61e-6;
  cellsurf_vol = 1;
  cyto_vol = 1;
  vextracellular = 8.3e-12;
  vcellsurface = 6.4e-14;
  vcytoplasm = 1.65e-11;
  navo = 6.02e23;
  k9_basal = 0.13145;
  k9 = 0.0055;
  kminus9_basal = 2.7;
  kminus9 = 0.0014;
  k11 = 2.5e-5;
  kminus11 = 1.1878e-6;
  k12 = 3.5e-5;
  kminus12 = 1.25e-6;
  kr16a = 0.000333;
  kminusr16a = 1e-6;
  k13_basal = 0.015;
  k13 = 7.5e-6;
  kminus13 = 0.167;
  k14 = 110.88;
  kminus14 = 0.001155;
  sc_pip = 1000;
  pip3_basal = 200;
  k30f = 0.08;
  k30r = 0.005;
  k31f = 0.00027;
  k31r = 0.002;
  k34f = 2e-5;
  k34r1 = 0.001;
  k34r2 = 0.25;
  k34r3 = 0.001;
  k35f = 450;
  k35r = 0.12;
  k36f = 180;
  ros_perm = 740000000;
  membrane_area = 6.5e-9;
  k38r = 2;
  k38f = 0.05;
  sc_ros = 1000;
  k7 = 5.8;
  kminus7a = 8.75e-5;
  kminus7b = 2.8e-6;
  k8 = 2.6e-6;
  kminus8 = 1.55;
  IRp = 90000;
  molec_per_fm = 602000000;
  k2psp = 0.00022;
  kcat82 = 3;
  Km82 = 100;
  k_irs1_basal_syn = 260;
  k_irs1_basal_degr = 0.001;
  k_irs1_polyserp_degr = 0.01;
  kcat51 = 0.87;
  kcat52 = 6.95;
  Km51 = 100;
  Km52 = 100;
  k42f = 5e-5;
  k42r = 5e-7;
  k43f = 5e-5;
  k43r = 5e-7;
  alpha_ox = 5;
  k32f = 0.0006;
  k32r = 0.0004;
  by_jnk_phos_factor = 2;
  by_ikk_phos_factor = 3;

  // Assignment rules:
  JNK_plus_JNK_P := (JNK*cytoplasm + JNK_P*cytoplasm)/cytoplasm;
  IKK_plus_IKK_P := (IKK*cytoplasm + IKK_P*cytoplasm)/cytoplasm;
  DUSP_plus_DUSP_ox := (DUSP*cytoplasm + DUSP_ox*cytoplasm)/cytoplasm;
  k_ros_perm := ros_perm*membrane_area;
  insconc := Ins*extracellular/(navo*vextracellular);
  Foxo1_Pa0_tot := (cytoplasm_Foxo1_Pa0_Pd0_Pe0_pUb0*cytoplasm + nucleus_Foxo1_Pa0_Pd0_Pe0_pUb0*nucleus + dnabound_Foxo1_Pa0_Pd0_Pe0_pUb0*dnabound + cytoplasm_Foxo1_Pa0_Pd0_Pe0_pUb1*cytoplasm + nucleus_Foxo1_Pa0_Pd0_Pe0_pUb1*nucleus + dnabound_Foxo1_Pa0_Pd0_Pe0_pUb1*dnabound + cytoplasm_Foxo1_Pa0_Pd0_Pe1_pUb0*cytoplasm + nucleus_Foxo1_Pa0_Pd0_Pe1_pUb0*nucleus + dnabound_Foxo1_Pa0_Pd0_Pe1_pUb0*dnabound + cytoplasm_Foxo1_Pa0_Pd0_Pe1_pUb1*cytoplasm + nucleus_Foxo1_Pa0_Pd0_Pe1_pUb1*nucleus + dnabound_Foxo1_Pa0_Pd0_Pe1_pUb1*dnabound + cytoplasm_Foxo1_Pa0_Pd1_Pe0_pUb0*cytoplasm + nucleus_Foxo1_Pa0_Pd1_Pe0_pUb0*nucleus + dnabound_Foxo1_Pa0_Pd1_Pe0_pUb0*dnabound + cytoplasm_Foxo1_Pa0_Pd1_Pe0_pUb1*cytoplasm + nucleus_Foxo1_Pa0_Pd1_Pe0_pUb1*nucleus + dnabound_Foxo1_Pa0_Pd1_Pe0_pUb1*dnabound + cytoplasm_Foxo1_Pa0_Pd1_Pe1_pUb0*cytoplasm + nucleus_Foxo1_Pa0_Pd1_Pe1_pUb0*nucleus + dnabound_Foxo1_Pa0_Pd1_Pe1_pUb0*dnabound + cytoplasm_Foxo1_Pa0_Pd1_Pe1_pUb1*cytoplasm + nucleus_Foxo1_Pa0_Pd1_Pe1_pUb1*nucleus + dnabound_Foxo1_Pa0_Pd1_Pe1_pUb1*dnabound)/extracellular;
  Foxo1_Pa1_tot := (cytoplasm_Foxo1_Pa1_Pd0_Pe0_pUb0*cytoplasm + nucleus_Foxo1_Pa1_Pd0_Pe0_pUb0*nucleus + dnabound_Foxo1_Pa1_Pd0_Pe0_pUb0*dnabound + cytoplasm_Foxo1_Pa1_Pd0_Pe0_pUb1*cytoplasm + nucleus_Foxo1_Pa1_Pd0_Pe0_pUb1*nucleus + dnabound_Foxo1_Pa1_Pd0_Pe0_pUb1*dnabound + cytoplasm_Foxo1_Pa1_Pd0_Pe1_pUb0*cytoplasm + nucleus_Foxo1_Pa1_Pd0_Pe1_pUb0*nucleus + dnabound_Foxo1_Pa1_Pd0_Pe1_pUb0*dnabound + cytoplasm_Foxo1_Pa1_Pd0_Pe1_pUb1*cytoplasm + nucleus_Foxo1_Pa1_Pd0_Pe1_pUb1*nucleus + dnabound_Foxo1_Pa1_Pd0_Pe1_pUb1*dnabound + cytoplasm_Foxo1_Pa1_Pd1_Pe0_pUb0*cytoplasm + nucleus_Foxo1_Pa1_Pd1_Pe0_pUb0*nucleus + dnabound_Foxo1_Pa1_Pd1_Pe0_pUb0*dnabound + cytoplasm_Foxo1_Pa1_Pd1_Pe0_pUb1*cytoplasm + nucleus_Foxo1_Pa1_Pd1_Pe0_pUb1*nucleus + dnabound_Foxo1_Pa1_Pd1_Pe0_pUb1*dnabound + cytoplasm_Foxo1_Pa1_Pd1_Pe1_pUb0*cytoplasm + nucleus_Foxo1_Pa1_Pd1_Pe1_pUb0*nucleus + dnabound_Foxo1_Pa1_Pd1_Pe1_pUb0*dnabound + cytoplasm_Foxo1_Pa1_Pd1_Pe1_pUb1*cytoplasm + nucleus_Foxo1_Pa1_Pd1_Pe1_pUb1*nucleus + dnabound_Foxo1_Pa1_Pd1_Pe1_pUb1*dnabound)/extracellular;
  Foxo1_Pd0_tot := (cytoplasm_Foxo1_Pa0_Pd0_Pe0_pUb0*cytoplasm + nucleus_Foxo1_Pa0_Pd0_Pe0_pUb0*nucleus + dnabound_Foxo1_Pa0_Pd0_Pe0_pUb0*dnabound + cytoplasm_Foxo1_Pa0_Pd0_Pe0_pUb1*cytoplasm + nucleus_Foxo1_Pa0_Pd0_Pe0_pUb1*nucleus + dnabound_Foxo1_Pa0_Pd0_Pe0_pUb1*dnabound + cytoplasm_Foxo1_Pa0_Pd0_Pe1_pUb0*cytoplasm + nucleus_Foxo1_Pa0_Pd0_Pe1_pUb0*nucleus + dnabound_Foxo1_Pa0_Pd0_Pe1_pUb0*dnabound + cytoplasm_Foxo1_Pa0_Pd0_Pe1_pUb1*cytoplasm + nucleus_Foxo1_Pa0_Pd0_Pe1_pUb1*nucleus + dnabound_Foxo1_Pa0_Pd0_Pe1_pUb1*dnabound + cytoplasm_Foxo1_Pa1_Pd0_Pe0_pUb0*cytoplasm + nucleus_Foxo1_Pa1_Pd0_Pe0_pUb0*nucleus + dnabound_Foxo1_Pa1_Pd0_Pe0_pUb0*dnabound + cytoplasm_Foxo1_Pa1_Pd0_Pe0_pUb1*cytoplasm + nucleus_Foxo1_Pa1_Pd0_Pe0_pUb1*nucleus + dnabound_Foxo1_Pa1_Pd0_Pe0_pUb1*dnabound + cytoplasm_Foxo1_Pa1_Pd0_Pe1_pUb0*cytoplasm + nucleus_Foxo1_Pa1_Pd0_Pe1_pUb0*nucleus + dnabound_Foxo1_Pa1_Pd0_Pe1_pUb0*dnabound + cytoplasm_Foxo1_Pa1_Pd0_Pe1_pUb1*cytoplasm + nucleus_Foxo1_Pa1_Pd0_Pe1_pUb1*nucleus + dnabound_Foxo1_Pa1_Pd0_Pe1_pUb1*dnabound)/extracellular;
  Foxo1_Pd1_tot := (cytoplasm_Foxo1_Pa0_Pd1_Pe0_pUb0*cytoplasm + nucleus_Foxo1_Pa0_Pd1_Pe0_pUb0*nucleus + dnabound_Foxo1_Pa0_Pd1_Pe0_pUb0*dnabound + cytoplasm_Foxo1_Pa0_Pd1_Pe0_pUb1*cytoplasm + nucleus_Foxo1_Pa0_Pd1_Pe0_pUb1*nucleus + dnabound_Foxo1_Pa0_Pd1_Pe0_pUb1*dnabound + cytoplasm_Foxo1_Pa0_Pd1_Pe1_pUb0*cytoplasm + nucleus_Foxo1_Pa0_Pd1_Pe1_pUb0*nucleus + dnabound_Foxo1_Pa0_Pd1_Pe1_pUb0*dnabound + cytoplasm_Foxo1_Pa0_Pd1_Pe1_pUb1*cytoplasm + nucleus_Foxo1_Pa0_Pd1_Pe1_pUb1*nucleus + dnabound_Foxo1_Pa0_Pd1_Pe1_pUb1*dnabound + cytoplasm_Foxo1_Pa1_Pd1_Pe0_pUb0*cytoplasm + nucleus_Foxo1_Pa1_Pd1_Pe0_pUb0*nucleus + dnabound_Foxo1_Pa1_Pd1_Pe0_pUb0*dnabound + cytoplasm_Foxo1_Pa1_Pd1_Pe0_pUb1*cytoplasm + nucleus_Foxo1_Pa1_Pd1_Pe0_pUb1*nucleus + dnabound_Foxo1_Pa1_Pd1_Pe0_pUb1*dnabound + cytoplasm_Foxo1_Pa1_Pd1_Pe1_pUb0*cytoplasm + nucleus_Foxo1_Pa1_Pd1_Pe1_pUb0*nucleus + dnabound_Foxo1_Pa1_Pd1_Pe1_pUb0*dnabound + cytoplasm_Foxo1_Pa1_Pd1_Pe1_pUb1*cytoplasm + nucleus_Foxo1_Pa1_Pd1_Pe1_pUb1*nucleus + dnabound_Foxo1_Pa1_Pd1_Pe1_pUb1*dnabound)/extracellular;
  Foxo1_Pe0_tot := (cytoplasm_Foxo1_Pa0_Pd0_Pe0_pUb0*cytoplasm + nucleus_Foxo1_Pa0_Pd0_Pe0_pUb0*nucleus + dnabound_Foxo1_Pa0_Pd0_Pe0_pUb0*dnabound + cytoplasm_Foxo1_Pa0_Pd0_Pe0_pUb1*cytoplasm + nucleus_Foxo1_Pa0_Pd0_Pe0_pUb1*nucleus + dnabound_Foxo1_Pa0_Pd0_Pe0_pUb1*dnabound + cytoplasm_Foxo1_Pa0_Pd1_Pe0_pUb0*cytoplasm + nucleus_Foxo1_Pa0_Pd1_Pe0_pUb0*nucleus + dnabound_Foxo1_Pa0_Pd1_Pe0_pUb0*dnabound + cytoplasm_Foxo1_Pa0_Pd1_Pe0_pUb1*cytoplasm + nucleus_Foxo1_Pa0_Pd1_Pe0_pUb1*nucleus + dnabound_Foxo1_Pa0_Pd1_Pe0_pUb1*dnabound + cytoplasm_Foxo1_Pa1_Pd0_Pe0_pUb0*cytoplasm + nucleus_Foxo1_Pa1_Pd0_Pe0_pUb0*nucleus + dnabound_Foxo1_Pa1_Pd0_Pe0_pUb0*dnabound + cytoplasm_Foxo1_Pa1_Pd0_Pe0_pUb1*cytoplasm + nucleus_Foxo1_Pa1_Pd0_Pe0_pUb1*nucleus + dnabound_Foxo1_Pa1_Pd0_Pe0_pUb1*dnabound + cytoplasm_Foxo1_Pa1_Pd1_Pe0_pUb0*cytoplasm + nucleus_Foxo1_Pa1_Pd1_Pe0_pUb0*nucleus + dnabound_Foxo1_Pa1_Pd1_Pe0_pUb0*dnabound + cytoplasm_Foxo1_Pa1_Pd1_Pe0_pUb1*cytoplasm + nucleus_Foxo1_Pa1_Pd1_Pe0_pUb1*nucleus + dnabound_Foxo1_Pa1_Pd1_Pe0_pUb1*dnabound)/extracellular;
  Foxo1_Pe1_tot := (cytoplasm_Foxo1_Pa0_Pd0_Pe1_pUb0*cytoplasm + nucleus_Foxo1_Pa0_Pd0_Pe1_pUb0*nucleus + dnabound_Foxo1_Pa0_Pd0_Pe1_pUb0*dnabound + cytoplasm_Foxo1_Pa0_Pd0_Pe1_pUb1*cytoplasm + nucleus_Foxo1_Pa0_Pd0_Pe1_pUb1*nucleus + dnabound_Foxo1_Pa0_Pd0_Pe1_pUb1*dnabound + cytoplasm_Foxo1_Pa0_Pd1_Pe1_pUb0*cytoplasm + nucleus_Foxo1_Pa0_Pd1_Pe1_pUb0*nucleus + dnabound_Foxo1_Pa0_Pd1_Pe1_pUb0*dnabound + cytoplasm_Foxo1_Pa0_Pd1_Pe1_pUb1*cytoplasm + nucleus_Foxo1_Pa0_Pd1_Pe1_pUb1*nucleus + dnabound_Foxo1_Pa0_Pd1_Pe1_pUb1*dnabound + cytoplasm_Foxo1_Pa1_Pd0_Pe1_pUb0*cytoplasm + nucleus_Foxo1_Pa1_Pd0_Pe1_pUb0*nucleus + dnabound_Foxo1_Pa1_Pd0_Pe1_pUb0*dnabound + cytoplasm_Foxo1_Pa1_Pd0_Pe1_pUb1*cytoplasm + nucleus_Foxo1_Pa1_Pd0_Pe1_pUb1*nucleus + dnabound_Foxo1_Pa1_Pd0_Pe1_pUb1*dnabound + cytoplasm_Foxo1_Pa1_Pd1_Pe1_pUb0*cytoplasm + nucleus_Foxo1_Pa1_Pd1_Pe1_pUb0*nucleus + dnabound_Foxo1_Pa1_Pd1_Pe1_pUb0*dnabound + cytoplasm_Foxo1_Pa1_Pd1_Pe1_pUb1*cytoplasm + nucleus_Foxo1_Pa1_Pd1_Pe1_pUb1*nucleus + dnabound_Foxo1_Pa1_Pd1_Pe1_pUb1*dnabound)/extracellular;
  Foxo1_pUb0_tot := (cytoplasm_Foxo1_Pa0_Pd0_Pe0_pUb0*cytoplasm + nucleus_Foxo1_Pa0_Pd0_Pe0_pUb0*nucleus + dnabound_Foxo1_Pa0_Pd0_Pe0_pUb0*dnabound + cytoplasm_Foxo1_Pa0_Pd0_Pe1_pUb0*cytoplasm + nucleus_Foxo1_Pa0_Pd0_Pe1_pUb0*nucleus + dnabound_Foxo1_Pa0_Pd0_Pe1_pUb0*dnabound + cytoplasm_Foxo1_Pa0_Pd1_Pe0_pUb0*cytoplasm + nucleus_Foxo1_Pa0_Pd1_Pe0_pUb0*nucleus + dnabound_Foxo1_Pa0_Pd1_Pe0_pUb0*dnabound + cytoplasm_Foxo1_Pa0_Pd1_Pe1_pUb0*cytoplasm + nucleus_Foxo1_Pa0_Pd1_Pe1_pUb0*nucleus + dnabound_Foxo1_Pa0_Pd1_Pe1_pUb0*dnabound + cytoplasm_Foxo1_Pa1_Pd0_Pe0_pUb0*cytoplasm + nucleus_Foxo1_Pa1_Pd0_Pe0_pUb0*nucleus + dnabound_Foxo1_Pa1_Pd0_Pe0_pUb0*dnabound + cytoplasm_Foxo1_Pa1_Pd0_Pe1_pUb0*cytoplasm + nucleus_Foxo1_Pa1_Pd0_Pe1_pUb0*nucleus + dnabound_Foxo1_Pa1_Pd0_Pe1_pUb0*dnabound + cytoplasm_Foxo1_Pa1_Pd1_Pe0_pUb0*cytoplasm + nucleus_Foxo1_Pa1_Pd1_Pe0_pUb0*nucleus + dnabound_Foxo1_Pa1_Pd1_Pe0_pUb0*dnabound + cytoplasm_Foxo1_Pa1_Pd1_Pe1_pUb0*cytoplasm + nucleus_Foxo1_Pa1_Pd1_Pe1_pUb0*nucleus + dnabound_Foxo1_Pa1_Pd1_Pe1_pUb0*dnabound)/extracellular;
  Foxo1_pUb1_tot := (cytoplasm_Foxo1_Pa0_Pd0_Pe0_pUb1*cytoplasm + nucleus_Foxo1_Pa0_Pd0_Pe0_pUb1*nucleus + dnabound_Foxo1_Pa0_Pd0_Pe0_pUb1*dnabound + cytoplasm_Foxo1_Pa0_Pd0_Pe1_pUb1*cytoplasm + nucleus_Foxo1_Pa0_Pd0_Pe1_pUb1*nucleus + dnabound_Foxo1_Pa0_Pd0_Pe1_pUb1*dnabound + cytoplasm_Foxo1_Pa0_Pd1_Pe0_pUb1*cytoplasm + nucleus_Foxo1_Pa0_Pd1_Pe0_pUb1*nucleus + dnabound_Foxo1_Pa0_Pd1_Pe0_pUb1*dnabound + cytoplasm_Foxo1_Pa0_Pd1_Pe1_pUb1*cytoplasm + nucleus_Foxo1_Pa0_Pd1_Pe1_pUb1*nucleus + dnabound_Foxo1_Pa0_Pd1_Pe1_pUb1*dnabound + cytoplasm_Foxo1_Pa1_Pd0_Pe0_pUb1*cytoplasm + nucleus_Foxo1_Pa1_Pd0_Pe0_pUb1*nucleus + dnabound_Foxo1_Pa1_Pd0_Pe0_pUb1*dnabound + cytoplasm_Foxo1_Pa1_Pd0_Pe1_pUb1*cytoplasm + nucleus_Foxo1_Pa1_Pd0_Pe1_pUb1*nucleus + dnabound_Foxo1_Pa1_Pd0_Pe1_pUb1*dnabound + cytoplasm_Foxo1_Pa1_Pd1_Pe0_pUb1*cytoplasm + nucleus_Foxo1_Pa1_Pd1_Pe0_pUb1*nucleus + dnabound_Foxo1_Pa1_Pd1_Pe0_pUb1*dnabound + cytoplasm_Foxo1_Pa1_Pd1_Pe1_pUb1*cytoplasm + nucleus_Foxo1_Pa1_Pd1_Pe1_pUb1*nucleus + dnabound_Foxo1_Pa1_Pd1_Pe1_pUb1*dnabound)/extracellular;
  cytoplasm_Foxo1_tot := (cytoplasm_Foxo1_Pa0_Pd0_Pe0_pUb0*cytoplasm + cytoplasm_Foxo1_Pa0_Pd0_Pe0_pUb1*cytoplasm + cytoplasm_Foxo1_Pa0_Pd0_Pe1_pUb0*cytoplasm + cytoplasm_Foxo1_Pa0_Pd0_Pe1_pUb1*cytoplasm + cytoplasm_Foxo1_Pa0_Pd1_Pe0_pUb0*cytoplasm + cytoplasm_Foxo1_Pa0_Pd1_Pe0_pUb1*cytoplasm + cytoplasm_Foxo1_Pa0_Pd1_Pe1_pUb0*cytoplasm + cytoplasm_Foxo1_Pa0_Pd1_Pe1_pUb1*cytoplasm + cytoplasm_Foxo1_Pa1_Pd0_Pe0_pUb0*cytoplasm + cytoplasm_Foxo1_Pa1_Pd0_Pe0_pUb1*cytoplasm + cytoplasm_Foxo1_Pa1_Pd0_Pe1_pUb0*cytoplasm + cytoplasm_Foxo1_Pa1_Pd0_Pe1_pUb1*cytoplasm + cytoplasm_Foxo1_Pa1_Pd1_Pe0_pUb0*cytoplasm + cytoplasm_Foxo1_Pa1_Pd1_Pe0_pUb1*cytoplasm + cytoplasm_Foxo1_Pa1_Pd1_Pe1_pUb0*cytoplasm + cytoplasm_Foxo1_Pa1_Pd1_Pe1_pUb1*cytoplasm)/extracellular;
  nucleus_Foxo1_tot := (nucleus_Foxo1_Pa0_Pd0_Pe0_pUb0*nucleus + nucleus_Foxo1_Pa0_Pd0_Pe0_pUb1*nucleus + nucleus_Foxo1_Pa0_Pd0_Pe1_pUb0*nucleus + nucleus_Foxo1_Pa0_Pd0_Pe1_pUb1*nucleus + nucleus_Foxo1_Pa0_Pd1_Pe0_pUb0*nucleus + nucleus_Foxo1_Pa0_Pd1_Pe0_pUb1*nucleus + nucleus_Foxo1_Pa0_Pd1_Pe1_pUb0*nucleus + nucleus_Foxo1_Pa0_Pd1_Pe1_pUb1*nucleus + nucleus_Foxo1_Pa1_Pd0_Pe0_pUb0*nucleus + nucleus_Foxo1_Pa1_Pd0_Pe0_pUb1*nucleus + nucleus_Foxo1_Pa1_Pd0_Pe1_pUb0*nucleus + nucleus_Foxo1_Pa1_Pd0_Pe1_pUb1*nucleus + nucleus_Foxo1_Pa1_Pd1_Pe0_pUb0*nucleus + nucleus_Foxo1_Pa1_Pd1_Pe0_pUb1*nucleus + nucleus_Foxo1_Pa1_Pd1_Pe1_pUb0*nucleus + nucleus_Foxo1_Pa1_Pd1_Pe1_pUb1*nucleus)/extracellular;
  dnabound_Foxo1_tot := (dnabound_Foxo1_Pa0_Pd0_Pe0_pUb0*dnabound + dnabound_Foxo1_Pa0_Pd0_Pe0_pUb1*dnabound + dnabound_Foxo1_Pa0_Pd0_Pe1_pUb0*dnabound + dnabound_Foxo1_Pa0_Pd0_Pe1_pUb1*dnabound + dnabound_Foxo1_Pa0_Pd1_Pe0_pUb0*dnabound + dnabound_Foxo1_Pa0_Pd1_Pe0_pUb1*dnabound + dnabound_Foxo1_Pa0_Pd1_Pe1_pUb0*dnabound + dnabound_Foxo1_Pa0_Pd1_Pe1_pUb1*dnabound + dnabound_Foxo1_Pa1_Pd0_Pe0_pUb0*dnabound + dnabound_Foxo1_Pa1_Pd0_Pe0_pUb1*dnabound + dnabound_Foxo1_Pa1_Pd0_Pe1_pUb0*dnabound + dnabound_Foxo1_Pa1_Pd0_Pe1_pUb1*dnabound + dnabound_Foxo1_Pa1_Pd1_Pe0_pUb0*dnabound + dnabound_Foxo1_Pa1_Pd1_Pe0_pUb1*dnabound + dnabound_Foxo1_Pa1_Pd1_Pe1_pUb0*dnabound + dnabound_Foxo1_Pa1_Pd1_Pe1_pUb1*dnabound)/extracellular;
  Foxo1_all := (cytoplasm_Foxo1_tot*extracellular + nucleus_Foxo1_tot*extracellular + dnabound_Foxo1_tot*extracellular)/extracellular;
  ros_ext_conc := sc_ros*extracellular_ROS*extracellular/(navo*extracellular);
  ros_cyto_conc := sc_ros*ROS*cytoplasm/(navo*cytoplasm);
  PTP1B_plus_PTP1B_ox := (PTP1B*cytoplasm + PTP1B_ox*cytoplasm)/cytoplasm;
  PTEN_plus_PTEN_ox := (PTEN*cytoplasm + PTEN_ox*cytoplasm)/cytoplasm;
  NOX_total := (NOX_inact*cytoplasm + NOX*cytoplasm + NOX_deact*cytoplasm)/cytoplasm;
  IRS_total := (IRS1*cytoplasm + IRS1_TyrP*cytoplasm + IRS1_PolySerP*cytoplasm + IRS1_TyrP_PolySerP*cytoplasm)/cytoplasm;
  InR_tot := (InR*cellsurface + Ins_InR*cellsurface + Ins_InR_P*cellsurface + Ins_2_InR_P*cellsurface + cytoplasm_InR*cytoplasm + cytoplasm_Ins_2_InR_P*cytoplasm + cytoplasm_Ins_InR_P*cytoplasm)/cytoplasm;
  InR_bound := (Ins_2_InR_P*cellsurface + Ins_InR_P*cellsurface + Ins_InR*cellsurface)/cytoplasm;
  InR_active := (Ins_2_InR_P*cellsurface + Ins_InR_P*cellsurface)/cytoplasm;
  PI345P3_mol := sc_pip*PI345P3*cytoplasm/cytoplasm;
  PIP2_mol := sc_pip*PIP2*cytoplasm/cytoplasm;
  rosconc := ROS*cytoplasm/(navo*vcytoplasm);

  // Reactions:
  R1f: $Ins + InR => Ins_InR; Function_for_R1f_1(InR, Ins, cellsurface, extracellular, k1);
  R1r: Ins_InR => InR + $Ins; Function_for_R1r_1(Ins_InR, cellsurface, kminus1);
  R2: Ins_InR => Ins_InR_P; cellsurface*Function_for_R2_1(Ins_InR, cellsurface, k3);
  R3f: $Ins + Ins_InR_P => Ins_2_InR_P; Function_for_R3f_1(Ins, Ins_InR_P, cellsurface, extracellular, k2);
  R3r: Ins_2_InR_P => Ins_InR_P + $Ins; Function_for_R3r_1(Ins_2_InR_P, cellsurface, kminus2);
  R4: Ins_InR_P => InR; cellsurface*Function_for_R4_1(Ins_InR_P, PTP1B, cellsurface, cytoplasm, kminus3);  // modifiers: PTP1B
  R5f: InR => cytoplasm_InR; Function_for_R5f_1(InR, cellsurface, k4);
  R5r: cytoplasm_InR => InR; Function_for_R5r_1(cytoplasm, cytoplasm_InR, kminus4);
  R6f: Ins_2_InR_P => cytoplasm_Ins_2_InR_P; Function_for_R6f_1(Ins_2_InR_P, cellsurface, k4prime);
  R6r: cytoplasm_Ins_2_InR_P => Ins_2_InR_P; Function_for_R6r_1(cytoplasm, cytoplasm_Ins_2_InR_P, kminus4prime);
  R7f: Ins_InR_P => cytoplasm_Ins_InR_P; Function_for_R7f_1(Ins_InR_P, cellsurface, k4prime);
  R7r: cytoplasm_Ins_InR_P => Ins_InR_P; Function_for_R7r_1(cytoplasm, cytoplasm_Ins_InR_P, kminus4prime);
  R10: cytoplasm_Ins_2_InR_P => cytoplasm_InR; cytoplasm*Function_for_R10_1(PTP1B, cytoplasm, cytoplasm_Ins_2_InR_P, k6);  // modifiers: PTP1B
  R11: cytoplasm_Ins_InR_P => cytoplasm_InR; cytoplasm*Function_for_R11_1(PTP1B, cytoplasm, cytoplasm_Ins_InR_P, k6);  // modifiers: PTP1B
  R14f: PIP2 => PI345P3; cytoplasm*Function_for_R14f_1(IRS1_TyrP_PI3K, PIP2, cytoplasm, k9, k9_basal);  // modifiers: IRS1_TyrP_PI3K
  R14r: PI345P3 => PIP2; cytoplasm*Function_for_R14r_1(PI345P3, PTEN, cytoplasm, kminus9, kminus9_basal);  // modifiers: PTEN
  R16f: Akt => Akt_P2; cytoplasm*Function_for_R16f_1(Akt, PI345P3, cytoplasm, k11, pip3_basal);  // modifiers: PI345P3
  R16r: Akt_P2 => Akt; cytoplasm*Function_for_R16r_1(Akt_P2, PP2A, cytoplasm, kminus11);  // modifiers: PP2A
  R16a_f: AS160 => AS160_P; cytoplasm*Function_for_R16a_f_1(AS160, Akt_P2, cytoplasm, kr16a);  // modifiers: Akt_P2
  R16a_r: AS160_P => AS160; cytoplasm*Function_for_R16a_r_1(AS160_P, PP2A, cytoplasm, kminusr16a);  // modifiers: PP2A
  R17f: PKC => PKC_P; cytoplasm*Function_for_R17f_1(PI345P3, PKC, cytoplasm, k12, pip3_basal);  // modifiers: PI345P3
  R17r: PKC_P => PKC; cytoplasm*Function_for_R17r_1(PKC_P, PP2A, cytoplasm, kminus12);  // modifiers: PP2A
  R20f: cytoplasm_GLUT4 => cellsurface_GLUT4; Function_for_R20f_1(AS160_P, cytoplasm, cytoplasm_GLUT4, k13, k13_basal);  // modifiers: AS160_P
  R20r: cellsurface_GLUT4 => cytoplasm_GLUT4; Function_for_R20r_1(cellsurface, cellsurface_GLUT4, kminus13);
  R30f: PTP1B + ROS => PTP1B_ox + ROS; cytoplasm*Function_for_R30f_1(PTP1B, ROS, cytoplasm, k30f);
  R30r: PTP1B_ox + GSH => PTP1B + GSH; cytoplasm*Function_for_R30r_1(GSH, PTP1B_ox, cytoplasm, k30r);
  R31f: PTEN + ROS => PTEN_ox + ROS; cytoplasm*Function_for_R31f_1(PTEN, ROS, cytoplasm, k31f);
  R31r: PTEN_ox + GSH => PTEN + GSH; cytoplasm*Function_for_R31r_1(GSH, PTEN_ox, cytoplasm, k31r);
  R34f: NOX_inact + $Ins => NOX + $Ins; Function_for_R34f_1(Ins, NOX_inact, cytoplasm, extracellular, k34f);
  R34r1: NOX => NOX_deact; cytoplasm*Function_for_R34r1_1(NOX, cytoplasm, k34r1);
  R34r2: NOX => NOX_inact; cytoplasm*Function_for_R34r2_1(NOX, cytoplasm, k34r2);
  R34r3: NOX_deact => NOX_inact; cytoplasm*Function_for_R34r3_1(NOX_deact, cytoplasm, k34r3);
  R35f: NOX => ROS + NOX; cytoplasm*Function_for_R35f_1(NOX, cytoplasm, k35f);
  R35r: ROS + cytoplasm_SOD2 => cytoplasm_SOD2; cytoplasm*Function_for_R35r_1(ROS, cytoplasm, cytoplasm_SOD2, k35r);
  R36f: $Mt => $Mt + ROS; cytoplasm*Function_for_R36f_1(Mt, cytoplasm, k36f);
  R37f: $extracellular_ROS => ROS; Function_for_R37f_1(extracellular, extracellular_ROS, k_ros_perm);
  R37r: ROS => $extracellular_ROS; Function_for_R37r_1(ROS, cytoplasm, extracellular, k_ros_perm);
  R38f: GSH => GSSG; cytoplasm*Function_for_R38f_1(GSH, ROS, cytoplasm, k38f);  // modifiers: ROS
  R38r: GSSG => GSH; cytoplasm*Function_for_R38r_1(GSSG, cytoplasm, k38r);
  R12f: IRS1 => IRS1_TyrP; cytoplasm*Function_for_R12f_1(IRS1, IRp, Ins_2_InR_P, Ins_InR_P, cellsurface, cyto_vol, cytoplasm, k7);  // modifiers: Ins_2_InR_P, Ins_InR_P
  R12r: IRS1_TyrP => IRS1; cytoplasm*Function_for_R12r_1(IRS1_TyrP, PTP1B, cyto_vol, cytoplasm, kminus7a);  // modifiers: PTP1B
  R12_a_f: IRS1 => IRS1_PolySerP; cytoplasm*Function_for_R12_a_f_1(IRS1, PKC_P, cyto_vol, cytoplasm, k2psp);  // modifiers: PKC_P
  R12_a_r: IRS1_PolySerP => IRS1; cytoplasm*Function_for_R12_a_r_1(IRS1_PolySerP, PP2A, cyto_vol, cytoplasm, kminus7b);  // modifiers: PP2A
  R12_b_f: IRS1_TyrP => IRS1_TyrP_PolySerP; cytoplasm*Function_for_R12_b_f_1(IRS1_TyrP, PKC_P, cyto_vol, cytoplasm, k2psp);  // modifiers: PKC_P
  R12_b_r: IRS1_TyrP_PolySerP => IRS1_TyrP; cytoplasm*Function_for_R12_b_r_1(IRS1_TyrP_PolySerP, PP2A, cyto_vol, cytoplasm, kminus7b);  // modifiers: PP2A
  R13f: PI3K + IRS1_TyrP => IRS1_TyrP_PI3K; cytoplasm*Function_for_R13f_1(IRS1_TyrP, PI3K, cyto_vol, cytoplasm, k8);
  R13r: IRS1_TyrP_PI3K => PI3K + IRS1_TyrP; cytoplasm*Function_for_R13r_1(IRS1_TyrP_PI3K, cyto_vol, cytoplasm, kminus8);
  R50f: $NULL => IRS1; cytoplasm*Function_for_R50f_1(cytoplasm, k_irs1_basal_syn);
  R50r1: IRS1 => $NULL; cytoplasm*Function_for_R50r1_1(IRS1, cytoplasm, k_irs1_basal_degr);
  R50r2: IRS1_TyrP => $NULL; cytoplasm*Function_for_R50r2_1(IRS1_TyrP, cytoplasm, k_irs1_basal_degr);
  R50r3: IRS1_PolySerP => $NULL; cytoplasm*Function_for_R50r3_1(IRS1_PolySerP, cytoplasm, k_irs1_polyserp_degr);
  R50r4: IRS1_TyrP_PolySerP => $NULL; cytoplasm*Function_for_R50r4_1(IRS1_TyrP_PolySerP, cytoplasm, k_irs1_polyserp_degr);
  R51f: IRS1 => IRS1_PolySerP; cytoplasm*Function_for_R51f_1(IKK_P, IRS1, Km51, cytoplasm, kcat51);  // modifiers: IKK_P
  R52f: IRS1 => IRS1_PolySerP; cytoplasm*Function_for_R52f_1(IRS1, JNK_P, Km52, cytoplasm, kcat52);  // modifiers: JNK_P
  R42f: JNK => JNK_P; cytoplasm*Function_for_R42f_1(JNK, ROS, alpha_ox, cytoplasm, k42f);  // modifiers: ROS
  R42r: JNK_P => JNK; cytoplasm*Function_for_R42r_1(DUSP, JNK_P, cytoplasm, k42r);  // modifiers: DUSP
  R43f: IKK => IKK_P; cytoplasm*Function_for_R43f_1(IKK, ROS, cytoplasm, k43f);  // modifiers: ROS
  R43r: IKK_P => IKK; cytoplasm*Function_for_R43r_1(DUSP, IKK_P, cytoplasm, k43r);  // modifiers: DUSP
  R32f: DUSP + ROS => DUSP_ox + ROS; cytoplasm*Function_for_R32f_1(DUSP, ROS, cytoplasm, k32f);
  R32r: DUSP_ox + GSH => DUSP + GSH; cytoplasm*Function_for_R32r_1(DUSP_ox, GSH, cytoplasm, k32r);
  Synthesis: $null => cytoplasm_Foxo1_Pa0_Pd0_Pe0_pUb0; cytoplasm*Function_for_Synthesis_1(E2F1, cytoplasm, ksynth);  // modifiers: E2F1
    ksynth = 0.0055;
  R101: cytoplasm_Foxo1_Pa0_Pd0_Pe0_pUb0 => nucleus_Foxo1_Pa0_Pd0_Pe0_pUb0; function_62(cytoplasm, cytoplasm_Foxo1_Pa0_Pd0_Pe0_pUb0, R101_ktr); R101 is "transport cytoplasm_Foxo1_Pa0_Pd0_Pe0_pUb0 to nucleus_Foxo1_Pa0_Pd0_Pe0_pUb0";
    R101_ktr = 0.1818182;
  R102: nucleus_Foxo1_Pa0_Pd0_Pe0_pUb0 => cytoplasm_Foxo1_Pa0_Pd0_Pe0_pUb0; function_63(R102_ktr, nucleus, nucleus_Foxo1_Pa0_Pd0_Pe0_pUb0); R102 is "transport nucleus_Foxo1_Pa0_Pd0_Pe0_pUb0 to cytoplasm_Foxo1_Pa0_Pd0_Pe0_pUb0";
    R102_ktr = 0.055;
  R103: nucleus_Foxo1_Pa0_Pd0_Pe0_pUb0 => dnabound_Foxo1_Pa0_Pd0_Pe0_pUb0; function_64(R103_ktr, nucleus, nucleus_Foxo1_Pa0_Pd0_Pe0_pUb0); R103 is "transport nucleus_Foxo1_Pa0_Pd0_Pe0_pUb0 to dnabound_Foxo1_Pa0_Pd0_Pe0_pUb0";
    R103_ktr = 0.25;
  R104: dnabound_Foxo1_Pa0_Pd0_Pe0_pUb0 => nucleus_Foxo1_Pa0_Pd0_Pe0_pUb0; function_65(dnabound, dnabound_Foxo1_Pa0_Pd0_Pe0_pUb0, R104_ktr); R104 is "transport dnabound_Foxo1_Pa0_Pd0_Pe0_pUb0 to nucleus_Foxo1_Pa0_Pd0_Pe0_pUb0";
    R104_ktr = 0.125;
  R105: cytoplasm_Foxo1_Pa0_Pd0_Pe0_pUb1 => nucleus_Foxo1_Pa0_Pd0_Pe0_pUb1; function_66(cytoplasm, cytoplasm_Foxo1_Pa0_Pd0_Pe0_pUb1, R105_ktr); R105 is "transport cytoplasm_Foxo1_Pa0_Pd0_Pe0_pUb1 to nucleus_Foxo1_Pa0_Pd0_Pe0_pUb1";
    R105_ktr = 0.1818182;
  R106: nucleus_Foxo1_Pa0_Pd0_Pe0_pUb1 => cytoplasm_Foxo1_Pa0_Pd0_Pe0_pUb1; function_67(R106_ktr, nucleus, nucleus_Foxo1_Pa0_Pd0_Pe0_pUb1); R106 is "transport nucleus_Foxo1_Pa0_Pd0_Pe0_pUb1 to cytoplasm_Foxo1_Pa0_Pd0_Pe0_pUb1";
    R106_ktr = 0.055;
  R107: nucleus_Foxo1_Pa0_Pd0_Pe0_pUb1 => dnabound_Foxo1_Pa0_Pd0_Pe0_pUb1; function_68(R107_ktr, nucleus, nucleus_Foxo1_Pa0_Pd0_Pe0_pUb1); R107 is "transport nucleus_Foxo1_Pa0_Pd0_Pe0_pUb1 to dnabound_Foxo1_Pa0_Pd0_Pe0_pUb1";
    R107_ktr = 0.25;
  R108: dnabound_Foxo1_Pa0_Pd0_Pe0_pUb1 => nucleus_Foxo1_Pa0_Pd0_Pe0_pUb1; function_69(dnabound, dnabound_Foxo1_Pa0_Pd0_Pe0_pUb1, R108_ktr); R108 is "transport dnabound_Foxo1_Pa0_Pd0_Pe0_pUb1 to nucleus_Foxo1_Pa0_Pd0_Pe0_pUb1";
    R108_ktr = 0.125;
  R109: cytoplasm_Foxo1_Pa0_Pd0_Pe1_pUb0 => nucleus_Foxo1_Pa0_Pd0_Pe1_pUb0; function_70(cytoplasm, cytoplasm_Foxo1_Pa0_Pd0_Pe1_pUb0, R109_ktr); R109 is "transport cytoplasm_Foxo1_Pa0_Pd0_Pe1_pUb0 to nucleus_Foxo1_Pa0_Pd0_Pe1_pUb0";
    R109_ktr = 1.818182;
  R110: nucleus_Foxo1_Pa0_Pd0_Pe1_pUb0 => cytoplasm_Foxo1_Pa0_Pd0_Pe1_pUb0; function_71(R110_ktr, nucleus, nucleus_Foxo1_Pa0_Pd0_Pe1_pUb0); R110 is "transport nucleus_Foxo1_Pa0_Pd0_Pe1_pUb0 to cytoplasm_Foxo1_Pa0_Pd0_Pe1_pUb0";
    R110_ktr = 0.0055;
  R111: nucleus_Foxo1_Pa0_Pd0_Pe1_pUb0 => dnabound_Foxo1_Pa0_Pd0_Pe1_pUb0; function_72(R111_ktr, nucleus, nucleus_Foxo1_Pa0_Pd0_Pe1_pUb0); R111 is "transport nucleus_Foxo1_Pa0_Pd0_Pe1_pUb0 to dnabound_Foxo1_Pa0_Pd0_Pe1_pUb0";
    R111_ktr = 0.25;
  R112: dnabound_Foxo1_Pa0_Pd0_Pe1_pUb0 => nucleus_Foxo1_Pa0_Pd0_Pe1_pUb0; function_73(dnabound, dnabound_Foxo1_Pa0_Pd0_Pe1_pUb0, R112_ktr); R112 is "transport dnabound_Foxo1_Pa0_Pd0_Pe1_pUb0 to nucleus_Foxo1_Pa0_Pd0_Pe1_pUb0";
    R112_ktr = 0.125;
  R113: cytoplasm_Foxo1_Pa0_Pd0_Pe1_pUb1 => nucleus_Foxo1_Pa0_Pd0_Pe1_pUb1; function_74(cytoplasm, cytoplasm_Foxo1_Pa0_Pd0_Pe1_pUb1, R113_ktr); R113 is "transport cytoplasm_Foxo1_Pa0_Pd0_Pe1_pUb1 to nucleus_Foxo1_Pa0_Pd0_Pe1_pUb1";
    R113_ktr = 1.818182;
  R114: nucleus_Foxo1_Pa0_Pd0_Pe1_pUb1 => cytoplasm_Foxo1_Pa0_Pd0_Pe1_pUb1; function_75(R114_ktr, nucleus, nucleus_Foxo1_Pa0_Pd0_Pe1_pUb1); R114 is "transport nucleus_Foxo1_Pa0_Pd0_Pe1_pUb1 to cytoplasm_Foxo1_Pa0_Pd0_Pe1_pUb1";
    R114_ktr = 0.0055;
  R115: nucleus_Foxo1_Pa0_Pd0_Pe1_pUb1 => dnabound_Foxo1_Pa0_Pd0_Pe1_pUb1; function_76(R115_ktr, nucleus, nucleus_Foxo1_Pa0_Pd0_Pe1_pUb1); R115 is "transport nucleus_Foxo1_Pa0_Pd0_Pe1_pUb1 to dnabound_Foxo1_Pa0_Pd0_Pe1_pUb1";
    R115_ktr = 0.25;
  R116: dnabound_Foxo1_Pa0_Pd0_Pe1_pUb1 => nucleus_Foxo1_Pa0_Pd0_Pe1_pUb1; function_77(dnabound, dnabound_Foxo1_Pa0_Pd0_Pe1_pUb1, R116_ktr); R116 is "transport dnabound_Foxo1_Pa0_Pd0_Pe1_pUb1 to nucleus_Foxo1_Pa0_Pd0_Pe1_pUb1";
    R116_ktr = 0.125;
  R117: cytoplasm_Foxo1_Pa0_Pd1_Pe0_pUb0 => nucleus_Foxo1_Pa0_Pd1_Pe0_pUb0; function_78(cytoplasm, cytoplasm_Foxo1_Pa0_Pd1_Pe0_pUb0, R117_ktr); R117 is "transport cytoplasm_Foxo1_Pa0_Pd1_Pe0_pUb0 to nucleus_Foxo1_Pa0_Pd1_Pe0_pUb0";
    R117_ktr = 0.09090909;
  R118: nucleus_Foxo1_Pa0_Pd1_Pe0_pUb0 => cytoplasm_Foxo1_Pa0_Pd1_Pe0_pUb0; function_79(R118_ktr, nucleus, nucleus_Foxo1_Pa0_Pd1_Pe0_pUb0); R118 is "transport nucleus_Foxo1_Pa0_Pd1_Pe0_pUb0 to cytoplasm_Foxo1_Pa0_Pd1_Pe0_pUb0";
    R118_ktr = 0.55;
  R119: nucleus_Foxo1_Pa0_Pd1_Pe0_pUb0 => dnabound_Foxo1_Pa0_Pd1_Pe0_pUb0; function_80(R119_ktr, nucleus, nucleus_Foxo1_Pa0_Pd1_Pe0_pUb0); R119 is "transport nucleus_Foxo1_Pa0_Pd1_Pe0_pUb0 to dnabound_Foxo1_Pa0_Pd1_Pe0_pUb0";
    R119_ktr = 0.25;
  R120: dnabound_Foxo1_Pa0_Pd1_Pe0_pUb0 => nucleus_Foxo1_Pa0_Pd1_Pe0_pUb0; function_81(dnabound, dnabound_Foxo1_Pa0_Pd1_Pe0_pUb0, R120_ktr); R120 is "transport dnabound_Foxo1_Pa0_Pd1_Pe0_pUb0 to nucleus_Foxo1_Pa0_Pd1_Pe0_pUb0";
    R120_ktr = 0.125;
  R121: cytoplasm_Foxo1_Pa0_Pd1_Pe0_pUb1 => nucleus_Foxo1_Pa0_Pd1_Pe0_pUb1; function_82(cytoplasm, cytoplasm_Foxo1_Pa0_Pd1_Pe0_pUb1, R121_ktr); R121 is "transport cytoplasm_Foxo1_Pa0_Pd1_Pe0_pUb1 to nucleus_Foxo1_Pa0_Pd1_Pe0_pUb1";
    R121_ktr = 0.09090909;
  R122: nucleus_Foxo1_Pa0_Pd1_Pe0_pUb1 => cytoplasm_Foxo1_Pa0_Pd1_Pe0_pUb1; function_83(R122_ktr, nucleus, nucleus_Foxo1_Pa0_Pd1_Pe0_pUb1); R122 is "transport nucleus_Foxo1_Pa0_Pd1_Pe0_pUb1 to cytoplasm_Foxo1_Pa0_Pd1_Pe0_pUb1";
    R122_ktr = 0.55;
  R123: nucleus_Foxo1_Pa0_Pd1_Pe0_pUb1 => dnabound_Foxo1_Pa0_Pd1_Pe0_pUb1; function_84(R123_ktr, nucleus, nucleus_Foxo1_Pa0_Pd1_Pe0_pUb1); R123 is "transport nucleus_Foxo1_Pa0_Pd1_Pe0_pUb1 to dnabound_Foxo1_Pa0_Pd1_Pe0_pUb1";
    R123_ktr = 0.25;
  R124: dnabound_Foxo1_Pa0_Pd1_Pe0_pUb1 => nucleus_Foxo1_Pa0_Pd1_Pe0_pUb1; function_85(dnabound, dnabound_Foxo1_Pa0_Pd1_Pe0_pUb1, R124_ktr); R124 is "transport dnabound_Foxo1_Pa0_Pd1_Pe0_pUb1 to nucleus_Foxo1_Pa0_Pd1_Pe0_pUb1";
    R124_ktr = 0.125;
  R125: cytoplasm_Foxo1_Pa0_Pd1_Pe1_pUb0 => nucleus_Foxo1_Pa0_Pd1_Pe1_pUb0; function_86(cytoplasm, cytoplasm_Foxo1_Pa0_Pd1_Pe1_pUb0, R125_ktr); R125 is "transport cytoplasm_Foxo1_Pa0_Pd1_Pe1_pUb0 to nucleus_Foxo1_Pa0_Pd1_Pe1_pUb0";
    R125_ktr = 0.9090909;
  R126: nucleus_Foxo1_Pa0_Pd1_Pe1_pUb0 => cytoplasm_Foxo1_Pa0_Pd1_Pe1_pUb0; function_87(R126_ktr, nucleus, nucleus_Foxo1_Pa0_Pd1_Pe1_pUb0); R126 is "transport nucleus_Foxo1_Pa0_Pd1_Pe1_pUb0 to cytoplasm_Foxo1_Pa0_Pd1_Pe1_pUb0";
    R126_ktr = 0.055;
  R127: nucleus_Foxo1_Pa0_Pd1_Pe1_pUb0 => dnabound_Foxo1_Pa0_Pd1_Pe1_pUb0; function_88(R127_ktr, nucleus, nucleus_Foxo1_Pa0_Pd1_Pe1_pUb0); R127 is "transport nucleus_Foxo1_Pa0_Pd1_Pe1_pUb0 to dnabound_Foxo1_Pa0_Pd1_Pe1_pUb0";
    R127_ktr = 0.25;
  R128: dnabound_Foxo1_Pa0_Pd1_Pe1_pUb0 => nucleus_Foxo1_Pa0_Pd1_Pe1_pUb0; function_89(dnabound, dnabound_Foxo1_Pa0_Pd1_Pe1_pUb0, R128_ktr); R128 is "transport dnabound_Foxo1_Pa0_Pd1_Pe1_pUb0 to nucleus_Foxo1_Pa0_Pd1_Pe1_pUb0";
    R128_ktr = 0.125;
  R129: cytoplasm_Foxo1_Pa0_Pd1_Pe1_pUb1 => nucleus_Foxo1_Pa0_Pd1_Pe1_pUb1; function_90(cytoplasm, cytoplasm_Foxo1_Pa0_Pd1_Pe1_pUb1, R129_ktr); R129 is "transport cytoplasm_Foxo1_Pa0_Pd1_Pe1_pUb1 to nucleus_Foxo1_Pa0_Pd1_Pe1_pUb1";
    R129_ktr = 0.9090909;
  R130: nucleus_Foxo1_Pa0_Pd1_Pe1_pUb1 => cytoplasm_Foxo1_Pa0_Pd1_Pe1_pUb1; function_91(R130_ktr, nucleus, nucleus_Foxo1_Pa0_Pd1_Pe1_pUb1); R130 is "transport nucleus_Foxo1_Pa0_Pd1_Pe1_pUb1 to cytoplasm_Foxo1_Pa0_Pd1_Pe1_pUb1";
    R130_ktr = 0.055;
  R131: nucleus_Foxo1_Pa0_Pd1_Pe1_pUb1 => dnabound_Foxo1_Pa0_Pd1_Pe1_pUb1; function_92(R131_ktr, nucleus, nucleus_Foxo1_Pa0_Pd1_Pe1_pUb1); R131 is "transport nucleus_Foxo1_Pa0_Pd1_Pe1_pUb1 to dnabound_Foxo1_Pa0_Pd1_Pe1_pUb1";
    R131_ktr = 0.25;
  R132: dnabound_Foxo1_Pa0_Pd1_Pe1_pUb1 => nucleus_Foxo1_Pa0_Pd1_Pe1_pUb1; function_93(dnabound, dnabound_Foxo1_Pa0_Pd1_Pe1_pUb1, R132_ktr); R132 is "transport dnabound_Foxo1_Pa0_Pd1_Pe1_pUb1 to nucleus_Foxo1_Pa0_Pd1_Pe1_pUb1";
    R132_ktr = 0.125;
  R133: cytoplasm_Foxo1_Pa1_Pd0_Pe0_pUb0 => nucleus_Foxo1_Pa1_Pd0_Pe0_pUb0; function_94(cytoplasm, cytoplasm_Foxo1_Pa1_Pd0_Pe0_pUb0, R133_ktr); R133 is "transport cytoplasm_Foxo1_Pa1_Pd0_Pe0_pUb0 to nucleus_Foxo1_Pa1_Pd0_Pe0_pUb0";
    R133_ktr = 0.01818182;
  R134: nucleus_Foxo1_Pa1_Pd0_Pe0_pUb0 => cytoplasm_Foxo1_Pa1_Pd0_Pe0_pUb0; function_95(R134_ktr, nucleus, nucleus_Foxo1_Pa1_Pd0_Pe0_pUb0); R134 is "transport nucleus_Foxo1_Pa1_Pd0_Pe0_pUb0 to cytoplasm_Foxo1_Pa1_Pd0_Pe0_pUb0";
    R134_ktr = 0.55;
  R135: nucleus_Foxo1_Pa1_Pd0_Pe0_pUb0 => dnabound_Foxo1_Pa1_Pd0_Pe0_pUb0; function_96(R135_ktr, nucleus, nucleus_Foxo1_Pa1_Pd0_Pe0_pUb0); R135 is "transport nucleus_Foxo1_Pa1_Pd0_Pe0_pUb0 to dnabound_Foxo1_Pa1_Pd0_Pe0_pUb0";
    R135_ktr = 0.125;
  R136: dnabound_Foxo1_Pa1_Pd0_Pe0_pUb0 => nucleus_Foxo1_Pa1_Pd0_Pe0_pUb0; function_97(dnabound, dnabound_Foxo1_Pa1_Pd0_Pe0_pUb0, R136_ktr); R136 is "transport dnabound_Foxo1_Pa1_Pd0_Pe0_pUb0 to nucleus_Foxo1_Pa1_Pd0_Pe0_pUb0";
    R136_ktr = 0.125;
  R137: cytoplasm_Foxo1_Pa1_Pd0_Pe0_pUb1 => nucleus_Foxo1_Pa1_Pd0_Pe0_pUb1; function_98(cytoplasm, cytoplasm_Foxo1_Pa1_Pd0_Pe0_pUb1, R137_ktr); R137 is "transport cytoplasm_Foxo1_Pa1_Pd0_Pe0_pUb1 to nucleus_Foxo1_Pa1_Pd0_Pe0_pUb1";
    R137_ktr = 0.01818182;
  R138: nucleus_Foxo1_Pa1_Pd0_Pe0_pUb1 => cytoplasm_Foxo1_Pa1_Pd0_Pe0_pUb1; function_99(R138_ktr, nucleus, nucleus_Foxo1_Pa1_Pd0_Pe0_pUb1); R138 is "transport nucleus_Foxo1_Pa1_Pd0_Pe0_pUb1 to cytoplasm_Foxo1_Pa1_Pd0_Pe0_pUb1";
    R138_ktr = 0.55;
  R139: nucleus_Foxo1_Pa1_Pd0_Pe0_pUb1 => dnabound_Foxo1_Pa1_Pd0_Pe0_pUb1; function_100(R139_ktr, nucleus, nucleus_Foxo1_Pa1_Pd0_Pe0_pUb1); R139 is "transport nucleus_Foxo1_Pa1_Pd0_Pe0_pUb1 to dnabound_Foxo1_Pa1_Pd0_Pe0_pUb1";
    R139_ktr = 0.125;
  R140: dnabound_Foxo1_Pa1_Pd0_Pe0_pUb1 => nucleus_Foxo1_Pa1_Pd0_Pe0_pUb1; function_101(dnabound, dnabound_Foxo1_Pa1_Pd0_Pe0_pUb1, R140_ktr); R140 is "transport dnabound_Foxo1_Pa1_Pd0_Pe0_pUb1 to nucleus_Foxo1_Pa1_Pd0_Pe0_pUb1";
    R140_ktr = 0.125;
  R141: cytoplasm_Foxo1_Pa1_Pd0_Pe1_pUb0 => nucleus_Foxo1_Pa1_Pd0_Pe1_pUb0; function_102(cytoplasm, cytoplasm_Foxo1_Pa1_Pd0_Pe1_pUb0, R141_ktr); R141 is "transport cytoplasm_Foxo1_Pa1_Pd0_Pe1_pUb0 to nucleus_Foxo1_Pa1_Pd0_Pe1_pUb0";
    R141_ktr = 0.1818182;
  R142: nucleus_Foxo1_Pa1_Pd0_Pe1_pUb0 => cytoplasm_Foxo1_Pa1_Pd0_Pe1_pUb0; function_103(R142_ktr, nucleus, nucleus_Foxo1_Pa1_Pd0_Pe1_pUb0); R142 is "transport nucleus_Foxo1_Pa1_Pd0_Pe1_pUb0 to cytoplasm_Foxo1_Pa1_Pd0_Pe1_pUb0";
    R142_ktr = 0.055;
  R143: nucleus_Foxo1_Pa1_Pd0_Pe1_pUb0 => dnabound_Foxo1_Pa1_Pd0_Pe1_pUb0; function_104(R143_ktr, nucleus, nucleus_Foxo1_Pa1_Pd0_Pe1_pUb0); R143 is "transport nucleus_Foxo1_Pa1_Pd0_Pe1_pUb0 to dnabound_Foxo1_Pa1_Pd0_Pe1_pUb0";
    R143_ktr = 0.125;
  R144: dnabound_Foxo1_Pa1_Pd0_Pe1_pUb0 => nucleus_Foxo1_Pa1_Pd0_Pe1_pUb0; function_105(dnabound, dnabound_Foxo1_Pa1_Pd0_Pe1_pUb0, R144_ktr); R144 is "transport dnabound_Foxo1_Pa1_Pd0_Pe1_pUb0 to nucleus_Foxo1_Pa1_Pd0_Pe1_pUb0";
    R144_ktr = 0.125;
  R145: cytoplasm_Foxo1_Pa1_Pd0_Pe1_pUb1 => nucleus_Foxo1_Pa1_Pd0_Pe1_pUb1; function_106(cytoplasm, cytoplasm_Foxo1_Pa1_Pd0_Pe1_pUb1, R145_ktr); R145 is "transport cytoplasm_Foxo1_Pa1_Pd0_Pe1_pUb1 to nucleus_Foxo1_Pa1_Pd0_Pe1_pUb1";
    R145_ktr = 0.1818182;
  R146: nucleus_Foxo1_Pa1_Pd0_Pe1_pUb1 => cytoplasm_Foxo1_Pa1_Pd0_Pe1_pUb1; function_107(R146_ktr, nucleus, nucleus_Foxo1_Pa1_Pd0_Pe1_pUb1); R146 is "transport nucleus_Foxo1_Pa1_Pd0_Pe1_pUb1 to cytoplasm_Foxo1_Pa1_Pd0_Pe1_pUb1";
    R146_ktr = 0.055;
  R147: nucleus_Foxo1_Pa1_Pd0_Pe1_pUb1 => dnabound_Foxo1_Pa1_Pd0_Pe1_pUb1; function_108(R147_ktr, nucleus, nucleus_Foxo1_Pa1_Pd0_Pe1_pUb1); R147 is "transport nucleus_Foxo1_Pa1_Pd0_Pe1_pUb1 to dnabound_Foxo1_Pa1_Pd0_Pe1_pUb1";
    R147_ktr = 0.125;
  R148: dnabound_Foxo1_Pa1_Pd0_Pe1_pUb1 => nucleus_Foxo1_Pa1_Pd0_Pe1_pUb1; function_109(dnabound, dnabound_Foxo1_Pa1_Pd0_Pe1_pUb1, R148_ktr); R148 is "transport dnabound_Foxo1_Pa1_Pd0_Pe1_pUb1 to nucleus_Foxo1_Pa1_Pd0_Pe1_pUb1";
    R148_ktr = 0.125;
  R149: cytoplasm_Foxo1_Pa1_Pd1_Pe0_pUb0 => nucleus_Foxo1_Pa1_Pd1_Pe0_pUb0; function_110(cytoplasm, cytoplasm_Foxo1_Pa1_Pd1_Pe0_pUb0, R149_ktr); R149 is "transport cytoplasm_Foxo1_Pa1_Pd1_Pe0_pUb0 to nucleus_Foxo1_Pa1_Pd1_Pe0_pUb0";
    R149_ktr = 0.009090909;
  R150: nucleus_Foxo1_Pa1_Pd1_Pe0_pUb0 => cytoplasm_Foxo1_Pa1_Pd1_Pe0_pUb0; function_111(R150_ktr, nucleus, nucleus_Foxo1_Pa1_Pd1_Pe0_pUb0); R150 is "transport nucleus_Foxo1_Pa1_Pd1_Pe0_pUb0 to cytoplasm_Foxo1_Pa1_Pd1_Pe0_pUb0";
    R150_ktr = 5.5;
  R151: nucleus_Foxo1_Pa1_Pd1_Pe0_pUb0 => dnabound_Foxo1_Pa1_Pd1_Pe0_pUb0; function_112(R151_ktr, nucleus, nucleus_Foxo1_Pa1_Pd1_Pe0_pUb0); R151 is "transport nucleus_Foxo1_Pa1_Pd1_Pe0_pUb0 to dnabound_Foxo1_Pa1_Pd1_Pe0_pUb0";
    R151_ktr = 0.125;
  R152: dnabound_Foxo1_Pa1_Pd1_Pe0_pUb0 => nucleus_Foxo1_Pa1_Pd1_Pe0_pUb0; function_113(dnabound, dnabound_Foxo1_Pa1_Pd1_Pe0_pUb0, R152_ktr); R152 is "transport dnabound_Foxo1_Pa1_Pd1_Pe0_pUb0 to nucleus_Foxo1_Pa1_Pd1_Pe0_pUb0";
    R152_ktr = 0.125;
  R153: cytoplasm_Foxo1_Pa1_Pd1_Pe0_pUb1 => nucleus_Foxo1_Pa1_Pd1_Pe0_pUb1; function_114(cytoplasm, cytoplasm_Foxo1_Pa1_Pd1_Pe0_pUb1, R153_ktr); R153 is "transport cytoplasm_Foxo1_Pa1_Pd1_Pe0_pUb1 to nucleus_Foxo1_Pa1_Pd1_Pe0_pUb1";
    R153_ktr = 0.009090909;
  R154: nucleus_Foxo1_Pa1_Pd1_Pe0_pUb1 => cytoplasm_Foxo1_Pa1_Pd1_Pe0_pUb1; function_115(R154_ktr, nucleus, nucleus_Foxo1_Pa1_Pd1_Pe0_pUb1); R154 is "transport nucleus_Foxo1_Pa1_Pd1_Pe0_pUb1 to cytoplasm_Foxo1_Pa1_Pd1_Pe0_pUb1";
    R154_ktr = 5.5;
  R155: nucleus_Foxo1_Pa1_Pd1_Pe0_pUb1 => dnabound_Foxo1_Pa1_Pd1_Pe0_pUb1; function_116(R155_ktr, nucleus, nucleus_Foxo1_Pa1_Pd1_Pe0_pUb1); R155 is "transport nucleus_Foxo1_Pa1_Pd1_Pe0_pUb1 to dnabound_Foxo1_Pa1_Pd1_Pe0_pUb1";
    R155_ktr = 0.125;
  R156: dnabound_Foxo1_Pa1_Pd1_Pe0_pUb1 => nucleus_Foxo1_Pa1_Pd1_Pe0_pUb1; function_117(dnabound, dnabound_Foxo1_Pa1_Pd1_Pe0_pUb1, R156_ktr); R156 is "transport dnabound_Foxo1_Pa1_Pd1_Pe0_pUb1 to nucleus_Foxo1_Pa1_Pd1_Pe0_pUb1";
    R156_ktr = 0.125;
  R157: cytoplasm_Foxo1_Pa1_Pd1_Pe1_pUb0 => nucleus_Foxo1_Pa1_Pd1_Pe1_pUb0; function_118(cytoplasm, cytoplasm_Foxo1_Pa1_Pd1_Pe1_pUb0, R157_ktr); R157 is "transport cytoplasm_Foxo1_Pa1_Pd1_Pe1_pUb0 to nucleus_Foxo1_Pa1_Pd1_Pe1_pUb0";
    R157_ktr = 0.09090909;
  R158: nucleus_Foxo1_Pa1_Pd1_Pe1_pUb0 => cytoplasm_Foxo1_Pa1_Pd1_Pe1_pUb0; function_119(R158_ktr, nucleus, nucleus_Foxo1_Pa1_Pd1_Pe1_pUb0); R158 is "transport nucleus_Foxo1_Pa1_Pd1_Pe1_pUb0 to cytoplasm_Foxo1_Pa1_Pd1_Pe1_pUb0";
    R158_ktr = 0.55;
  R159: nucleus_Foxo1_Pa1_Pd1_Pe1_pUb0 => dnabound_Foxo1_Pa1_Pd1_Pe1_pUb0; function_120(R159_ktr, nucleus, nucleus_Foxo1_Pa1_Pd1_Pe1_pUb0); R159 is "transport nucleus_Foxo1_Pa1_Pd1_Pe1_pUb0 to dnabound_Foxo1_Pa1_Pd1_Pe1_pUb0";
    R159_ktr = 0.125;
  R160: dnabound_Foxo1_Pa1_Pd1_Pe1_pUb0 => nucleus_Foxo1_Pa1_Pd1_Pe1_pUb0; function_121(dnabound, dnabound_Foxo1_Pa1_Pd1_Pe1_pUb0, R160_ktr); R160 is "transport dnabound_Foxo1_Pa1_Pd1_Pe1_pUb0 to nucleus_Foxo1_Pa1_Pd1_Pe1_pUb0";
    R160_ktr = 0.125;
  R161: cytoplasm_Foxo1_Pa1_Pd1_Pe1_pUb1 => nucleus_Foxo1_Pa1_Pd1_Pe1_pUb1; function_122(cytoplasm, cytoplasm_Foxo1_Pa1_Pd1_Pe1_pUb1, R161_ktr); R161 is "transport cytoplasm_Foxo1_Pa1_Pd1_Pe1_pUb1 to nucleus_Foxo1_Pa1_Pd1_Pe1_pUb1";
    R161_ktr = 0.09090909;
  R162: nucleus_Foxo1_Pa1_Pd1_Pe1_pUb1 => cytoplasm_Foxo1_Pa1_Pd1_Pe1_pUb1; function_123(R162_ktr, nucleus, nucleus_Foxo1_Pa1_Pd1_Pe1_pUb1); R162 is "transport nucleus_Foxo1_Pa1_Pd1_Pe1_pUb1 to cytoplasm_Foxo1_Pa1_Pd1_Pe1_pUb1";
    R162_ktr = 0.55;
  R163: nucleus_Foxo1_Pa1_Pd1_Pe1_pUb1 => dnabound_Foxo1_Pa1_Pd1_Pe1_pUb1; function_124(R163_ktr, nucleus, nucleus_Foxo1_Pa1_Pd1_Pe1_pUb1); R163 is "transport nucleus_Foxo1_Pa1_Pd1_Pe1_pUb1 to dnabound_Foxo1_Pa1_Pd1_Pe1_pUb1";
    R163_ktr = 0.125;
  R164: dnabound_Foxo1_Pa1_Pd1_Pe1_pUb1 => nucleus_Foxo1_Pa1_Pd1_Pe1_pUb1; function_125(dnabound, dnabound_Foxo1_Pa1_Pd1_Pe1_pUb1, R164_ktr); R164 is "transport dnabound_Foxo1_Pa1_Pd1_Pe1_pUb1 to nucleus_Foxo1_Pa1_Pd1_Pe1_pUb1";
    R164_ktr = 0.125;
  R165: cytoplasm_Foxo1_Pa0_Pd0_Pe0_pUb0 => cytoplasm_Foxo1_Pa1_Pd0_Pe0_pUb0; cytoplasm*function_126(Akt_P2, cytoplasm, cytoplasm_Foxo1_Pa0_Pd0_Pe0_pUb0, R165_kkin); R165 is "conversion of cytoplasm_Foxo1_Pa0_Pd0_Pe0_pUb0 to cytoplasm_Foxo1_Pa1_Pd0_Pe0_pUb0 by Akt_P2";  // modifiers: Akt_P2
    R165_kkin = 0.0003;
  R166: nucleus_Foxo1_Pa0_Pd0_Pe0_pUb0 => nucleus_Foxo1_Pa1_Pd0_Pe0_pUb0; nucleus*function_127(Akt_P2, cytoplasm, R166_kkin, nucleus, nucleus_Foxo1_Pa0_Pd0_Pe0_pUb0); R166 is "conversion of nucleus_Foxo1_Pa0_Pd0_Pe0_pUb0 to nucleus_Foxo1_Pa1_Pd0_Pe0_pUb0 by Akt_P2";  // modifiers: Akt_P2
    R166_kkin = 0.0003;
  R167: dnabound_Foxo1_Pa0_Pd0_Pe0_pUb0 => dnabound_Foxo1_Pa1_Pd0_Pe0_pUb0; dnabound*function_128(Akt_P2, cytoplasm, dnabound, dnabound_Foxo1_Pa0_Pd0_Pe0_pUb0, R167_kkin); R167 is "conversion of dnabound_Foxo1_Pa0_Pd0_Pe0_pUb0 to dnabound_Foxo1_Pa1_Pd0_Pe0_pUb0 by Akt_P2";  // modifiers: Akt_P2
    R167_kkin = 0.0003;
  R168: cytoplasm_Foxo1_Pa0_Pd0_Pe0_pUb1 => cytoplasm_Foxo1_Pa1_Pd0_Pe0_pUb1; cytoplasm*function_129(Akt_P2, cytoplasm, cytoplasm_Foxo1_Pa0_Pd0_Pe0_pUb1, R168_kkin); R168 is "conversion of cytoplasm_Foxo1_Pa0_Pd0_Pe0_pUb1 to cytoplasm_Foxo1_Pa1_Pd0_Pe0_pUb1 by Akt_P2";  // modifiers: Akt_P2
    R168_kkin = 0.0003;
  R169: nucleus_Foxo1_Pa0_Pd0_Pe0_pUb1 => nucleus_Foxo1_Pa1_Pd0_Pe0_pUb1; nucleus*function_130(Akt_P2, cytoplasm, R169_kkin, nucleus, nucleus_Foxo1_Pa0_Pd0_Pe0_pUb1); R169 is "conversion of nucleus_Foxo1_Pa0_Pd0_Pe0_pUb1 to nucleus_Foxo1_Pa1_Pd0_Pe0_pUb1 by Akt_P2";  // modifiers: Akt_P2
    R169_kkin = 0.0003;
  R170: dnabound_Foxo1_Pa0_Pd0_Pe0_pUb1 => dnabound_Foxo1_Pa1_Pd0_Pe0_pUb1; dnabound*function_131(Akt_P2, cytoplasm, dnabound, dnabound_Foxo1_Pa0_Pd0_Pe0_pUb1, R170_kkin); R170 is "conversion of dnabound_Foxo1_Pa0_Pd0_Pe0_pUb1 to dnabound_Foxo1_Pa1_Pd0_Pe0_pUb1 by Akt_P2";  // modifiers: Akt_P2
    R170_kkin = 0.0003;
  R171: cytoplasm_Foxo1_Pa0_Pd0_Pe1_pUb0 => cytoplasm_Foxo1_Pa1_Pd0_Pe1_pUb0; cytoplasm*function_132(Akt_P2, cytoplasm, cytoplasm_Foxo1_Pa0_Pd0_Pe1_pUb0, R171_kkin); R171 is "conversion of cytoplasm_Foxo1_Pa0_Pd0_Pe1_pUb0 to cytoplasm_Foxo1_Pa1_Pd0_Pe1_pUb0 by Akt_P2";  // modifiers: Akt_P2
    R171_kkin = 0.0003;
  R172: nucleus_Foxo1_Pa0_Pd0_Pe1_pUb0 => nucleus_Foxo1_Pa1_Pd0_Pe1_pUb0; nucleus*function_133(Akt_P2, cytoplasm, R172_kkin, nucleus, nucleus_Foxo1_Pa0_Pd0_Pe1_pUb0); R172 is "conversion of nucleus_Foxo1_Pa0_Pd0_Pe1_pUb0 to nucleus_Foxo1_Pa1_Pd0_Pe1_pUb0 by Akt_P2";  // modifiers: Akt_P2
    R172_kkin = 0.0003;
  R173: dnabound_Foxo1_Pa0_Pd0_Pe1_pUb0 => dnabound_Foxo1_Pa1_Pd0_Pe1_pUb0; dnabound*function_134(Akt_P2, cytoplasm, dnabound, dnabound_Foxo1_Pa0_Pd0_Pe1_pUb0, R173_kkin); R173 is "conversion of dnabound_Foxo1_Pa0_Pd0_Pe1_pUb0 to dnabound_Foxo1_Pa1_Pd0_Pe1_pUb0 by Akt_P2";  // modifiers: Akt_P2
    R173_kkin = 0.0003;
  R174: cytoplasm_Foxo1_Pa0_Pd0_Pe1_pUb1 => cytoplasm_Foxo1_Pa1_Pd0_Pe1_pUb1; cytoplasm*function_135(Akt_P2, cytoplasm, cytoplasm_Foxo1_Pa0_Pd0_Pe1_pUb1, R174_kkin); R174 is "conversion of cytoplasm_Foxo1_Pa0_Pd0_Pe1_pUb1 to cytoplasm_Foxo1_Pa1_Pd0_Pe1_pUb1 by Akt_P2";  // modifiers: Akt_P2
    R174_kkin = 0.0003;
  R175: nucleus_Foxo1_Pa0_Pd0_Pe1_pUb1 => nucleus_Foxo1_Pa1_Pd0_Pe1_pUb1; nucleus*function_136(Akt_P2, cytoplasm, R175_kkin, nucleus, nucleus_Foxo1_Pa0_Pd0_Pe1_pUb1); R175 is "conversion of nucleus_Foxo1_Pa0_Pd0_Pe1_pUb1 to nucleus_Foxo1_Pa1_Pd0_Pe1_pUb1 by Akt_P2";  // modifiers: Akt_P2
    R175_kkin = 0.0003;
  R176: dnabound_Foxo1_Pa0_Pd0_Pe1_pUb1 => dnabound_Foxo1_Pa1_Pd0_Pe1_pUb1; dnabound*function_137(Akt_P2, cytoplasm, dnabound, dnabound_Foxo1_Pa0_Pd0_Pe1_pUb1, R176_kkin); R176 is "conversion of dnabound_Foxo1_Pa0_Pd0_Pe1_pUb1 to dnabound_Foxo1_Pa1_Pd0_Pe1_pUb1 by Akt_P2";  // modifiers: Akt_P2
    R176_kkin = 0.0003;
  R177: cytoplasm_Foxo1_Pa0_Pd1_Pe0_pUb0 => cytoplasm_Foxo1_Pa1_Pd1_Pe0_pUb0; cytoplasm*function_138(Akt_P2, cytoplasm, cytoplasm_Foxo1_Pa0_Pd1_Pe0_pUb0, R177_kkin); R177 is "conversion of cytoplasm_Foxo1_Pa0_Pd1_Pe0_pUb0 to cytoplasm_Foxo1_Pa1_Pd1_Pe0_pUb0 by Akt_P2";  // modifiers: Akt_P2
    R177_kkin = 0.0003;
  R178: nucleus_Foxo1_Pa0_Pd1_Pe0_pUb0 => nucleus_Foxo1_Pa1_Pd1_Pe0_pUb0; nucleus*function_139(Akt_P2, cytoplasm, R178_kkin, nucleus, nucleus_Foxo1_Pa0_Pd1_Pe0_pUb0); R178 is "conversion of nucleus_Foxo1_Pa0_Pd1_Pe0_pUb0 to nucleus_Foxo1_Pa1_Pd1_Pe0_pUb0 by Akt_P2";  // modifiers: Akt_P2
    R178_kkin = 0.0003;
  R179: dnabound_Foxo1_Pa0_Pd1_Pe0_pUb0 => dnabound_Foxo1_Pa1_Pd1_Pe0_pUb0; dnabound*function_140(Akt_P2, cytoplasm, dnabound, dnabound_Foxo1_Pa0_Pd1_Pe0_pUb0, R179_kkin); R179 is "conversion of dnabound_Foxo1_Pa0_Pd1_Pe0_pUb0 to dnabound_Foxo1_Pa1_Pd1_Pe0_pUb0 by Akt_P2";  // modifiers: Akt_P2
    R179_kkin = 0.0003;
  R180: cytoplasm_Foxo1_Pa0_Pd1_Pe0_pUb1 => cytoplasm_Foxo1_Pa1_Pd1_Pe0_pUb1; cytoplasm*function_141(Akt_P2, cytoplasm, cytoplasm_Foxo1_Pa0_Pd1_Pe0_pUb1, R180_kkin); R180 is "conversion of cytoplasm_Foxo1_Pa0_Pd1_Pe0_pUb1 to cytoplasm_Foxo1_Pa1_Pd1_Pe0_pUb1 by Akt_P2";  // modifiers: Akt_P2
    R180_kkin = 0.0003;
  R181: nucleus_Foxo1_Pa0_Pd1_Pe0_pUb1 => nucleus_Foxo1_Pa1_Pd1_Pe0_pUb1; nucleus*function_142(Akt_P2, cytoplasm, R181_kkin, nucleus, nucleus_Foxo1_Pa0_Pd1_Pe0_pUb1); R181 is "conversion of nucleus_Foxo1_Pa0_Pd1_Pe0_pUb1 to nucleus_Foxo1_Pa1_Pd1_Pe0_pUb1 by Akt_P2";  // modifiers: Akt_P2
    R181_kkin = 0.0003;
  R182: dnabound_Foxo1_Pa0_Pd1_Pe0_pUb1 => dnabound_Foxo1_Pa1_Pd1_Pe0_pUb1; dnabound*function_143(Akt_P2, cytoplasm, dnabound, dnabound_Foxo1_Pa0_Pd1_Pe0_pUb1, R182_kkin); R182 is "conversion of dnabound_Foxo1_Pa0_Pd1_Pe0_pUb1 to dnabound_Foxo1_Pa1_Pd1_Pe0_pUb1 by Akt_P2";  // modifiers: Akt_P2
    R182_kkin = 0.0003;
  R183: cytoplasm_Foxo1_Pa0_Pd1_Pe1_pUb0 => cytoplasm_Foxo1_Pa1_Pd1_Pe1_pUb0; cytoplasm*function_144(Akt_P2, cytoplasm, cytoplasm_Foxo1_Pa0_Pd1_Pe1_pUb0, R183_kkin); R183 is "conversion of cytoplasm_Foxo1_Pa0_Pd1_Pe1_pUb0 to cytoplasm_Foxo1_Pa1_Pd1_Pe1_pUb0 by Akt_P2";  // modifiers: Akt_P2
    R183_kkin = 0.0003;
  R184: nucleus_Foxo1_Pa0_Pd1_Pe1_pUb0 => nucleus_Foxo1_Pa1_Pd1_Pe1_pUb0; nucleus*function_145(Akt_P2, cytoplasm, R184_kkin, nucleus, nucleus_Foxo1_Pa0_Pd1_Pe1_pUb0); R184 is "conversion of nucleus_Foxo1_Pa0_Pd1_Pe1_pUb0 to nucleus_Foxo1_Pa1_Pd1_Pe1_pUb0 by Akt_P2";  // modifiers: Akt_P2
    R184_kkin = 0.0003;
  R185: dnabound_Foxo1_Pa0_Pd1_Pe1_pUb0 => dnabound_Foxo1_Pa1_Pd1_Pe1_pUb0; dnabound*function_146(Akt_P2, cytoplasm, dnabound, dnabound_Foxo1_Pa0_Pd1_Pe1_pUb0, R185_kkin); R185 is "conversion of dnabound_Foxo1_Pa0_Pd1_Pe1_pUb0 to dnabound_Foxo1_Pa1_Pd1_Pe1_pUb0 by Akt_P2";  // modifiers: Akt_P2
    R185_kkin = 0.0003;
  R186: cytoplasm_Foxo1_Pa0_Pd1_Pe1_pUb1 => cytoplasm_Foxo1_Pa1_Pd1_Pe1_pUb1; cytoplasm*function_147(Akt_P2, cytoplasm, cytoplasm_Foxo1_Pa0_Pd1_Pe1_pUb1, R186_kkin); R186 is "conversion of cytoplasm_Foxo1_Pa0_Pd1_Pe1_pUb1 to cytoplasm_Foxo1_Pa1_Pd1_Pe1_pUb1 by Akt_P2";  // modifiers: Akt_P2
    R186_kkin = 0.0003;
  R187: nucleus_Foxo1_Pa0_Pd1_Pe1_pUb1 => nucleus_Foxo1_Pa1_Pd1_Pe1_pUb1; nucleus*function_148(Akt_P2, cytoplasm, R187_kkin, nucleus, nucleus_Foxo1_Pa0_Pd1_Pe1_pUb1); R187 is "conversion of nucleus_Foxo1_Pa0_Pd1_Pe1_pUb1 to nucleus_Foxo1_Pa1_Pd1_Pe1_pUb1 by Akt_P2";  // modifiers: Akt_P2
    R187_kkin = 0.0003;
  R188: dnabound_Foxo1_Pa0_Pd1_Pe1_pUb1 => dnabound_Foxo1_Pa1_Pd1_Pe1_pUb1; dnabound*function_149(Akt_P2, cytoplasm, dnabound, dnabound_Foxo1_Pa0_Pd1_Pe1_pUb1, R188_kkin); R188 is "conversion of dnabound_Foxo1_Pa0_Pd1_Pe1_pUb1 to dnabound_Foxo1_Pa1_Pd1_Pe1_pUb1 by Akt_P2";  // modifiers: Akt_P2
    R188_kkin = 0.0003;
  R189: cytoplasm_Foxo1_Pa0_Pd0_Pe0_pUb0 => cytoplasm_Foxo1_Pa1_Pd0_Pe0_pUb0; cytoplasm*function_150(SGK, cytoplasm, cytoplasm_Foxo1_Pa0_Pd0_Pe0_pUb0, R189_kkin); R189 is "conversion of cytoplasm_Foxo1_Pa0_Pd0_Pe0_pUb0 to cytoplasm_Foxo1_Pa1_Pd0_Pe0_pUb0 by SGK";  // modifiers: SGK
    R189_kkin = 0.0003;
  R190: nucleus_Foxo1_Pa0_Pd0_Pe0_pUb0 => nucleus_Foxo1_Pa1_Pd0_Pe0_pUb0; nucleus*function_151(SGK, cytoplasm, R190_kkin, nucleus, nucleus_Foxo1_Pa0_Pd0_Pe0_pUb0); R190 is "conversion of nucleus_Foxo1_Pa0_Pd0_Pe0_pUb0 to nucleus_Foxo1_Pa1_Pd0_Pe0_pUb0 by SGK";  // modifiers: SGK
    R190_kkin = 0.0003;
  R191: dnabound_Foxo1_Pa0_Pd0_Pe0_pUb0 => dnabound_Foxo1_Pa1_Pd0_Pe0_pUb0; dnabound*function_152(SGK, cytoplasm, dnabound, dnabound_Foxo1_Pa0_Pd0_Pe0_pUb0, R191_kkin); R191 is "conversion of dnabound_Foxo1_Pa0_Pd0_Pe0_pUb0 to dnabound_Foxo1_Pa1_Pd0_Pe0_pUb0 by SGK";  // modifiers: SGK
    R191_kkin = 0.0003;
  R192: cytoplasm_Foxo1_Pa0_Pd0_Pe0_pUb1 => cytoplasm_Foxo1_Pa1_Pd0_Pe0_pUb1; cytoplasm*function_153(SGK, cytoplasm, cytoplasm_Foxo1_Pa0_Pd0_Pe0_pUb1, R192_kkin); R192 is "conversion of cytoplasm_Foxo1_Pa0_Pd0_Pe0_pUb1 to cytoplasm_Foxo1_Pa1_Pd0_Pe0_pUb1 by SGK";  // modifiers: SGK
    R192_kkin = 0.0003;
  R193: nucleus_Foxo1_Pa0_Pd0_Pe0_pUb1 => nucleus_Foxo1_Pa1_Pd0_Pe0_pUb1; nucleus*function_154(SGK, cytoplasm, R193_kkin, nucleus, nucleus_Foxo1_Pa0_Pd0_Pe0_pUb1); R193 is "conversion of nucleus_Foxo1_Pa0_Pd0_Pe0_pUb1 to nucleus_Foxo1_Pa1_Pd0_Pe0_pUb1 by SGK";  // modifiers: SGK
    R193_kkin = 0.0003;
  R194: dnabound_Foxo1_Pa0_Pd0_Pe0_pUb1 => dnabound_Foxo1_Pa1_Pd0_Pe0_pUb1; dnabound*function_155(SGK, cytoplasm, dnabound, dnabound_Foxo1_Pa0_Pd0_Pe0_pUb1, R194_kkin); R194 is "conversion of dnabound_Foxo1_Pa0_Pd0_Pe0_pUb1 to dnabound_Foxo1_Pa1_Pd0_Pe0_pUb1 by SGK";  // modifiers: SGK
    R194_kkin = 0.0003;
  R195: cytoplasm_Foxo1_Pa0_Pd0_Pe1_pUb0 => cytoplasm_Foxo1_Pa1_Pd0_Pe1_pUb0; cytoplasm*function_156(SGK, cytoplasm, cytoplasm_Foxo1_Pa0_Pd0_Pe1_pUb0, R195_kkin); R195 is "conversion of cytoplasm_Foxo1_Pa0_Pd0_Pe1_pUb0 to cytoplasm_Foxo1_Pa1_Pd0_Pe1_pUb0 by SGK";  // modifiers: SGK
    R195_kkin = 0.0003;
  R196: nucleus_Foxo1_Pa0_Pd0_Pe1_pUb0 => nucleus_Foxo1_Pa1_Pd0_Pe1_pUb0; nucleus*function_157(SGK, cytoplasm, R196_kkin, nucleus, nucleus_Foxo1_Pa0_Pd0_Pe1_pUb0); R196 is "conversion of nucleus_Foxo1_Pa0_Pd0_Pe1_pUb0 to nucleus_Foxo1_Pa1_Pd0_Pe1_pUb0 by SGK";  // modifiers: SGK
    R196_kkin = 0.0003;
  R197: dnabound_Foxo1_Pa0_Pd0_Pe1_pUb0 => dnabound_Foxo1_Pa1_Pd0_Pe1_pUb0; dnabound*function_158(SGK, cytoplasm, dnabound, dnabound_Foxo1_Pa0_Pd0_Pe1_pUb0, R197_kkin); R197 is "conversion of dnabound_Foxo1_Pa0_Pd0_Pe1_pUb0 to dnabound_Foxo1_Pa1_Pd0_Pe1_pUb0 by SGK";  // modifiers: SGK
    R197_kkin = 0.0003;
  R198: cytoplasm_Foxo1_Pa0_Pd0_Pe1_pUb1 => cytoplasm_Foxo1_Pa1_Pd0_Pe1_pUb1; cytoplasm*function_159(SGK, cytoplasm, cytoplasm_Foxo1_Pa0_Pd0_Pe1_pUb1, R198_kkin); R198 is "conversion of cytoplasm_Foxo1_Pa0_Pd0_Pe1_pUb1 to cytoplasm_Foxo1_Pa1_Pd0_Pe1_pUb1 by SGK";  // modifiers: SGK
    R198_kkin = 0.0003;
  R199: nucleus_Foxo1_Pa0_Pd0_Pe1_pUb1 => nucleus_Foxo1_Pa1_Pd0_Pe1_pUb1; nucleus*function_160(SGK, cytoplasm, R199_kkin, nucleus, nucleus_Foxo1_Pa0_Pd0_Pe1_pUb1); R199 is "conversion of nucleus_Foxo1_Pa0_Pd0_Pe1_pUb1 to nucleus_Foxo1_Pa1_Pd0_Pe1_pUb1 by SGK";  // modifiers: SGK
    R199_kkin = 0.0003;
  R200: dnabound_Foxo1_Pa0_Pd0_Pe1_pUb1 => dnabound_Foxo1_Pa1_Pd0_Pe1_pUb1; dnabound*function_161(SGK, cytoplasm, dnabound, dnabound_Foxo1_Pa0_Pd0_Pe1_pUb1, R200_kkin); R200 is "conversion of dnabound_Foxo1_Pa0_Pd0_Pe1_pUb1 to dnabound_Foxo1_Pa1_Pd0_Pe1_pUb1 by SGK";  // modifiers: SGK
    R200_kkin = 0.0003;
  R201: cytoplasm_Foxo1_Pa0_Pd1_Pe0_pUb0 => cytoplasm_Foxo1_Pa1_Pd1_Pe0_pUb0; cytoplasm*function_162(SGK, cytoplasm, cytoplasm_Foxo1_Pa0_Pd1_Pe0_pUb0, R201_kkin); R201 is "conversion of cytoplasm_Foxo1_Pa0_Pd1_Pe0_pUb0 to cytoplasm_Foxo1_Pa1_Pd1_Pe0_pUb0 by SGK";  // modifiers: SGK
    R201_kkin = 0.0003;
  R202: nucleus_Foxo1_Pa0_Pd1_Pe0_pUb0 => nucleus_Foxo1_Pa1_Pd1_Pe0_pUb0; nucleus*function_163(SGK, cytoplasm, R202_kkin, nucleus, nucleus_Foxo1_Pa0_Pd1_Pe0_pUb0); R202 is "conversion of nucleus_Foxo1_Pa0_Pd1_Pe0_pUb0 to nucleus_Foxo1_Pa1_Pd1_Pe0_pUb0 by SGK";  // modifiers: SGK
    R202_kkin = 0.0003;
  R203: dnabound_Foxo1_Pa0_Pd1_Pe0_pUb0 => dnabound_Foxo1_Pa1_Pd1_Pe0_pUb0; dnabound*function_164(SGK, cytoplasm, dnabound, dnabound_Foxo1_Pa0_Pd1_Pe0_pUb0, R203_kkin); R203 is "conversion of dnabound_Foxo1_Pa0_Pd1_Pe0_pUb0 to dnabound_Foxo1_Pa1_Pd1_Pe0_pUb0 by SGK";  // modifiers: SGK
    R203_kkin = 0.0003;
  R204: cytoplasm_Foxo1_Pa0_Pd1_Pe0_pUb1 => cytoplasm_Foxo1_Pa1_Pd1_Pe0_pUb1; cytoplasm*function_165(SGK, cytoplasm, cytoplasm_Foxo1_Pa0_Pd1_Pe0_pUb1, R204_kkin); R204 is "conversion of cytoplasm_Foxo1_Pa0_Pd1_Pe0_pUb1 to cytoplasm_Foxo1_Pa1_Pd1_Pe0_pUb1 by SGK";  // modifiers: SGK
    R204_kkin = 0.0003;
  R205: nucleus_Foxo1_Pa0_Pd1_Pe0_pUb1 => nucleus_Foxo1_Pa1_Pd1_Pe0_pUb1; nucleus*function_166(SGK, cytoplasm, R205_kkin, nucleus, nucleus_Foxo1_Pa0_Pd1_Pe0_pUb1); R205 is "conversion of nucleus_Foxo1_Pa0_Pd1_Pe0_pUb1 to nucleus_Foxo1_Pa1_Pd1_Pe0_pUb1 by SGK";  // modifiers: SGK
    R205_kkin = 0.0003;
  R206: dnabound_Foxo1_Pa0_Pd1_Pe0_pUb1 => dnabound_Foxo1_Pa1_Pd1_Pe0_pUb1; dnabound*function_167(SGK, cytoplasm, dnabound, dnabound_Foxo1_Pa0_Pd1_Pe0_pUb1, R206_kkin); R206 is "conversion of dnabound_Foxo1_Pa0_Pd1_Pe0_pUb1 to dnabound_Foxo1_Pa1_Pd1_Pe0_pUb1 by SGK";  // modifiers: SGK
    R206_kkin = 0.0003;
  R207: cytoplasm_Foxo1_Pa0_Pd1_Pe1_pUb0 => cytoplasm_Foxo1_Pa1_Pd1_Pe1_pUb0; cytoplasm*function_168(SGK, cytoplasm, cytoplasm_Foxo1_Pa0_Pd1_Pe1_pUb0, R207_kkin); R207 is "conversion of cytoplasm_Foxo1_Pa0_Pd1_Pe1_pUb0 to cytoplasm_Foxo1_Pa1_Pd1_Pe1_pUb0 by SGK";  // modifiers: SGK
    R207_kkin = 0.0003;
  R208: nucleus_Foxo1_Pa0_Pd1_Pe1_pUb0 => nucleus_Foxo1_Pa1_Pd1_Pe1_pUb0; nucleus*function_169(SGK, cytoplasm, R208_kkin, nucleus, nucleus_Foxo1_Pa0_Pd1_Pe1_pUb0); R208 is "conversion of nucleus_Foxo1_Pa0_Pd1_Pe1_pUb0 to nucleus_Foxo1_Pa1_Pd1_Pe1_pUb0 by SGK";  // modifiers: SGK
    R208_kkin = 0.0003;
  R209: dnabound_Foxo1_Pa0_Pd1_Pe1_pUb0 => dnabound_Foxo1_Pa1_Pd1_Pe1_pUb0; dnabound*function_170(SGK, cytoplasm, dnabound, dnabound_Foxo1_Pa0_Pd1_Pe1_pUb0, R209_kkin); R209 is "conversion of dnabound_Foxo1_Pa0_Pd1_Pe1_pUb0 to dnabound_Foxo1_Pa1_Pd1_Pe1_pUb0 by SGK";  // modifiers: SGK
    R209_kkin = 0.0003;
  R210: cytoplasm_Foxo1_Pa0_Pd1_Pe1_pUb1 => cytoplasm_Foxo1_Pa1_Pd1_Pe1_pUb1; cytoplasm*function_171(SGK, cytoplasm, cytoplasm_Foxo1_Pa0_Pd1_Pe1_pUb1, R210_kkin); R210 is "conversion of cytoplasm_Foxo1_Pa0_Pd1_Pe1_pUb1 to cytoplasm_Foxo1_Pa1_Pd1_Pe1_pUb1 by SGK";  // modifiers: SGK
    R210_kkin = 0.0003;
  R211: nucleus_Foxo1_Pa0_Pd1_Pe1_pUb1 => nucleus_Foxo1_Pa1_Pd1_Pe1_pUb1; nucleus*function_172(SGK, cytoplasm, R211_kkin, nucleus, nucleus_Foxo1_Pa0_Pd1_Pe1_pUb1); R211 is "conversion of nucleus_Foxo1_Pa0_Pd1_Pe1_pUb1 to nucleus_Foxo1_Pa1_Pd1_Pe1_pUb1 by SGK";  // modifiers: SGK
    R211_kkin = 0.0003;
  R212: dnabound_Foxo1_Pa0_Pd1_Pe1_pUb1 => dnabound_Foxo1_Pa1_Pd1_Pe1_pUb1; dnabound*function_173(SGK, cytoplasm, dnabound, dnabound_Foxo1_Pa0_Pd1_Pe1_pUb1, R212_kkin); R212 is "conversion of dnabound_Foxo1_Pa0_Pd1_Pe1_pUb1 to dnabound_Foxo1_Pa1_Pd1_Pe1_pUb1 by SGK";  // modifiers: SGK
    R212_kkin = 0.0003;
  R213: cytoplasm_Foxo1_Pa1_Pd0_Pe0_pUb0 => cytoplasm_Foxo1_Pa0_Pd0_Pe0_pUb0; cytoplasm*function_174(PP2A, cytoplasm, cytoplasm_Foxo1_Pa1_Pd0_Pe0_pUb0, R213_kdephos); R213 is "conversion of cytoplasm_Foxo1_Pa1_Pd0_Pe0_pUb0 to cytoplasm_Foxo1_Pa0_Pd0_Pe0_pUb0 by PP2A";  // modifiers: PP2A
    R213_kdephos = 1e-6;
  R214: nucleus_Foxo1_Pa1_Pd0_Pe0_pUb0 => nucleus_Foxo1_Pa0_Pd0_Pe0_pUb0; nucleus*function_175(PP2A, cytoplasm, R214_kdephos, nucleus, nucleus_Foxo1_Pa1_Pd0_Pe0_pUb0); R214 is "conversion of nucleus_Foxo1_Pa1_Pd0_Pe0_pUb0 to nucleus_Foxo1_Pa0_Pd0_Pe0_pUb0 by PP2A";  // modifiers: PP2A
    R214_kdephos = 1e-6;
  R215: dnabound_Foxo1_Pa1_Pd0_Pe0_pUb0 => dnabound_Foxo1_Pa0_Pd0_Pe0_pUb0; dnabound*function_176(PP2A, cytoplasm, dnabound, dnabound_Foxo1_Pa1_Pd0_Pe0_pUb0, R215_kdephos); R215 is "conversion of dnabound_Foxo1_Pa1_Pd0_Pe0_pUb0 to dnabound_Foxo1_Pa0_Pd0_Pe0_pUb0 by PP2A";  // modifiers: PP2A
    R215_kdephos = 1e-6;
  R216: cytoplasm_Foxo1_Pa1_Pd0_Pe0_pUb1 => cytoplasm_Foxo1_Pa0_Pd0_Pe0_pUb1; cytoplasm*function_177(PP2A, cytoplasm, cytoplasm_Foxo1_Pa1_Pd0_Pe0_pUb1, R216_kdephos); R216 is "conversion of cytoplasm_Foxo1_Pa1_Pd0_Pe0_pUb1 to cytoplasm_Foxo1_Pa0_Pd0_Pe0_pUb1 by PP2A";  // modifiers: PP2A
    R216_kdephos = 1e-6;
  R217: nucleus_Foxo1_Pa1_Pd0_Pe0_pUb1 => nucleus_Foxo1_Pa0_Pd0_Pe0_pUb1; nucleus*function_178(PP2A, cytoplasm, R217_kdephos, nucleus, nucleus_Foxo1_Pa1_Pd0_Pe0_pUb1); R217 is "conversion of nucleus_Foxo1_Pa1_Pd0_Pe0_pUb1 to nucleus_Foxo1_Pa0_Pd0_Pe0_pUb1 by PP2A";  // modifiers: PP2A
    R217_kdephos = 1e-6;
  R218: dnabound_Foxo1_Pa1_Pd0_Pe0_pUb1 => dnabound_Foxo1_Pa0_Pd0_Pe0_pUb1; dnabound*function_179(PP2A, cytoplasm, dnabound, dnabound_Foxo1_Pa1_Pd0_Pe0_pUb1, R218_kdephos); R218 is "conversion of dnabound_Foxo1_Pa1_Pd0_Pe0_pUb1 to dnabound_Foxo1_Pa0_Pd0_Pe0_pUb1 by PP2A";  // modifiers: PP2A
    R218_kdephos = 1e-6;
  R219: cytoplasm_Foxo1_Pa1_Pd0_Pe1_pUb0 => cytoplasm_Foxo1_Pa0_Pd0_Pe1_pUb0; cytoplasm*function_180(PP2A, cytoplasm, cytoplasm_Foxo1_Pa1_Pd0_Pe1_pUb0, R219_kdephos); R219 is "conversion of cytoplasm_Foxo1_Pa1_Pd0_Pe1_pUb0 to cytoplasm_Foxo1_Pa0_Pd0_Pe1_pUb0 by PP2A";  // modifiers: PP2A
    R219_kdephos = 1e-6;
  R220: nucleus_Foxo1_Pa1_Pd0_Pe1_pUb0 => nucleus_Foxo1_Pa0_Pd0_Pe1_pUb0; nucleus*function_181(PP2A, cytoplasm, R220_kdephos, nucleus, nucleus_Foxo1_Pa1_Pd0_Pe1_pUb0); R220 is "conversion of nucleus_Foxo1_Pa1_Pd0_Pe1_pUb0 to nucleus_Foxo1_Pa0_Pd0_Pe1_pUb0 by PP2A";  // modifiers: PP2A
    R220_kdephos = 1e-6;
  R221: dnabound_Foxo1_Pa1_Pd0_Pe1_pUb0 => dnabound_Foxo1_Pa0_Pd0_Pe1_pUb0; dnabound*function_182(PP2A, cytoplasm, dnabound, dnabound_Foxo1_Pa1_Pd0_Pe1_pUb0, R221_kdephos); R221 is "conversion of dnabound_Foxo1_Pa1_Pd0_Pe1_pUb0 to dnabound_Foxo1_Pa0_Pd0_Pe1_pUb0 by PP2A";  // modifiers: PP2A
    R221_kdephos = 1e-6;
  R222: cytoplasm_Foxo1_Pa1_Pd0_Pe1_pUb1 => cytoplasm_Foxo1_Pa0_Pd0_Pe1_pUb1; cytoplasm*function_183(PP2A, cytoplasm, cytoplasm_Foxo1_Pa1_Pd0_Pe1_pUb1, R222_kdephos); R222 is "conversion of cytoplasm_Foxo1_Pa1_Pd0_Pe1_pUb1 to cytoplasm_Foxo1_Pa0_Pd0_Pe1_pUb1 by PP2A";  // modifiers: PP2A
    R222_kdephos = 1e-6;
  R223: nucleus_Foxo1_Pa1_Pd0_Pe1_pUb1 => nucleus_Foxo1_Pa0_Pd0_Pe1_pUb1; nucleus*function_184(PP2A, cytoplasm, R223_kdephos, nucleus, nucleus_Foxo1_Pa1_Pd0_Pe1_pUb1); R223 is "conversion of nucleus_Foxo1_Pa1_Pd0_Pe1_pUb1 to nucleus_Foxo1_Pa0_Pd0_Pe1_pUb1 by PP2A";  // modifiers: PP2A
    R223_kdephos = 1e-6;
  R224: dnabound_Foxo1_Pa1_Pd0_Pe1_pUb1 => dnabound_Foxo1_Pa0_Pd0_Pe1_pUb1; dnabound*function_185(PP2A, cytoplasm, dnabound, dnabound_Foxo1_Pa1_Pd0_Pe1_pUb1, R224_kdephos); R224 is "conversion of dnabound_Foxo1_Pa1_Pd0_Pe1_pUb1 to dnabound_Foxo1_Pa0_Pd0_Pe1_pUb1 by PP2A";  // modifiers: PP2A
    R224_kdephos = 1e-6;
  R225: cytoplasm_Foxo1_Pa1_Pd1_Pe0_pUb0 => cytoplasm_Foxo1_Pa0_Pd1_Pe0_pUb0; cytoplasm*function_186(PP2A, cytoplasm, cytoplasm_Foxo1_Pa1_Pd1_Pe0_pUb0, R225_kdephos); R225 is "conversion of cytoplasm_Foxo1_Pa1_Pd1_Pe0_pUb0 to cytoplasm_Foxo1_Pa0_Pd1_Pe0_pUb0 by PP2A";  // modifiers: PP2A
    R225_kdephos = 1e-6;
  R226: nucleus_Foxo1_Pa1_Pd1_Pe0_pUb0 => nucleus_Foxo1_Pa0_Pd1_Pe0_pUb0; nucleus*function_187(PP2A, cytoplasm, R226_kdephos, nucleus, nucleus_Foxo1_Pa1_Pd1_Pe0_pUb0); R226 is "conversion of nucleus_Foxo1_Pa1_Pd1_Pe0_pUb0 to nucleus_Foxo1_Pa0_Pd1_Pe0_pUb0 by PP2A";  // modifiers: PP2A
    R226_kdephos = 1e-6;
  R227: dnabound_Foxo1_Pa1_Pd1_Pe0_pUb0 => dnabound_Foxo1_Pa0_Pd1_Pe0_pUb0; dnabound*function_188(PP2A, cytoplasm, dnabound, dnabound_Foxo1_Pa1_Pd1_Pe0_pUb0, R227_kdephos); R227 is "conversion of dnabound_Foxo1_Pa1_Pd1_Pe0_pUb0 to dnabound_Foxo1_Pa0_Pd1_Pe0_pUb0 by PP2A";  // modifiers: PP2A
    R227_kdephos = 1e-6;
  R228: cytoplasm_Foxo1_Pa1_Pd1_Pe0_pUb1 => cytoplasm_Foxo1_Pa0_Pd1_Pe0_pUb1; cytoplasm*function_189(PP2A, cytoplasm, cytoplasm_Foxo1_Pa1_Pd1_Pe0_pUb1, R228_kdephos); R228 is "conversion of cytoplasm_Foxo1_Pa1_Pd1_Pe0_pUb1 to cytoplasm_Foxo1_Pa0_Pd1_Pe0_pUb1 by PP2A";  // modifiers: PP2A
    R228_kdephos = 1e-6;
  R229: nucleus_Foxo1_Pa1_Pd1_Pe0_pUb1 => nucleus_Foxo1_Pa0_Pd1_Pe0_pUb1; nucleus*function_190(PP2A, cytoplasm, R229_kdephos, nucleus, nucleus_Foxo1_Pa1_Pd1_Pe0_pUb1); R229 is "conversion of nucleus_Foxo1_Pa1_Pd1_Pe0_pUb1 to nucleus_Foxo1_Pa0_Pd1_Pe0_pUb1 by PP2A";  // modifiers: PP2A
    R229_kdephos = 1e-6;
  R230: dnabound_Foxo1_Pa1_Pd1_Pe0_pUb1 => dnabound_Foxo1_Pa0_Pd1_Pe0_pUb1; dnabound*function_191(PP2A, cytoplasm, dnabound, dnabound_Foxo1_Pa1_Pd1_Pe0_pUb1, R230_kdephos); R230 is "conversion of dnabound_Foxo1_Pa1_Pd1_Pe0_pUb1 to dnabound_Foxo1_Pa0_Pd1_Pe0_pUb1 by PP2A";  // modifiers: PP2A
    R230_kdephos = 1e-6;
  R231: cytoplasm_Foxo1_Pa1_Pd1_Pe1_pUb0 => cytoplasm_Foxo1_Pa0_Pd1_Pe1_pUb0; cytoplasm*function_192(PP2A, cytoplasm, cytoplasm_Foxo1_Pa1_Pd1_Pe1_pUb0, R231_kdephos); R231 is "conversion of cytoplasm_Foxo1_Pa1_Pd1_Pe1_pUb0 to cytoplasm_Foxo1_Pa0_Pd1_Pe1_pUb0 by PP2A";  // modifiers: PP2A
    R231_kdephos = 1e-6;
  R232: nucleus_Foxo1_Pa1_Pd1_Pe1_pUb0 => nucleus_Foxo1_Pa0_Pd1_Pe1_pUb0; nucleus*function_193(PP2A, cytoplasm, R232_kdephos, nucleus, nucleus_Foxo1_Pa1_Pd1_Pe1_pUb0); R232 is "conversion of nucleus_Foxo1_Pa1_Pd1_Pe1_pUb0 to nucleus_Foxo1_Pa0_Pd1_Pe1_pUb0 by PP2A";  // modifiers: PP2A
    R232_kdephos = 1e-6;
  R233: dnabound_Foxo1_Pa1_Pd1_Pe1_pUb0 => dnabound_Foxo1_Pa0_Pd1_Pe1_pUb0; dnabound*function_194(PP2A, cytoplasm, dnabound, dnabound_Foxo1_Pa1_Pd1_Pe1_pUb0, R233_kdephos); R233 is "conversion of dnabound_Foxo1_Pa1_Pd1_Pe1_pUb0 to dnabound_Foxo1_Pa0_Pd1_Pe1_pUb0 by PP2A";  // modifiers: PP2A
    R233_kdephos = 1e-6;
  R234: cytoplasm_Foxo1_Pa1_Pd1_Pe1_pUb1 => cytoplasm_Foxo1_Pa0_Pd1_Pe1_pUb1; cytoplasm*function_195(PP2A, cytoplasm, cytoplasm_Foxo1_Pa1_Pd1_Pe1_pUb1, R234_kdephos); R234 is "conversion of cytoplasm_Foxo1_Pa1_Pd1_Pe1_pUb1 to cytoplasm_Foxo1_Pa0_Pd1_Pe1_pUb1 by PP2A";  // modifiers: PP2A
    R234_kdephos = 1e-6;
  R235: nucleus_Foxo1_Pa1_Pd1_Pe1_pUb1 => nucleus_Foxo1_Pa0_Pd1_Pe1_pUb1; nucleus*function_196(PP2A, cytoplasm, R235_kdephos, nucleus, nucleus_Foxo1_Pa1_Pd1_Pe1_pUb1); R235 is "conversion of nucleus_Foxo1_Pa1_Pd1_Pe1_pUb1 to nucleus_Foxo1_Pa0_Pd1_Pe1_pUb1 by PP2A";  // modifiers: PP2A
    R235_kdephos = 1e-6;
  R236: dnabound_Foxo1_Pa1_Pd1_Pe1_pUb1 => dnabound_Foxo1_Pa0_Pd1_Pe1_pUb1; dnabound*function_197(PP2A, cytoplasm, dnabound, dnabound_Foxo1_Pa1_Pd1_Pe1_pUb1, R236_kdephos); R236 is "conversion of dnabound_Foxo1_Pa1_Pd1_Pe1_pUb1 to dnabound_Foxo1_Pa0_Pd1_Pe1_pUb1 by PP2A";  // modifiers: PP2A
    R236_kdephos = 1e-6;
  R237: cytoplasm_Foxo1_Pa0_Pd0_Pe0_pUb0 => cytoplasm_Foxo1_Pa0_Pd1_Pe0_pUb0; cytoplasm*function_198(IKK_P, by_ikk_phos_factor, cytoplasm, cytoplasm_Foxo1_Pa0_Pd0_Pe0_pUb0, R237_kkin); R237 is "conversion of cytoplasm_Foxo1_Pa0_Pd0_Pe0_pUb0 to cytoplasm_Foxo1_Pa0_Pd1_Pe0_pUb0 by IKK_P";  // modifiers: IKK_P
    R237_kkin = 5e-5;
  R238: nucleus_Foxo1_Pa0_Pd0_Pe0_pUb0 => nucleus_Foxo1_Pa0_Pd1_Pe0_pUb0; nucleus*function_199(IKK_P, by_ikk_phos_factor, cytoplasm, R238_kkin, nucleus, nucleus_Foxo1_Pa0_Pd0_Pe0_pUb0); R238 is "conversion of nucleus_Foxo1_Pa0_Pd0_Pe0_pUb0 to nucleus_Foxo1_Pa0_Pd1_Pe0_pUb0 by IKK_P";  // modifiers: IKK_P
    R238_kkin = 5e-5;
  R239: dnabound_Foxo1_Pa0_Pd0_Pe0_pUb0 => dnabound_Foxo1_Pa0_Pd1_Pe0_pUb0; dnabound*function_200(IKK_P, by_ikk_phos_factor, cytoplasm, dnabound, dnabound_Foxo1_Pa0_Pd0_Pe0_pUb0, R239_kkin); R239 is "conversion of dnabound_Foxo1_Pa0_Pd0_Pe0_pUb0 to dnabound_Foxo1_Pa0_Pd1_Pe0_pUb0 by IKK_P";  // modifiers: IKK_P
    R239_kkin = 5e-5;
  R240: cytoplasm_Foxo1_Pa0_Pd0_Pe0_pUb1 => cytoplasm_Foxo1_Pa0_Pd1_Pe0_pUb1; cytoplasm*function_201(IKK_P, by_ikk_phos_factor, cytoplasm, cytoplasm_Foxo1_Pa0_Pd0_Pe0_pUb1, R240_kkin); R240 is "conversion of cytoplasm_Foxo1_Pa0_Pd0_Pe0_pUb1 to cytoplasm_Foxo1_Pa0_Pd1_Pe0_pUb1 by IKK_P";  // modifiers: IKK_P
    R240_kkin = 5e-5;
  R241: nucleus_Foxo1_Pa0_Pd0_Pe0_pUb1 => nucleus_Foxo1_Pa0_Pd1_Pe0_pUb1; nucleus*function_202(IKK_P, by_ikk_phos_factor, cytoplasm, R241_kkin, nucleus, nucleus_Foxo1_Pa0_Pd0_Pe0_pUb1); R241 is "conversion of nucleus_Foxo1_Pa0_Pd0_Pe0_pUb1 to nucleus_Foxo1_Pa0_Pd1_Pe0_pUb1 by IKK_P";  // modifiers: IKK_P
    R241_kkin = 5e-5;
  R242: dnabound_Foxo1_Pa0_Pd0_Pe0_pUb1 => dnabound_Foxo1_Pa0_Pd1_Pe0_pUb1; dnabound*function_203(IKK_P, by_ikk_phos_factor, cytoplasm, dnabound, dnabound_Foxo1_Pa0_Pd0_Pe0_pUb1, R242_kkin); R242 is "conversion of dnabound_Foxo1_Pa0_Pd0_Pe0_pUb1 to dnabound_Foxo1_Pa0_Pd1_Pe0_pUb1 by IKK_P";  // modifiers: IKK_P
    R242_kkin = 5e-5;
  R243: cytoplasm_Foxo1_Pa0_Pd0_Pe1_pUb0 => cytoplasm_Foxo1_Pa0_Pd1_Pe1_pUb0; cytoplasm*function_204(IKK_P, by_ikk_phos_factor, cytoplasm, cytoplasm_Foxo1_Pa0_Pd0_Pe1_pUb0, R243_kkin); R243 is "conversion of cytoplasm_Foxo1_Pa0_Pd0_Pe1_pUb0 to cytoplasm_Foxo1_Pa0_Pd1_Pe1_pUb0 by IKK_P";  // modifiers: IKK_P
    R243_kkin = 5e-5;
  R244: nucleus_Foxo1_Pa0_Pd0_Pe1_pUb0 => nucleus_Foxo1_Pa0_Pd1_Pe1_pUb0; nucleus*function_205(IKK_P, by_ikk_phos_factor, cytoplasm, R244_kkin, nucleus, nucleus_Foxo1_Pa0_Pd0_Pe1_pUb0); R244 is "conversion of nucleus_Foxo1_Pa0_Pd0_Pe1_pUb0 to nucleus_Foxo1_Pa0_Pd1_Pe1_pUb0 by IKK_P";  // modifiers: IKK_P
    R244_kkin = 5e-5;
  R245: dnabound_Foxo1_Pa0_Pd0_Pe1_pUb0 => dnabound_Foxo1_Pa0_Pd1_Pe1_pUb0; dnabound*function_206(IKK_P, by_ikk_phos_factor, cytoplasm, dnabound, dnabound_Foxo1_Pa0_Pd0_Pe1_pUb0, R245_kkin); R245 is "conversion of dnabound_Foxo1_Pa0_Pd0_Pe1_pUb0 to dnabound_Foxo1_Pa0_Pd1_Pe1_pUb0 by IKK_P";  // modifiers: IKK_P
    R245_kkin = 5e-5;
  R246: cytoplasm_Foxo1_Pa0_Pd0_Pe1_pUb1 => cytoplasm_Foxo1_Pa0_Pd1_Pe1_pUb1; cytoplasm*function_207(IKK_P, by_ikk_phos_factor, cytoplasm, cytoplasm_Foxo1_Pa0_Pd0_Pe1_pUb1, R246_kkin); R246 is "conversion of cytoplasm_Foxo1_Pa0_Pd0_Pe1_pUb1 to cytoplasm_Foxo1_Pa0_Pd1_Pe1_pUb1 by IKK_P";  // modifiers: IKK_P
    R246_kkin = 5e-5;
  R247: nucleus_Foxo1_Pa0_Pd0_Pe1_pUb1 => nucleus_Foxo1_Pa0_Pd1_Pe1_pUb1; nucleus*function_208(IKK_P, by_ikk_phos_factor, cytoplasm, R247_kkin, nucleus, nucleus_Foxo1_Pa0_Pd0_Pe1_pUb1); R247 is "conversion of nucleus_Foxo1_Pa0_Pd0_Pe1_pUb1 to nucleus_Foxo1_Pa0_Pd1_Pe1_pUb1 by IKK_P";  // modifiers: IKK_P
    R247_kkin = 5e-5;
  R248: dnabound_Foxo1_Pa0_Pd0_Pe1_pUb1 => dnabound_Foxo1_Pa0_Pd1_Pe1_pUb1; dnabound*function_209(IKK_P, by_ikk_phos_factor, cytoplasm, dnabound, dnabound_Foxo1_Pa0_Pd0_Pe1_pUb1, R248_kkin); R248 is "conversion of dnabound_Foxo1_Pa0_Pd0_Pe1_pUb1 to dnabound_Foxo1_Pa0_Pd1_Pe1_pUb1 by IKK_P";  // modifiers: IKK_P
    R248_kkin = 5e-5;
  R249: cytoplasm_Foxo1_Pa0_Pd1_Pe0_pUb0 => cytoplasm_Foxo1_Pa0_Pd0_Pe0_pUb0; cytoplasm*function_210(PP2A, cytoplasm, cytoplasm_Foxo1_Pa0_Pd1_Pe0_pUb0, R249_kdephos); R249 is "conversion of cytoplasm_Foxo1_Pa0_Pd1_Pe0_pUb0 to cytoplasm_Foxo1_Pa0_Pd0_Pe0_pUb0 by PP2A";  // modifiers: PP2A
    R249_kdephos = 1e-6;
  R250: nucleus_Foxo1_Pa0_Pd1_Pe0_pUb0 => nucleus_Foxo1_Pa0_Pd0_Pe0_pUb0; nucleus*function_211(PP2A, cytoplasm, R250_kdephos, nucleus, nucleus_Foxo1_Pa0_Pd1_Pe0_pUb0); R250 is "conversion of nucleus_Foxo1_Pa0_Pd1_Pe0_pUb0 to nucleus_Foxo1_Pa0_Pd0_Pe0_pUb0 by PP2A";  // modifiers: PP2A
    R250_kdephos = 1e-6;
  R251: dnabound_Foxo1_Pa0_Pd1_Pe0_pUb0 => dnabound_Foxo1_Pa0_Pd0_Pe0_pUb0; dnabound*function_212(PP2A, cytoplasm, dnabound, dnabound_Foxo1_Pa0_Pd1_Pe0_pUb0, R251_kdephos); R251 is "conversion of dnabound_Foxo1_Pa0_Pd1_Pe0_pUb0 to dnabound_Foxo1_Pa0_Pd0_Pe0_pUb0 by PP2A";  // modifiers: PP2A
    R251_kdephos = 1e-6;
  R252: cytoplasm_Foxo1_Pa0_Pd1_Pe0_pUb1 => cytoplasm_Foxo1_Pa0_Pd0_Pe0_pUb1; cytoplasm*function_213(PP2A, cytoplasm, cytoplasm_Foxo1_Pa0_Pd1_Pe0_pUb1, R252_kdephos); R252 is "conversion of cytoplasm_Foxo1_Pa0_Pd1_Pe0_pUb1 to cytoplasm_Foxo1_Pa0_Pd0_Pe0_pUb1 by PP2A";  // modifiers: PP2A
    R252_kdephos = 1e-6;
  R253: nucleus_Foxo1_Pa0_Pd1_Pe0_pUb1 => nucleus_Foxo1_Pa0_Pd0_Pe0_pUb1; nucleus*function_214(PP2A, cytoplasm, R253_kdephos, nucleus, nucleus_Foxo1_Pa0_Pd1_Pe0_pUb1); R253 is "conversion of nucleus_Foxo1_Pa0_Pd1_Pe0_pUb1 to nucleus_Foxo1_Pa0_Pd0_Pe0_pUb1 by PP2A";  // modifiers: PP2A
    R253_kdephos = 1e-6;
  R254: dnabound_Foxo1_Pa0_Pd1_Pe0_pUb1 => dnabound_Foxo1_Pa0_Pd0_Pe0_pUb1; dnabound*function_215(PP2A, cytoplasm, dnabound, dnabound_Foxo1_Pa0_Pd1_Pe0_pUb1, R254_kdephos); R254 is "conversion of dnabound_Foxo1_Pa0_Pd1_Pe0_pUb1 to dnabound_Foxo1_Pa0_Pd0_Pe0_pUb1 by PP2A";  // modifiers: PP2A
    R254_kdephos = 1e-6;
  R255: cytoplasm_Foxo1_Pa0_Pd1_Pe1_pUb0 => cytoplasm_Foxo1_Pa0_Pd0_Pe1_pUb0; cytoplasm*function_216(PP2A, cytoplasm, cytoplasm_Foxo1_Pa0_Pd1_Pe1_pUb0, R255_kdephos); R255 is "conversion of cytoplasm_Foxo1_Pa0_Pd1_Pe1_pUb0 to cytoplasm_Foxo1_Pa0_Pd0_Pe1_pUb0 by PP2A";  // modifiers: PP2A
    R255_kdephos = 1e-6;
  R256: nucleus_Foxo1_Pa0_Pd1_Pe1_pUb0 => nucleus_Foxo1_Pa0_Pd0_Pe1_pUb0; nucleus*function_217(PP2A, cytoplasm, R256_kdephos, nucleus, nucleus_Foxo1_Pa0_Pd1_Pe1_pUb0); R256 is "conversion of nucleus_Foxo1_Pa0_Pd1_Pe1_pUb0 to nucleus_Foxo1_Pa0_Pd0_Pe1_pUb0 by PP2A";  // modifiers: PP2A
    R256_kdephos = 1e-6;
  R257: dnabound_Foxo1_Pa0_Pd1_Pe1_pUb0 => dnabound_Foxo1_Pa0_Pd0_Pe1_pUb0; dnabound*function_218(PP2A, cytoplasm, dnabound, dnabound_Foxo1_Pa0_Pd1_Pe1_pUb0, R257_kdephos); R257 is "conversion of dnabound_Foxo1_Pa0_Pd1_Pe1_pUb0 to dnabound_Foxo1_Pa0_Pd0_Pe1_pUb0 by PP2A";  // modifiers: PP2A
    R257_kdephos = 1e-6;
  R258: cytoplasm_Foxo1_Pa0_Pd1_Pe1_pUb1 => cytoplasm_Foxo1_Pa0_Pd0_Pe1_pUb1; cytoplasm*function_219(PP2A, cytoplasm, cytoplasm_Foxo1_Pa0_Pd1_Pe1_pUb1, R258_kdephos); R258 is "conversion of cytoplasm_Foxo1_Pa0_Pd1_Pe1_pUb1 to cytoplasm_Foxo1_Pa0_Pd0_Pe1_pUb1 by PP2A";  // modifiers: PP2A
    R258_kdephos = 1e-6;
  R259: nucleus_Foxo1_Pa0_Pd1_Pe1_pUb1 => nucleus_Foxo1_Pa0_Pd0_Pe1_pUb1; nucleus*function_220(PP2A, cytoplasm, R259_kdephos, nucleus, nucleus_Foxo1_Pa0_Pd1_Pe1_pUb1); R259 is "conversion of nucleus_Foxo1_Pa0_Pd1_Pe1_pUb1 to nucleus_Foxo1_Pa0_Pd0_Pe1_pUb1 by PP2A";  // modifiers: PP2A
    R259_kdephos = 1e-6;
  R260: dnabound_Foxo1_Pa0_Pd1_Pe1_pUb1 => dnabound_Foxo1_Pa0_Pd0_Pe1_pUb1; dnabound*function_221(PP2A, cytoplasm, dnabound, dnabound_Foxo1_Pa0_Pd1_Pe1_pUb1, R260_kdephos); R260 is "conversion of dnabound_Foxo1_Pa0_Pd1_Pe1_pUb1 to dnabound_Foxo1_Pa0_Pd0_Pe1_pUb1 by PP2A";  // modifiers: PP2A
    R260_kdephos = 1e-6;
  R261: cytoplasm_Foxo1_Pa1_Pd0_Pe0_pUb0 => cytoplasm_Foxo1_Pa1_Pd1_Pe0_pUb0; cytoplasm*function_222(IKK_P, by_ikk_phos_factor, cytoplasm, cytoplasm_Foxo1_Pa1_Pd0_Pe0_pUb0, R261_kkin); R261 is "conversion of cytoplasm_Foxo1_Pa1_Pd0_Pe0_pUb0 to cytoplasm_Foxo1_Pa1_Pd1_Pe0_pUb0 by IKK_P";  // modifiers: IKK_P
    R261_kkin = 5e-5;
  R262: nucleus_Foxo1_Pa1_Pd0_Pe0_pUb0 => nucleus_Foxo1_Pa1_Pd1_Pe0_pUb0; nucleus*function_223(IKK_P, by_ikk_phos_factor, cytoplasm, R262_kkin, nucleus, nucleus_Foxo1_Pa1_Pd0_Pe0_pUb0); R262 is "conversion of nucleus_Foxo1_Pa1_Pd0_Pe0_pUb0 to nucleus_Foxo1_Pa1_Pd1_Pe0_pUb0 by IKK_P";  // modifiers: IKK_P
    R262_kkin = 5e-5;
  R263: dnabound_Foxo1_Pa1_Pd0_Pe0_pUb0 => dnabound_Foxo1_Pa1_Pd1_Pe0_pUb0; dnabound*function_224(IKK_P, by_ikk_phos_factor, cytoplasm, dnabound, dnabound_Foxo1_Pa1_Pd0_Pe0_pUb0, R263_kkin); R263 is "conversion of dnabound_Foxo1_Pa1_Pd0_Pe0_pUb0 to dnabound_Foxo1_Pa1_Pd1_Pe0_pUb0 by IKK_P";  // modifiers: IKK_P
    R263_kkin = 5e-5;
  R264: cytoplasm_Foxo1_Pa1_Pd0_Pe0_pUb1 => cytoplasm_Foxo1_Pa1_Pd1_Pe0_pUb1; cytoplasm*function_225(IKK_P, by_ikk_phos_factor, cytoplasm, cytoplasm_Foxo1_Pa1_Pd0_Pe0_pUb1, R264_kkin); R264 is "conversion of cytoplasm_Foxo1_Pa1_Pd0_Pe0_pUb1 to cytoplasm_Foxo1_Pa1_Pd1_Pe0_pUb1 by IKK_P";  // modifiers: IKK_P
    R264_kkin = 5e-5;
  R265: nucleus_Foxo1_Pa1_Pd0_Pe0_pUb1 => nucleus_Foxo1_Pa1_Pd1_Pe0_pUb1; nucleus*function_226(IKK_P, by_ikk_phos_factor, cytoplasm, R265_kkin, nucleus, nucleus_Foxo1_Pa1_Pd0_Pe0_pUb1); R265 is "conversion of nucleus_Foxo1_Pa1_Pd0_Pe0_pUb1 to nucleus_Foxo1_Pa1_Pd1_Pe0_pUb1 by IKK_P";  // modifiers: IKK_P
    R265_kkin = 5e-5;
  R266: dnabound_Foxo1_Pa1_Pd0_Pe0_pUb1 => dnabound_Foxo1_Pa1_Pd1_Pe0_pUb1; dnabound*function_227(IKK_P, by_ikk_phos_factor, cytoplasm, dnabound, dnabound_Foxo1_Pa1_Pd0_Pe0_pUb1, R266_kkin); R266 is "conversion of dnabound_Foxo1_Pa1_Pd0_Pe0_pUb1 to dnabound_Foxo1_Pa1_Pd1_Pe0_pUb1 by IKK_P";  // modifiers: IKK_P
    R266_kkin = 5e-5;
  R267: cytoplasm_Foxo1_Pa1_Pd0_Pe1_pUb0 => cytoplasm_Foxo1_Pa1_Pd1_Pe1_pUb0; cytoplasm*function_228(IKK_P, by_ikk_phos_factor, cytoplasm, cytoplasm_Foxo1_Pa1_Pd0_Pe1_pUb0, R267_kkin); R267 is "conversion of cytoplasm_Foxo1_Pa1_Pd0_Pe1_pUb0 to cytoplasm_Foxo1_Pa1_Pd1_Pe1_pUb0 by IKK_P";  // modifiers: IKK_P
    R267_kkin = 5e-5;
  R268: nucleus_Foxo1_Pa1_Pd0_Pe1_pUb0 => nucleus_Foxo1_Pa1_Pd1_Pe1_pUb0; nucleus*function_229(IKK_P, by_ikk_phos_factor, cytoplasm, R268_kkin, nucleus, nucleus_Foxo1_Pa1_Pd0_Pe1_pUb0); R268 is "conversion of nucleus_Foxo1_Pa1_Pd0_Pe1_pUb0 to nucleus_Foxo1_Pa1_Pd1_Pe1_pUb0 by IKK_P";  // modifiers: IKK_P
    R268_kkin = 5e-5;
  R269: dnabound_Foxo1_Pa1_Pd0_Pe1_pUb0 => dnabound_Foxo1_Pa1_Pd1_Pe1_pUb0; dnabound*function_230(IKK_P, by_ikk_phos_factor, cytoplasm, dnabound, dnabound_Foxo1_Pa1_Pd0_Pe1_pUb0, R269_kkin); R269 is "conversion of dnabound_Foxo1_Pa1_Pd0_Pe1_pUb0 to dnabound_Foxo1_Pa1_Pd1_Pe1_pUb0 by IKK_P";  // modifiers: IKK_P
    R269_kkin = 5e-5;
  R270: cytoplasm_Foxo1_Pa1_Pd0_Pe1_pUb1 => cytoplasm_Foxo1_Pa1_Pd1_Pe1_pUb1; cytoplasm*function_231(IKK_P, by_ikk_phos_factor, cytoplasm, cytoplasm_Foxo1_Pa1_Pd0_Pe1_pUb1, R270_kkin); R270 is "conversion of cytoplasm_Foxo1_Pa1_Pd0_Pe1_pUb1 to cytoplasm_Foxo1_Pa1_Pd1_Pe1_pUb1 by IKK_P";  // modifiers: IKK_P
    R270_kkin = 5e-5;
  R271: nucleus_Foxo1_Pa1_Pd0_Pe1_pUb1 => nucleus_Foxo1_Pa1_Pd1_Pe1_pUb1; nucleus*function_232(IKK_P, by_ikk_phos_factor, cytoplasm, R271_kkin, nucleus, nucleus_Foxo1_Pa1_Pd0_Pe1_pUb1); R271 is "conversion of nucleus_Foxo1_Pa1_Pd0_Pe1_pUb1 to nucleus_Foxo1_Pa1_Pd1_Pe1_pUb1 by IKK_P";  // modifiers: IKK_P
    R271_kkin = 5e-5;
  R272: dnabound_Foxo1_Pa1_Pd0_Pe1_pUb1 => dnabound_Foxo1_Pa1_Pd1_Pe1_pUb1; dnabound*function_233(IKK_P, by_ikk_phos_factor, cytoplasm, dnabound, dnabound_Foxo1_Pa1_Pd0_Pe1_pUb1, R272_kkin); R272 is "conversion of dnabound_Foxo1_Pa1_Pd0_Pe1_pUb1 to dnabound_Foxo1_Pa1_Pd1_Pe1_pUb1 by IKK_P";  // modifiers: IKK_P
    R272_kkin = 5e-5;
  R273: cytoplasm_Foxo1_Pa1_Pd1_Pe0_pUb0 => cytoplasm_Foxo1_Pa1_Pd0_Pe0_pUb0; cytoplasm*function_234(PP2A, cytoplasm, cytoplasm_Foxo1_Pa1_Pd1_Pe0_pUb0, R273_kdephos); R273 is "conversion of cytoplasm_Foxo1_Pa1_Pd1_Pe0_pUb0 to cytoplasm_Foxo1_Pa1_Pd0_Pe0_pUb0 by PP2A";  // modifiers: PP2A
    R273_kdephos = 1e-6;
  R274: nucleus_Foxo1_Pa1_Pd1_Pe0_pUb0 => nucleus_Foxo1_Pa1_Pd0_Pe0_pUb0; nucleus*function_235(PP2A, cytoplasm, R274_kdephos, nucleus, nucleus_Foxo1_Pa1_Pd1_Pe0_pUb0); R274 is "conversion of nucleus_Foxo1_Pa1_Pd1_Pe0_pUb0 to nucleus_Foxo1_Pa1_Pd0_Pe0_pUb0 by PP2A";  // modifiers: PP2A
    R274_kdephos = 1e-6;
  R275: dnabound_Foxo1_Pa1_Pd1_Pe0_pUb0 => dnabound_Foxo1_Pa1_Pd0_Pe0_pUb0; dnabound*function_236(PP2A, cytoplasm, dnabound, dnabound_Foxo1_Pa1_Pd1_Pe0_pUb0, R275_kdephos); R275 is "conversion of dnabound_Foxo1_Pa1_Pd1_Pe0_pUb0 to dnabound_Foxo1_Pa1_Pd0_Pe0_pUb0 by PP2A";  // modifiers: PP2A
    R275_kdephos = 1e-6;
  R276: cytoplasm_Foxo1_Pa1_Pd1_Pe0_pUb1 => cytoplasm_Foxo1_Pa1_Pd0_Pe0_pUb1; cytoplasm*function_237(PP2A, cytoplasm, cytoplasm_Foxo1_Pa1_Pd1_Pe0_pUb1, R276_kdephos); R276 is "conversion of cytoplasm_Foxo1_Pa1_Pd1_Pe0_pUb1 to cytoplasm_Foxo1_Pa1_Pd0_Pe0_pUb1 by PP2A";  // modifiers: PP2A
    R276_kdephos = 1e-6;
  R277: nucleus_Foxo1_Pa1_Pd1_Pe0_pUb1 => nucleus_Foxo1_Pa1_Pd0_Pe0_pUb1; nucleus*function_238(PP2A, cytoplasm, R277_kdephos, nucleus, nucleus_Foxo1_Pa1_Pd1_Pe0_pUb1); R277 is "conversion of nucleus_Foxo1_Pa1_Pd1_Pe0_pUb1 to nucleus_Foxo1_Pa1_Pd0_Pe0_pUb1 by PP2A";  // modifiers: PP2A
    R277_kdephos = 1e-6;
  R278: dnabound_Foxo1_Pa1_Pd1_Pe0_pUb1 => dnabound_Foxo1_Pa1_Pd0_Pe0_pUb1; dnabound*function_239(PP2A, cytoplasm, dnabound, dnabound_Foxo1_Pa1_Pd1_Pe0_pUb1, R278_kdephos); R278 is "conversion of dnabound_Foxo1_Pa1_Pd1_Pe0_pUb1 to dnabound_Foxo1_Pa1_Pd0_Pe0_pUb1 by PP2A";  // modifiers: PP2A
    R278_kdephos = 1e-6;
  R279: cytoplasm_Foxo1_Pa1_Pd1_Pe1_pUb0 => cytoplasm_Foxo1_Pa1_Pd0_Pe1_pUb0; cytoplasm*function_240(PP2A, cytoplasm, cytoplasm_Foxo1_Pa1_Pd1_Pe1_pUb0, R279_kdephos); R279 is "conversion of cytoplasm_Foxo1_Pa1_Pd1_Pe1_pUb0 to cytoplasm_Foxo1_Pa1_Pd0_Pe1_pUb0 by PP2A";  // modifiers: PP2A
    R279_kdephos = 1e-6;
  R280: nucleus_Foxo1_Pa1_Pd1_Pe1_pUb0 => nucleus_Foxo1_Pa1_Pd0_Pe1_pUb0; nucleus*function_241(PP2A, cytoplasm, R280_kdephos, nucleus, nucleus_Foxo1_Pa1_Pd1_Pe1_pUb0); R280 is "conversion of nucleus_Foxo1_Pa1_Pd1_Pe1_pUb0 to nucleus_Foxo1_Pa1_Pd0_Pe1_pUb0 by PP2A";  // modifiers: PP2A
    R280_kdephos = 1e-6;
  R281: dnabound_Foxo1_Pa1_Pd1_Pe1_pUb0 => dnabound_Foxo1_Pa1_Pd0_Pe1_pUb0; dnabound*function_242(PP2A, cytoplasm, dnabound, dnabound_Foxo1_Pa1_Pd1_Pe1_pUb0, R281_kdephos); R281 is "conversion of dnabound_Foxo1_Pa1_Pd1_Pe1_pUb0 to dnabound_Foxo1_Pa1_Pd0_Pe1_pUb0 by PP2A";  // modifiers: PP2A
    R281_kdephos = 1e-6;
  R282: cytoplasm_Foxo1_Pa1_Pd1_Pe1_pUb1 => cytoplasm_Foxo1_Pa1_Pd0_Pe1_pUb1; cytoplasm*function_243(PP2A, cytoplasm, cytoplasm_Foxo1_Pa1_Pd1_Pe1_pUb1, R282_kdephos); R282 is "conversion of cytoplasm_Foxo1_Pa1_Pd1_Pe1_pUb1 to cytoplasm_Foxo1_Pa1_Pd0_Pe1_pUb1 by PP2A";  // modifiers: PP2A
    R282_kdephos = 1e-6;
  R283: nucleus_Foxo1_Pa1_Pd1_Pe1_pUb1 => nucleus_Foxo1_Pa1_Pd0_Pe1_pUb1; nucleus*function_244(PP2A, cytoplasm, R283_kdephos, nucleus, nucleus_Foxo1_Pa1_Pd1_Pe1_pUb1); R283 is "conversion of nucleus_Foxo1_Pa1_Pd1_Pe1_pUb1 to nucleus_Foxo1_Pa1_Pd0_Pe1_pUb1 by PP2A";  // modifiers: PP2A
    R283_kdephos = 1e-6;
  R284: dnabound_Foxo1_Pa1_Pd1_Pe1_pUb1 => dnabound_Foxo1_Pa1_Pd0_Pe1_pUb1; dnabound*function_245(PP2A, cytoplasm, dnabound, dnabound_Foxo1_Pa1_Pd1_Pe1_pUb1, R284_kdephos); R284 is "conversion of dnabound_Foxo1_Pa1_Pd1_Pe1_pUb1 to dnabound_Foxo1_Pa1_Pd0_Pe1_pUb1 by PP2A";  // modifiers: PP2A
    R284_kdephos = 1e-6;
  R285: cytoplasm_Foxo1_Pa0_Pd0_Pe0_pUb0 => cytoplasm_Foxo1_Pa0_Pd0_Pe1_pUb0; cytoplasm*function_246(JNK_P, by_jnk_phos_factor, cytoplasm, cytoplasm_Foxo1_Pa0_Pd0_Pe0_pUb0, R285_kkin); R285 is "conversion of cytoplasm_Foxo1_Pa0_Pd0_Pe0_pUb0 to cytoplasm_Foxo1_Pa0_Pd0_Pe1_pUb0 by JNK_P";  // modifiers: JNK_P
    R285_kkin = 5e-5;
  R286: nucleus_Foxo1_Pa0_Pd0_Pe0_pUb0 => nucleus_Foxo1_Pa0_Pd0_Pe1_pUb0; nucleus*function_247(JNK_P, by_jnk_phos_factor, cytoplasm, R286_kkin, nucleus, nucleus_Foxo1_Pa0_Pd0_Pe0_pUb0); R286 is "conversion of nucleus_Foxo1_Pa0_Pd0_Pe0_pUb0 to nucleus_Foxo1_Pa0_Pd0_Pe1_pUb0 by JNK_P";  // modifiers: JNK_P
    R286_kkin = 5e-5;
  R287: dnabound_Foxo1_Pa0_Pd0_Pe0_pUb0 => dnabound_Foxo1_Pa0_Pd0_Pe1_pUb0; dnabound*function_248(JNK_P, by_jnk_phos_factor, cytoplasm, dnabound, dnabound_Foxo1_Pa0_Pd0_Pe0_pUb0, R287_kkin); R287 is "conversion of dnabound_Foxo1_Pa0_Pd0_Pe0_pUb0 to dnabound_Foxo1_Pa0_Pd0_Pe1_pUb0 by JNK_P";  // modifiers: JNK_P
    R287_kkin = 5e-5;
  R288: cytoplasm_Foxo1_Pa0_Pd0_Pe0_pUb1 => cytoplasm_Foxo1_Pa0_Pd0_Pe1_pUb1; cytoplasm*function_249(JNK_P, by_jnk_phos_factor, cytoplasm, cytoplasm_Foxo1_Pa0_Pd0_Pe0_pUb1, R288_kkin); R288 is "conversion of cytoplasm_Foxo1_Pa0_Pd0_Pe0_pUb1 to cytoplasm_Foxo1_Pa0_Pd0_Pe1_pUb1 by JNK_P";  // modifiers: JNK_P
    R288_kkin = 5e-5;
  R289: nucleus_Foxo1_Pa0_Pd0_Pe0_pUb1 => nucleus_Foxo1_Pa0_Pd0_Pe1_pUb1; nucleus*function_250(JNK_P, by_jnk_phos_factor, cytoplasm, R289_kkin, nucleus, nucleus_Foxo1_Pa0_Pd0_Pe0_pUb1); R289 is "conversion of nucleus_Foxo1_Pa0_Pd0_Pe0_pUb1 to nucleus_Foxo1_Pa0_Pd0_Pe1_pUb1 by JNK_P";  // modifiers: JNK_P
    R289_kkin = 5e-5;
  R290: dnabound_Foxo1_Pa0_Pd0_Pe0_pUb1 => dnabound_Foxo1_Pa0_Pd0_Pe1_pUb1; dnabound*function_251(JNK_P, by_jnk_phos_factor, cytoplasm, dnabound, dnabound_Foxo1_Pa0_Pd0_Pe0_pUb1, R290_kkin); R290 is "conversion of dnabound_Foxo1_Pa0_Pd0_Pe0_pUb1 to dnabound_Foxo1_Pa0_Pd0_Pe1_pUb1 by JNK_P";  // modifiers: JNK_P
    R290_kkin = 5e-5;
  R291: cytoplasm_Foxo1_Pa0_Pd0_Pe1_pUb0 => cytoplasm_Foxo1_Pa0_Pd0_Pe0_pUb0; cytoplasm*function_252(PP2A, cytoplasm, cytoplasm_Foxo1_Pa0_Pd0_Pe1_pUb0, R291_kdephos); R291 is "conversion of cytoplasm_Foxo1_Pa0_Pd0_Pe1_pUb0 to cytoplasm_Foxo1_Pa0_Pd0_Pe0_pUb0 by PP2A";  // modifiers: PP2A
    R291_kdephos = 1e-6;
  R292: nucleus_Foxo1_Pa0_Pd0_Pe1_pUb0 => nucleus_Foxo1_Pa0_Pd0_Pe0_pUb0; nucleus*function_253(PP2A, cytoplasm, R292_kdephos, nucleus, nucleus_Foxo1_Pa0_Pd0_Pe1_pUb0); R292 is "conversion of nucleus_Foxo1_Pa0_Pd0_Pe1_pUb0 to nucleus_Foxo1_Pa0_Pd0_Pe0_pUb0 by PP2A";  // modifiers: PP2A
    R292_kdephos = 1e-6;
  R293: dnabound_Foxo1_Pa0_Pd0_Pe1_pUb0 => dnabound_Foxo1_Pa0_Pd0_Pe0_pUb0; dnabound*function_254(PP2A, cytoplasm, dnabound, dnabound_Foxo1_Pa0_Pd0_Pe1_pUb0, R293_kdephos); R293 is "conversion of dnabound_Foxo1_Pa0_Pd0_Pe1_pUb0 to dnabound_Foxo1_Pa0_Pd0_Pe0_pUb0 by PP2A";  // modifiers: PP2A
    R293_kdephos = 1e-6;
  R294: cytoplasm_Foxo1_Pa0_Pd0_Pe1_pUb1 => cytoplasm_Foxo1_Pa0_Pd0_Pe0_pUb1; cytoplasm*function_255(PP2A, cytoplasm, cytoplasm_Foxo1_Pa0_Pd0_Pe1_pUb1, R294_kdephos); R294 is "conversion of cytoplasm_Foxo1_Pa0_Pd0_Pe1_pUb1 to cytoplasm_Foxo1_Pa0_Pd0_Pe0_pUb1 by PP2A";  // modifiers: PP2A
    R294_kdephos = 1e-6;
  R295: nucleus_Foxo1_Pa0_Pd0_Pe1_pUb1 => nucleus_Foxo1_Pa0_Pd0_Pe0_pUb1; nucleus*function_256(PP2A, cytoplasm, R295_kdephos, nucleus, nucleus_Foxo1_Pa0_Pd0_Pe1_pUb1); R295 is "conversion of nucleus_Foxo1_Pa0_Pd0_Pe1_pUb1 to nucleus_Foxo1_Pa0_Pd0_Pe0_pUb1 by PP2A";  // modifiers: PP2A
    R295_kdephos = 1e-6;
  R296: dnabound_Foxo1_Pa0_Pd0_Pe1_pUb1 => dnabound_Foxo1_Pa0_Pd0_Pe0_pUb1; dnabound*function_257(PP2A, cytoplasm, dnabound, dnabound_Foxo1_Pa0_Pd0_Pe1_pUb1, R296_kdephos); R296 is "conversion of dnabound_Foxo1_Pa0_Pd0_Pe1_pUb1 to dnabound_Foxo1_Pa0_Pd0_Pe0_pUb1 by PP2A";  // modifiers: PP2A
    R296_kdephos = 1e-6;
  R297: cytoplasm_Foxo1_Pa0_Pd1_Pe0_pUb0 => cytoplasm_Foxo1_Pa0_Pd1_Pe1_pUb0; cytoplasm*function_258(JNK_P, by_jnk_phos_factor, cytoplasm, cytoplasm_Foxo1_Pa0_Pd1_Pe0_pUb0, R297_kkin); R297 is "conversion of cytoplasm_Foxo1_Pa0_Pd1_Pe0_pUb0 to cytoplasm_Foxo1_Pa0_Pd1_Pe1_pUb0 by JNK_P";  // modifiers: JNK_P
    R297_kkin = 5e-5;
  R298: nucleus_Foxo1_Pa0_Pd1_Pe0_pUb0 => nucleus_Foxo1_Pa0_Pd1_Pe1_pUb0; nucleus*function_259(JNK_P, by_jnk_phos_factor, cytoplasm, R298_kkin, nucleus, nucleus_Foxo1_Pa0_Pd1_Pe0_pUb0); R298 is "conversion of nucleus_Foxo1_Pa0_Pd1_Pe0_pUb0 to nucleus_Foxo1_Pa0_Pd1_Pe1_pUb0 by JNK_P";  // modifiers: JNK_P
    R298_kkin = 5e-5;
  R299: dnabound_Foxo1_Pa0_Pd1_Pe0_pUb0 => dnabound_Foxo1_Pa0_Pd1_Pe1_pUb0; dnabound*function_260(JNK_P, by_jnk_phos_factor, cytoplasm, dnabound, dnabound_Foxo1_Pa0_Pd1_Pe0_pUb0, R299_kkin); R299 is "conversion of dnabound_Foxo1_Pa0_Pd1_Pe0_pUb0 to dnabound_Foxo1_Pa0_Pd1_Pe1_pUb0 by JNK_P";  // modifiers: JNK_P
    R299_kkin = 5e-5;
  R300: cytoplasm_Foxo1_Pa0_Pd1_Pe0_pUb1 => cytoplasm_Foxo1_Pa0_Pd1_Pe1_pUb1; cytoplasm*function_261(JNK_P, by_jnk_phos_factor, cytoplasm, cytoplasm_Foxo1_Pa0_Pd1_Pe0_pUb1, R300_kkin); R300 is "conversion of cytoplasm_Foxo1_Pa0_Pd1_Pe0_pUb1 to cytoplasm_Foxo1_Pa0_Pd1_Pe1_pUb1 by JNK_P";  // modifiers: JNK_P
    R300_kkin = 5e-5;
  R301: nucleus_Foxo1_Pa0_Pd1_Pe0_pUb1 => nucleus_Foxo1_Pa0_Pd1_Pe1_pUb1; nucleus*function_262(JNK_P, by_jnk_phos_factor, cytoplasm, R301_kkin, nucleus, nucleus_Foxo1_Pa0_Pd1_Pe0_pUb1); R301 is "conversion of nucleus_Foxo1_Pa0_Pd1_Pe0_pUb1 to nucleus_Foxo1_Pa0_Pd1_Pe1_pUb1 by JNK_P";  // modifiers: JNK_P
    R301_kkin = 5e-5;
  R302: dnabound_Foxo1_Pa0_Pd1_Pe0_pUb1 => dnabound_Foxo1_Pa0_Pd1_Pe1_pUb1; dnabound*function_263(JNK_P, by_jnk_phos_factor, cytoplasm, dnabound, dnabound_Foxo1_Pa0_Pd1_Pe0_pUb1, R302_kkin); R302 is "conversion of dnabound_Foxo1_Pa0_Pd1_Pe0_pUb1 to dnabound_Foxo1_Pa0_Pd1_Pe1_pUb1 by JNK_P";  // modifiers: JNK_P
    R302_kkin = 5e-5;
  R303: cytoplasm_Foxo1_Pa0_Pd1_Pe1_pUb0 => cytoplasm_Foxo1_Pa0_Pd1_Pe0_pUb0; cytoplasm*function_264(PP2A, cytoplasm, cytoplasm_Foxo1_Pa0_Pd1_Pe1_pUb0, R303_kdephos); R303 is "conversion of cytoplasm_Foxo1_Pa0_Pd1_Pe1_pUb0 to cytoplasm_Foxo1_Pa0_Pd1_Pe0_pUb0 by PP2A";  // modifiers: PP2A
    R303_kdephos = 1e-6;
  R304: nucleus_Foxo1_Pa0_Pd1_Pe1_pUb0 => nucleus_Foxo1_Pa0_Pd1_Pe0_pUb0; nucleus*function_265(PP2A, cytoplasm, R304_kdephos, nucleus, nucleus_Foxo1_Pa0_Pd1_Pe1_pUb0); R304 is "conversion of nucleus_Foxo1_Pa0_Pd1_Pe1_pUb0 to nucleus_Foxo1_Pa0_Pd1_Pe0_pUb0 by PP2A";  // modifiers: PP2A
    R304_kdephos = 1e-6;
  R305: dnabound_Foxo1_Pa0_Pd1_Pe1_pUb0 => dnabound_Foxo1_Pa0_Pd1_Pe0_pUb0; dnabound*function_266(PP2A, cytoplasm, dnabound, dnabound_Foxo1_Pa0_Pd1_Pe1_pUb0, R305_kdephos); R305 is "conversion of dnabound_Foxo1_Pa0_Pd1_Pe1_pUb0 to dnabound_Foxo1_Pa0_Pd1_Pe0_pUb0 by PP2A";  // modifiers: PP2A
    R305_kdephos = 1e-6;
  R306: cytoplasm_Foxo1_Pa0_Pd1_Pe1_pUb1 => cytoplasm_Foxo1_Pa0_Pd1_Pe0_pUb1; cytoplasm*function_267(PP2A, cytoplasm, cytoplasm_Foxo1_Pa0_Pd1_Pe1_pUb1, R306_kdephos); R306 is "conversion of cytoplasm_Foxo1_Pa0_Pd1_Pe1_pUb1 to cytoplasm_Foxo1_Pa0_Pd1_Pe0_pUb1 by PP2A";  // modifiers: PP2A
    R306_kdephos = 1e-6;
  R307: nucleus_Foxo1_Pa0_Pd1_Pe1_pUb1 => nucleus_Foxo1_Pa0_Pd1_Pe0_pUb1; nucleus*function_268(PP2A, cytoplasm, R307_kdephos, nucleus, nucleus_Foxo1_Pa0_Pd1_Pe1_pUb1); R307 is "conversion of nucleus_Foxo1_Pa0_Pd1_Pe1_pUb1 to nucleus_Foxo1_Pa0_Pd1_Pe0_pUb1 by PP2A";  // modifiers: PP2A
    R307_kdephos = 1e-6;
  R308: dnabound_Foxo1_Pa0_Pd1_Pe1_pUb1 => dnabound_Foxo1_Pa0_Pd1_Pe0_pUb1; dnabound*function_269(PP2A, cytoplasm, dnabound, dnabound_Foxo1_Pa0_Pd1_Pe1_pUb1, R308_kdephos); R308 is "conversion of dnabound_Foxo1_Pa0_Pd1_Pe1_pUb1 to dnabound_Foxo1_Pa0_Pd1_Pe0_pUb1 by PP2A";  // modifiers: PP2A
    R308_kdephos = 1e-6;
  R309: cytoplasm_Foxo1_Pa1_Pd0_Pe0_pUb0 => cytoplasm_Foxo1_Pa1_Pd0_Pe1_pUb0; cytoplasm*function_270(JNK_P, by_jnk_phos_factor, cytoplasm, cytoplasm_Foxo1_Pa1_Pd0_Pe0_pUb0, R309_kkin); R309 is "conversion of cytoplasm_Foxo1_Pa1_Pd0_Pe0_pUb0 to cytoplasm_Foxo1_Pa1_Pd0_Pe1_pUb0 by JNK_P";  // modifiers: JNK_P
    R309_kkin = 5e-5;
  R310: nucleus_Foxo1_Pa1_Pd0_Pe0_pUb0 => nucleus_Foxo1_Pa1_Pd0_Pe1_pUb0; nucleus*function_271(JNK_P, by_jnk_phos_factor, cytoplasm, R310_kkin, nucleus, nucleus_Foxo1_Pa1_Pd0_Pe0_pUb0); R310 is "conversion of nucleus_Foxo1_Pa1_Pd0_Pe0_pUb0 to nucleus_Foxo1_Pa1_Pd0_Pe1_pUb0 by JNK_P";  // modifiers: JNK_P
    R310_kkin = 5e-5;
  R311: dnabound_Foxo1_Pa1_Pd0_Pe0_pUb0 => dnabound_Foxo1_Pa1_Pd0_Pe1_pUb0; dnabound*function_272(JNK_P, by_jnk_phos_factor, cytoplasm, dnabound, dnabound_Foxo1_Pa1_Pd0_Pe0_pUb0, R311_kkin); R311 is "conversion of dnabound_Foxo1_Pa1_Pd0_Pe0_pUb0 to dnabound_Foxo1_Pa1_Pd0_Pe1_pUb0 by JNK_P";  // modifiers: JNK_P
    R311_kkin = 5e-5;
  R312: cytoplasm_Foxo1_Pa1_Pd0_Pe0_pUb1 => cytoplasm_Foxo1_Pa1_Pd0_Pe1_pUb1; cytoplasm*function_273(JNK_P, by_jnk_phos_factor, cytoplasm, cytoplasm_Foxo1_Pa1_Pd0_Pe0_pUb1, R312_kkin); R312 is "conversion of cytoplasm_Foxo1_Pa1_Pd0_Pe0_pUb1 to cytoplasm_Foxo1_Pa1_Pd0_Pe1_pUb1 by JNK_P";  // modifiers: JNK_P
    R312_kkin = 5e-5;
  R313: nucleus_Foxo1_Pa1_Pd0_Pe0_pUb1 => nucleus_Foxo1_Pa1_Pd0_Pe1_pUb1; nucleus*function_274(JNK_P, by_jnk_phos_factor, cytoplasm, R313_kkin, nucleus, nucleus_Foxo1_Pa1_Pd0_Pe0_pUb1); R313 is "conversion of nucleus_Foxo1_Pa1_Pd0_Pe0_pUb1 to nucleus_Foxo1_Pa1_Pd0_Pe1_pUb1 by JNK_P";  // modifiers: JNK_P
    R313_kkin = 5e-5;
  R314: dnabound_Foxo1_Pa1_Pd0_Pe0_pUb1 => dnabound_Foxo1_Pa1_Pd0_Pe1_pUb1; dnabound*function_275(JNK_P, by_jnk_phos_factor, cytoplasm, dnabound, dnabound_Foxo1_Pa1_Pd0_Pe0_pUb1, R314_kkin); R314 is "conversion of dnabound_Foxo1_Pa1_Pd0_Pe0_pUb1 to dnabound_Foxo1_Pa1_Pd0_Pe1_pUb1 by JNK_P";  // modifiers: JNK_P
    R314_kkin = 5e-5;
  R315: cytoplasm_Foxo1_Pa1_Pd0_Pe1_pUb0 => cytoplasm_Foxo1_Pa1_Pd0_Pe0_pUb0; cytoplasm*function_276(PP2A, cytoplasm, cytoplasm_Foxo1_Pa1_Pd0_Pe1_pUb0, R315_kdephos); R315 is "conversion of cytoplasm_Foxo1_Pa1_Pd0_Pe1_pUb0 to cytoplasm_Foxo1_Pa1_Pd0_Pe0_pUb0 by PP2A";  // modifiers: PP2A
    R315_kdephos = 1e-6;
  R316: nucleus_Foxo1_Pa1_Pd0_Pe1_pUb0 => nucleus_Foxo1_Pa1_Pd0_Pe0_pUb0; nucleus*function_277(PP2A, cytoplasm, R316_kdephos, nucleus, nucleus_Foxo1_Pa1_Pd0_Pe1_pUb0); R316 is "conversion of nucleus_Foxo1_Pa1_Pd0_Pe1_pUb0 to nucleus_Foxo1_Pa1_Pd0_Pe0_pUb0 by PP2A";  // modifiers: PP2A
    R316_kdephos = 1e-6;
  R317: dnabound_Foxo1_Pa1_Pd0_Pe1_pUb0 => dnabound_Foxo1_Pa1_Pd0_Pe0_pUb0; dnabound*function_278(PP2A, cytoplasm, dnabound, dnabound_Foxo1_Pa1_Pd0_Pe1_pUb0, R317_kdephos); R317 is "conversion of dnabound_Foxo1_Pa1_Pd0_Pe1_pUb0 to dnabound_Foxo1_Pa1_Pd0_Pe0_pUb0 by PP2A";  // modifiers: PP2A
    R317_kdephos = 1e-6;
  R318: cytoplasm_Foxo1_Pa1_Pd0_Pe1_pUb1 => cytoplasm_Foxo1_Pa1_Pd0_Pe0_pUb1; cytoplasm*function_279(PP2A, cytoplasm, cytoplasm_Foxo1_Pa1_Pd0_Pe1_pUb1, R318_kdephos); R318 is "conversion of cytoplasm_Foxo1_Pa1_Pd0_Pe1_pUb1 to cytoplasm_Foxo1_Pa1_Pd0_Pe0_pUb1 by PP2A";  // modifiers: PP2A
    R318_kdephos = 1e-6;
  R319: nucleus_Foxo1_Pa1_Pd0_Pe1_pUb1 => nucleus_Foxo1_Pa1_Pd0_Pe0_pUb1; nucleus*function_280(PP2A, cytoplasm, R319_kdephos, nucleus, nucleus_Foxo1_Pa1_Pd0_Pe1_pUb1); R319 is "conversion of nucleus_Foxo1_Pa1_Pd0_Pe1_pUb1 to nucleus_Foxo1_Pa1_Pd0_Pe0_pUb1 by PP2A";  // modifiers: PP2A
    R319_kdephos = 1e-6;
  R320: dnabound_Foxo1_Pa1_Pd0_Pe1_pUb1 => dnabound_Foxo1_Pa1_Pd0_Pe0_pUb1; dnabound*function_281(PP2A, cytoplasm, dnabound, dnabound_Foxo1_Pa1_Pd0_Pe1_pUb1, R320_kdephos); R320 is "conversion of dnabound_Foxo1_Pa1_Pd0_Pe1_pUb1 to dnabound_Foxo1_Pa1_Pd0_Pe0_pUb1 by PP2A";  // modifiers: PP2A
    R320_kdephos = 1e-6;
  R321: cytoplasm_Foxo1_Pa1_Pd1_Pe0_pUb0 => cytoplasm_Foxo1_Pa1_Pd1_Pe1_pUb0; cytoplasm*function_282(JNK_P, by_jnk_phos_factor, cytoplasm, cytoplasm_Foxo1_Pa1_Pd1_Pe0_pUb0, R321_kkin); R321 is "conversion of cytoplasm_Foxo1_Pa1_Pd1_Pe0_pUb0 to cytoplasm_Foxo1_Pa1_Pd1_Pe1_pUb0 by JNK_P";  // modifiers: JNK_P
    R321_kkin = 5e-5;
  R322: nucleus_Foxo1_Pa1_Pd1_Pe0_pUb0 => nucleus_Foxo1_Pa1_Pd1_Pe1_pUb0; nucleus*function_283(JNK_P, by_jnk_phos_factor, cytoplasm, R322_kkin, nucleus, nucleus_Foxo1_Pa1_Pd1_Pe0_pUb0); R322 is "conversion of nucleus_Foxo1_Pa1_Pd1_Pe0_pUb0 to nucleus_Foxo1_Pa1_Pd1_Pe1_pUb0 by JNK_P";  // modifiers: JNK_P
    R322_kkin = 5e-5;
  R323: dnabound_Foxo1_Pa1_Pd1_Pe0_pUb0 => dnabound_Foxo1_Pa1_Pd1_Pe1_pUb0; dnabound*function_284(JNK_P, by_jnk_phos_factor, cytoplasm, dnabound, dnabound_Foxo1_Pa1_Pd1_Pe0_pUb0, R323_kkin); R323 is "conversion of dnabound_Foxo1_Pa1_Pd1_Pe0_pUb0 to dnabound_Foxo1_Pa1_Pd1_Pe1_pUb0 by JNK_P";  // modifiers: JNK_P
    R323_kkin = 5e-5;
  R324: cytoplasm_Foxo1_Pa1_Pd1_Pe0_pUb1 => cytoplasm_Foxo1_Pa1_Pd1_Pe1_pUb1; cytoplasm*function_285(JNK_P, by_jnk_phos_factor, cytoplasm, cytoplasm_Foxo1_Pa1_Pd1_Pe0_pUb1, R324_kkin); R324 is "conversion of cytoplasm_Foxo1_Pa1_Pd1_Pe0_pUb1 to cytoplasm_Foxo1_Pa1_Pd1_Pe1_pUb1 by JNK_P";  // modifiers: JNK_P
    R324_kkin = 5e-5;
  R325: nucleus_Foxo1_Pa1_Pd1_Pe0_pUb1 => nucleus_Foxo1_Pa1_Pd1_Pe1_pUb1; nucleus*function_286(JNK_P, by_jnk_phos_factor, cytoplasm, R325_kkin, nucleus, nucleus_Foxo1_Pa1_Pd1_Pe0_pUb1); R325 is "conversion of nucleus_Foxo1_Pa1_Pd1_Pe0_pUb1 to nucleus_Foxo1_Pa1_Pd1_Pe1_pUb1 by JNK_P";  // modifiers: JNK_P
    R325_kkin = 5e-5;
  R326: dnabound_Foxo1_Pa1_Pd1_Pe0_pUb1 => dnabound_Foxo1_Pa1_Pd1_Pe1_pUb1; dnabound*function_287(JNK_P, by_jnk_phos_factor, cytoplasm, dnabound, dnabound_Foxo1_Pa1_Pd1_Pe0_pUb1, R326_kkin); R326 is "conversion of dnabound_Foxo1_Pa1_Pd1_Pe0_pUb1 to dnabound_Foxo1_Pa1_Pd1_Pe1_pUb1 by JNK_P";  // modifiers: JNK_P
    R326_kkin = 5e-5;
  R327: cytoplasm_Foxo1_Pa1_Pd1_Pe1_pUb0 => cytoplasm_Foxo1_Pa1_Pd1_Pe0_pUb0; cytoplasm*function_288(PP2A, cytoplasm, cytoplasm_Foxo1_Pa1_Pd1_Pe1_pUb0, R327_kdephos); R327 is "conversion of cytoplasm_Foxo1_Pa1_Pd1_Pe1_pUb0 to cytoplasm_Foxo1_Pa1_Pd1_Pe0_pUb0 by PP2A";  // modifiers: PP2A
    R327_kdephos = 1e-6;
  R328: nucleus_Foxo1_Pa1_Pd1_Pe1_pUb0 => nucleus_Foxo1_Pa1_Pd1_Pe0_pUb0; nucleus*function_289(PP2A, cytoplasm, R328_kdephos, nucleus, nucleus_Foxo1_Pa1_Pd1_Pe1_pUb0); R328 is "conversion of nucleus_Foxo1_Pa1_Pd1_Pe1_pUb0 to nucleus_Foxo1_Pa1_Pd1_Pe0_pUb0 by PP2A";  // modifiers: PP2A
    R328_kdephos = 1e-6;
  R329: dnabound_Foxo1_Pa1_Pd1_Pe1_pUb0 => dnabound_Foxo1_Pa1_Pd1_Pe0_pUb0; dnabound*function_290(PP2A, cytoplasm, dnabound, dnabound_Foxo1_Pa1_Pd1_Pe1_pUb0, R329_kdephos); R329 is "conversion of dnabound_Foxo1_Pa1_Pd1_Pe1_pUb0 to dnabound_Foxo1_Pa1_Pd1_Pe0_pUb0 by PP2A";  // modifiers: PP2A
    R329_kdephos = 1e-6;
  R330: cytoplasm_Foxo1_Pa1_Pd1_Pe1_pUb1 => cytoplasm_Foxo1_Pa1_Pd1_Pe0_pUb1; cytoplasm*function_291(PP2A, cytoplasm, cytoplasm_Foxo1_Pa1_Pd1_Pe1_pUb1, R330_kdephos); R330 is "conversion of cytoplasm_Foxo1_Pa1_Pd1_Pe1_pUb1 to cytoplasm_Foxo1_Pa1_Pd1_Pe0_pUb1 by PP2A";  // modifiers: PP2A
    R330_kdephos = 1e-6;
  R331: nucleus_Foxo1_Pa1_Pd1_Pe1_pUb1 => nucleus_Foxo1_Pa1_Pd1_Pe0_pUb1; nucleus*function_292(PP2A, cytoplasm, R331_kdephos, nucleus, nucleus_Foxo1_Pa1_Pd1_Pe1_pUb1); R331 is "conversion of nucleus_Foxo1_Pa1_Pd1_Pe1_pUb1 to nucleus_Foxo1_Pa1_Pd1_Pe0_pUb1 by PP2A";  // modifiers: PP2A
    R331_kdephos = 1e-6;
  R332: dnabound_Foxo1_Pa1_Pd1_Pe1_pUb1 => dnabound_Foxo1_Pa1_Pd1_Pe0_pUb1; dnabound*function_293(PP2A, cytoplasm, dnabound, dnabound_Foxo1_Pa1_Pd1_Pe1_pUb1, R332_kdephos); R332 is "conversion of dnabound_Foxo1_Pa1_Pd1_Pe1_pUb1 to dnabound_Foxo1_Pa1_Pd1_Pe0_pUb1 by PP2A";  // modifiers: PP2A
    R332_kdephos = 1e-6;
  R333: cytoplasm_Foxo1_Pa0_Pd0_Pe0_pUb0 => cytoplasm_Foxo1_Pa0_Pd0_Pe0_pUb1; cytoplasm*function_294(SCF, cytoplasm, cytoplasm_Foxo1_Pa0_Pd0_Pe0_pUb0, R333_kub); R333 is "conversion of cytoplasm_Foxo1_Pa0_Pd0_Pe0_pUb0 to cytoplasm_Foxo1_Pa0_Pd0_Pe0_pUb1 by SCF";  // modifiers: SCF
    R333_kub = 1e-6;
  R334: nucleus_Foxo1_Pa0_Pd0_Pe0_pUb0 => nucleus_Foxo1_Pa0_Pd0_Pe0_pUb1; nucleus*function_295(SCF, cytoplasm, R334_kub, nucleus, nucleus_Foxo1_Pa0_Pd0_Pe0_pUb0); R334 is "conversion of nucleus_Foxo1_Pa0_Pd0_Pe0_pUb0 to nucleus_Foxo1_Pa0_Pd0_Pe0_pUb1 by SCF";  // modifiers: SCF
    R334_kub = 1e-6;
  R335: dnabound_Foxo1_Pa0_Pd0_Pe0_pUb0 => dnabound_Foxo1_Pa0_Pd0_Pe0_pUb1; dnabound*function_296(SCF, cytoplasm, dnabound, dnabound_Foxo1_Pa0_Pd0_Pe0_pUb0, R335_kub); R335 is "conversion of dnabound_Foxo1_Pa0_Pd0_Pe0_pUb0 to dnabound_Foxo1_Pa0_Pd0_Pe0_pUb1 by SCF";  // modifiers: SCF
    R335_kub = 1e-6;
  R336: cytoplasm_Foxo1_Pa0_Pd0_Pe1_pUb0 => cytoplasm_Foxo1_Pa0_Pd0_Pe1_pUb1; cytoplasm*function_297(SCF, cytoplasm, cytoplasm_Foxo1_Pa0_Pd0_Pe1_pUb0, R336_kub); R336 is "conversion of cytoplasm_Foxo1_Pa0_Pd0_Pe1_pUb0 to cytoplasm_Foxo1_Pa0_Pd0_Pe1_pUb1 by SCF";  // modifiers: SCF
    R336_kub = 1e-6;
  R337: nucleus_Foxo1_Pa0_Pd0_Pe1_pUb0 => nucleus_Foxo1_Pa0_Pd0_Pe1_pUb1; nucleus*function_298(SCF, cytoplasm, R337_kub, nucleus, nucleus_Foxo1_Pa0_Pd0_Pe1_pUb0); R337 is "conversion of nucleus_Foxo1_Pa0_Pd0_Pe1_pUb0 to nucleus_Foxo1_Pa0_Pd0_Pe1_pUb1 by SCF";  // modifiers: SCF
    R337_kub = 1e-6;
  R338: dnabound_Foxo1_Pa0_Pd0_Pe1_pUb0 => dnabound_Foxo1_Pa0_Pd0_Pe1_pUb1; dnabound*function_299(SCF, cytoplasm, dnabound, dnabound_Foxo1_Pa0_Pd0_Pe1_pUb0, R338_kub); R338 is "conversion of dnabound_Foxo1_Pa0_Pd0_Pe1_pUb0 to dnabound_Foxo1_Pa0_Pd0_Pe1_pUb1 by SCF";  // modifiers: SCF
    R338_kub = 1e-6;
  R339: cytoplasm_Foxo1_Pa0_Pd1_Pe0_pUb0 => cytoplasm_Foxo1_Pa0_Pd1_Pe0_pUb1; cytoplasm*function_300(SCF, cytoplasm, cytoplasm_Foxo1_Pa0_Pd1_Pe0_pUb0, R339_kub); R339 is "conversion of cytoplasm_Foxo1_Pa0_Pd1_Pe0_pUb0 to cytoplasm_Foxo1_Pa0_Pd1_Pe0_pUb1 by SCF";  // modifiers: SCF
    R339_kub = 2.2e-5;
  R340: nucleus_Foxo1_Pa0_Pd1_Pe0_pUb0 => nucleus_Foxo1_Pa0_Pd1_Pe0_pUb1; nucleus*function_301(SCF, cytoplasm, R340_kub, nucleus, nucleus_Foxo1_Pa0_Pd1_Pe0_pUb0); R340 is "conversion of nucleus_Foxo1_Pa0_Pd1_Pe0_pUb0 to nucleus_Foxo1_Pa0_Pd1_Pe0_pUb1 by SCF";  // modifiers: SCF
    R340_kub = 2.2e-5;
  R341: dnabound_Foxo1_Pa0_Pd1_Pe0_pUb0 => dnabound_Foxo1_Pa0_Pd1_Pe0_pUb1; dnabound*function_302(SCF, cytoplasm, dnabound, dnabound_Foxo1_Pa0_Pd1_Pe0_pUb0, R341_kub); R341 is "conversion of dnabound_Foxo1_Pa0_Pd1_Pe0_pUb0 to dnabound_Foxo1_Pa0_Pd1_Pe0_pUb1 by SCF";  // modifiers: SCF
    R341_kub = 2.2e-5;
  R342: cytoplasm_Foxo1_Pa0_Pd1_Pe1_pUb0 => cytoplasm_Foxo1_Pa0_Pd1_Pe1_pUb1; cytoplasm*function_303(SCF, cytoplasm, cytoplasm_Foxo1_Pa0_Pd1_Pe1_pUb0, R342_kub); R342 is "conversion of cytoplasm_Foxo1_Pa0_Pd1_Pe1_pUb0 to cytoplasm_Foxo1_Pa0_Pd1_Pe1_pUb1 by SCF";  // modifiers: SCF
    R342_kub = 2.2e-5;
  R343: nucleus_Foxo1_Pa0_Pd1_Pe1_pUb0 => nucleus_Foxo1_Pa0_Pd1_Pe1_pUb1; nucleus*function_304(SCF, cytoplasm, R343_kub, nucleus, nucleus_Foxo1_Pa0_Pd1_Pe1_pUb0); R343 is "conversion of nucleus_Foxo1_Pa0_Pd1_Pe1_pUb0 to nucleus_Foxo1_Pa0_Pd1_Pe1_pUb1 by SCF";  // modifiers: SCF
    R343_kub = 2.2e-5;
  R344: dnabound_Foxo1_Pa0_Pd1_Pe1_pUb0 => dnabound_Foxo1_Pa0_Pd1_Pe1_pUb1; dnabound*function_305(SCF, cytoplasm, dnabound, dnabound_Foxo1_Pa0_Pd1_Pe1_pUb0, R344_kub); R344 is "conversion of dnabound_Foxo1_Pa0_Pd1_Pe1_pUb0 to dnabound_Foxo1_Pa0_Pd1_Pe1_pUb1 by SCF";  // modifiers: SCF
    R344_kub = 2.2e-5;
  R345: cytoplasm_Foxo1_Pa1_Pd0_Pe0_pUb0 => cytoplasm_Foxo1_Pa1_Pd0_Pe0_pUb1; cytoplasm*function_306(SCF, cytoplasm, cytoplasm_Foxo1_Pa1_Pd0_Pe0_pUb0, R345_kub); R345 is "conversion of cytoplasm_Foxo1_Pa1_Pd0_Pe0_pUb0 to cytoplasm_Foxo1_Pa1_Pd0_Pe0_pUb1 by SCF";  // modifiers: SCF
    R345_kub = 3e-6;
  R346: nucleus_Foxo1_Pa1_Pd0_Pe0_pUb0 => nucleus_Foxo1_Pa1_Pd0_Pe0_pUb1; nucleus*function_307(SCF, cytoplasm, R346_kub, nucleus, nucleus_Foxo1_Pa1_Pd0_Pe0_pUb0); R346 is "conversion of nucleus_Foxo1_Pa1_Pd0_Pe0_pUb0 to nucleus_Foxo1_Pa1_Pd0_Pe0_pUb1 by SCF";  // modifiers: SCF
    R346_kub = 3e-6;
  R347: dnabound_Foxo1_Pa1_Pd0_Pe0_pUb0 => dnabound_Foxo1_Pa1_Pd0_Pe0_pUb1; dnabound*function_308(SCF, cytoplasm, dnabound, dnabound_Foxo1_Pa1_Pd0_Pe0_pUb0, R347_kub); R347 is "conversion of dnabound_Foxo1_Pa1_Pd0_Pe0_pUb0 to dnabound_Foxo1_Pa1_Pd0_Pe0_pUb1 by SCF";  // modifiers: SCF
    R347_kub = 3e-6;
  R348: cytoplasm_Foxo1_Pa1_Pd0_Pe1_pUb0 => cytoplasm_Foxo1_Pa1_Pd0_Pe1_pUb1; cytoplasm*function_309(SCF, cytoplasm, cytoplasm_Foxo1_Pa1_Pd0_Pe1_pUb0, R348_kub); R348 is "conversion of cytoplasm_Foxo1_Pa1_Pd0_Pe1_pUb0 to cytoplasm_Foxo1_Pa1_Pd0_Pe1_pUb1 by SCF";  // modifiers: SCF
    R348_kub = 3e-6;
  R349: nucleus_Foxo1_Pa1_Pd0_Pe1_pUb0 => nucleus_Foxo1_Pa1_Pd0_Pe1_pUb1; nucleus*function_310(SCF, cytoplasm, R349_kub, nucleus, nucleus_Foxo1_Pa1_Pd0_Pe1_pUb0); R349 is "conversion of nucleus_Foxo1_Pa1_Pd0_Pe1_pUb0 to nucleus_Foxo1_Pa1_Pd0_Pe1_pUb1 by SCF";  // modifiers: SCF
    R349_kub = 3e-6;
  R350: dnabound_Foxo1_Pa1_Pd0_Pe1_pUb0 => dnabound_Foxo1_Pa1_Pd0_Pe1_pUb1; dnabound*function_311(SCF, cytoplasm, dnabound, dnabound_Foxo1_Pa1_Pd0_Pe1_pUb0, R350_kub); R350 is "conversion of dnabound_Foxo1_Pa1_Pd0_Pe1_pUb0 to dnabound_Foxo1_Pa1_Pd0_Pe1_pUb1 by SCF";  // modifiers: SCF
    R350_kub = 3e-6;
  R351: cytoplasm_Foxo1_Pa1_Pd1_Pe0_pUb0 => cytoplasm_Foxo1_Pa1_Pd1_Pe0_pUb1; cytoplasm*function_312(SCF, cytoplasm, cytoplasm_Foxo1_Pa1_Pd1_Pe0_pUb0, R351_kub); R351 is "conversion of cytoplasm_Foxo1_Pa1_Pd1_Pe0_pUb0 to cytoplasm_Foxo1_Pa1_Pd1_Pe0_pUb1 by SCF";  // modifiers: SCF
    R351_kub = 6.6e-5;
  R352: nucleus_Foxo1_Pa1_Pd1_Pe0_pUb0 => nucleus_Foxo1_Pa1_Pd1_Pe0_pUb1; nucleus*function_313(SCF, cytoplasm, R352_kub, nucleus, nucleus_Foxo1_Pa1_Pd1_Pe0_pUb0); R352 is "conversion of nucleus_Foxo1_Pa1_Pd1_Pe0_pUb0 to nucleus_Foxo1_Pa1_Pd1_Pe0_pUb1 by SCF";  // modifiers: SCF
    R352_kub = 6.6e-5;
  R353: dnabound_Foxo1_Pa1_Pd1_Pe0_pUb0 => dnabound_Foxo1_Pa1_Pd1_Pe0_pUb1; dnabound*function_314(SCF, cytoplasm, dnabound, dnabound_Foxo1_Pa1_Pd1_Pe0_pUb0, R353_kub); R353 is "conversion of dnabound_Foxo1_Pa1_Pd1_Pe0_pUb0 to dnabound_Foxo1_Pa1_Pd1_Pe0_pUb1 by SCF";  // modifiers: SCF
    R353_kub = 6.6e-5;
  R354: cytoplasm_Foxo1_Pa1_Pd1_Pe1_pUb0 => cytoplasm_Foxo1_Pa1_Pd1_Pe1_pUb1; cytoplasm*function_315(SCF, cytoplasm, cytoplasm_Foxo1_Pa1_Pd1_Pe1_pUb0, R354_kub); R354 is "conversion of cytoplasm_Foxo1_Pa1_Pd1_Pe1_pUb0 to cytoplasm_Foxo1_Pa1_Pd1_Pe1_pUb1 by SCF";  // modifiers: SCF
    R354_kub = 6.6e-5;
  R355: nucleus_Foxo1_Pa1_Pd1_Pe1_pUb0 => nucleus_Foxo1_Pa1_Pd1_Pe1_pUb1; nucleus*function_316(SCF, cytoplasm, R355_kub, nucleus, nucleus_Foxo1_Pa1_Pd1_Pe1_pUb0); R355 is "conversion of nucleus_Foxo1_Pa1_Pd1_Pe1_pUb0 to nucleus_Foxo1_Pa1_Pd1_Pe1_pUb1 by SCF";  // modifiers: SCF
    R355_kub = 6.6e-5;
  R356: dnabound_Foxo1_Pa1_Pd1_Pe1_pUb0 => dnabound_Foxo1_Pa1_Pd1_Pe1_pUb1; dnabound*function_317(SCF, cytoplasm, dnabound, dnabound_Foxo1_Pa1_Pd1_Pe1_pUb0, R356_kub); R356 is "conversion of dnabound_Foxo1_Pa1_Pd1_Pe1_pUb0 to dnabound_Foxo1_Pa1_Pd1_Pe1_pUb1 by SCF";  // modifiers: SCF
    R356_kub = 6.6e-5;
  R357: cytoplasm_Foxo1_Pa0_Pd0_Pe0_pUb1 => degr_Foxo1; cytoplasm*function_318(Proteasome, cytoplasm, cytoplasm_Foxo1_Pa0_Pd0_Pe0_pUb1, R357_kdeg); R357 is "degradation of cytoplasm_Foxo1_Pa0_Pd0_Pe0_pUb1";  // modifiers: Proteasome
    R357_kdeg = 0.0001;
  R358: cytoplasm_Foxo1_Pa0_Pd0_Pe1_pUb1 => degr_Foxo1; cytoplasm*function_319(Proteasome, cytoplasm, cytoplasm_Foxo1_Pa0_Pd0_Pe1_pUb1, R358_kdeg); R358 is "degradation of cytoplasm_Foxo1_Pa0_Pd0_Pe1_pUb1";  // modifiers: Proteasome
    R358_kdeg = 0.0001;
  R359: cytoplasm_Foxo1_Pa0_Pd1_Pe0_pUb1 => degr_Foxo1; cytoplasm*function_320(Proteasome, cytoplasm, cytoplasm_Foxo1_Pa0_Pd1_Pe0_pUb1, R359_kdeg); R359 is "degradation of cytoplasm_Foxo1_Pa0_Pd1_Pe0_pUb1";  // modifiers: Proteasome
    R359_kdeg = 0.0001;
  R360: cytoplasm_Foxo1_Pa0_Pd1_Pe1_pUb1 => degr_Foxo1; cytoplasm*function_321(Proteasome, cytoplasm, cytoplasm_Foxo1_Pa0_Pd1_Pe1_pUb1, R360_kdeg); R360 is "degradation of cytoplasm_Foxo1_Pa0_Pd1_Pe1_pUb1";  // modifiers: Proteasome
    R360_kdeg = 0.0001;
  R361: cytoplasm_Foxo1_Pa1_Pd0_Pe0_pUb1 => degr_Foxo1; cytoplasm*function_322(Proteasome, cytoplasm, cytoplasm_Foxo1_Pa1_Pd0_Pe0_pUb1, R361_kdeg); R361 is "degradation of cytoplasm_Foxo1_Pa1_Pd0_Pe0_pUb1";  // modifiers: Proteasome
    R361_kdeg = 0.0001;
  R362: cytoplasm_Foxo1_Pa1_Pd0_Pe1_pUb1 => degr_Foxo1; cytoplasm*function_323(Proteasome, cytoplasm, cytoplasm_Foxo1_Pa1_Pd0_Pe1_pUb1, R362_kdeg); R362 is "degradation of cytoplasm_Foxo1_Pa1_Pd0_Pe1_pUb1";  // modifiers: Proteasome
    R362_kdeg = 0.0001;
  R363: cytoplasm_Foxo1_Pa1_Pd1_Pe0_pUb1 => degr_Foxo1; cytoplasm*function_324(Proteasome, cytoplasm, cytoplasm_Foxo1_Pa1_Pd1_Pe0_pUb1, R363_kdeg); R363 is "degradation of cytoplasm_Foxo1_Pa1_Pd1_Pe0_pUb1";  // modifiers: Proteasome
    R363_kdeg = 0.0001;
  R364: cytoplasm_Foxo1_Pa1_Pd1_Pe1_pUb1 => degr_Foxo1; cytoplasm*function_325(Proteasome, cytoplasm, cytoplasm_Foxo1_Pa1_Pd1_Pe1_pUb1, R364_kdeg); R364 is "degradation of cytoplasm_Foxo1_Pa1_Pd1_Pe1_pUb1";  // modifiers: Proteasome
    R364_kdeg = 0.0001;
  R365: $null => nucleus_RNA_InR; function_326(dnabound, dnabound_Foxo1_Pa0_Pd0_Pe0_pUb0, R365_ktranscr); R365 is "transcription of InR by dnabound_Foxo1_Pa0_Pd0_Pe0_pUb0";  // modifiers: dnabound_Foxo1_Pa0_Pd0_Pe0_pUb0
    R365_ktranscr = 0.24;
  R366: $null => nucleus_RNA_SOD2; function_327(dnabound, dnabound_Foxo1_Pa0_Pd0_Pe0_pUb0, R366_ktranscr); R366 is "transcription of SOD2 by dnabound_Foxo1_Pa0_Pd0_Pe0_pUb0";  // modifiers: dnabound_Foxo1_Pa0_Pd0_Pe0_pUb0
    R366_ktranscr = 0.95;
  R367: $null => nucleus_RNA_InR; function_328(dnabound, dnabound_Foxo1_Pa0_Pd0_Pe0_pUb1, R367_ktranscr); R367 is "transcription of InR by dnabound_Foxo1_Pa0_Pd0_Pe0_pUb1";  // modifiers: dnabound_Foxo1_Pa0_Pd0_Pe0_pUb1
    R367_ktranscr = 0.24;
  R368: $null => nucleus_RNA_SOD2; function_329(dnabound, dnabound_Foxo1_Pa0_Pd0_Pe0_pUb1, R368_ktranscr); R368 is "transcription of SOD2 by dnabound_Foxo1_Pa0_Pd0_Pe0_pUb1";  // modifiers: dnabound_Foxo1_Pa0_Pd0_Pe0_pUb1
    R368_ktranscr = 0.95;
  R369: $null => nucleus_RNA_InR; function_330(dnabound, dnabound_Foxo1_Pa0_Pd0_Pe1_pUb0, R369_ktranscr); R369 is "transcription of InR by dnabound_Foxo1_Pa0_Pd0_Pe1_pUb0";  // modifiers: dnabound_Foxo1_Pa0_Pd0_Pe1_pUb0
    R369_ktranscr = 0.24;
  R370: $null => nucleus_RNA_SOD2; function_331(dnabound, dnabound_Foxo1_Pa0_Pd0_Pe1_pUb0, R370_ktranscr); R370 is "transcription of SOD2 by dnabound_Foxo1_Pa0_Pd0_Pe1_pUb0";  // modifiers: dnabound_Foxo1_Pa0_Pd0_Pe1_pUb0
    R370_ktranscr = 0.95;
  R371: $null => nucleus_RNA_InR; function_332(dnabound, dnabound_Foxo1_Pa0_Pd0_Pe1_pUb1, R371_ktranscr); R371 is "transcription of InR by dnabound_Foxo1_Pa0_Pd0_Pe1_pUb1";  // modifiers: dnabound_Foxo1_Pa0_Pd0_Pe1_pUb1
    R371_ktranscr = 0.24;
  R372: $null => nucleus_RNA_SOD2; function_333(dnabound, dnabound_Foxo1_Pa0_Pd0_Pe1_pUb1, R372_ktranscr); R372 is "transcription of SOD2 by dnabound_Foxo1_Pa0_Pd0_Pe1_pUb1";  // modifiers: dnabound_Foxo1_Pa0_Pd0_Pe1_pUb1
    R372_ktranscr = 0.95;
  R373: $null => nucleus_RNA_InR; function_334(dnabound, dnabound_Foxo1_Pa0_Pd1_Pe0_pUb0, R373_ktranscr); R373 is "transcription of InR by dnabound_Foxo1_Pa0_Pd1_Pe0_pUb0";  // modifiers: dnabound_Foxo1_Pa0_Pd1_Pe0_pUb0
    R373_ktranscr = 0.24;
  R374: $null => nucleus_RNA_SOD2; function_335(dnabound, dnabound_Foxo1_Pa0_Pd1_Pe0_pUb0, R374_ktranscr); R374 is "transcription of SOD2 by dnabound_Foxo1_Pa0_Pd1_Pe0_pUb0";  // modifiers: dnabound_Foxo1_Pa0_Pd1_Pe0_pUb0
    R374_ktranscr = 0.95;
  R375: $null => nucleus_RNA_InR; function_336(dnabound, dnabound_Foxo1_Pa0_Pd1_Pe0_pUb1, R375_ktranscr); R375 is "transcription of InR by dnabound_Foxo1_Pa0_Pd1_Pe0_pUb1";  // modifiers: dnabound_Foxo1_Pa0_Pd1_Pe0_pUb1
    R375_ktranscr = 0.24;
  R376: $null => nucleus_RNA_SOD2; function_337(dnabound, dnabound_Foxo1_Pa0_Pd1_Pe0_pUb1, R376_ktranscr); R376 is "transcription of SOD2 by dnabound_Foxo1_Pa0_Pd1_Pe0_pUb1";  // modifiers: dnabound_Foxo1_Pa0_Pd1_Pe0_pUb1
    R376_ktranscr = 0.95;
  R377: $null => nucleus_RNA_InR; function_338(dnabound, dnabound_Foxo1_Pa0_Pd1_Pe1_pUb0, R377_ktranscr); R377 is "transcription of InR by dnabound_Foxo1_Pa0_Pd1_Pe1_pUb0";  // modifiers: dnabound_Foxo1_Pa0_Pd1_Pe1_pUb0
    R377_ktranscr = 0.24;
  R378: $null => nucleus_RNA_SOD2; function_339(dnabound, dnabound_Foxo1_Pa0_Pd1_Pe1_pUb0, R378_ktranscr); R378 is "transcription of SOD2 by dnabound_Foxo1_Pa0_Pd1_Pe1_pUb0";  // modifiers: dnabound_Foxo1_Pa0_Pd1_Pe1_pUb0
    R378_ktranscr = 0.95;
  R379: $null => nucleus_RNA_InR; function_340(dnabound, dnabound_Foxo1_Pa0_Pd1_Pe1_pUb1, R379_ktranscr); R379 is "transcription of InR by dnabound_Foxo1_Pa0_Pd1_Pe1_pUb1";  // modifiers: dnabound_Foxo1_Pa0_Pd1_Pe1_pUb1
    R379_ktranscr = 0.24;
  R380: $null => nucleus_RNA_SOD2; function_341(dnabound, dnabound_Foxo1_Pa0_Pd1_Pe1_pUb1, R380_ktranscr); R380 is "transcription of SOD2 by dnabound_Foxo1_Pa0_Pd1_Pe1_pUb1";  // modifiers: dnabound_Foxo1_Pa0_Pd1_Pe1_pUb1
    R380_ktranscr = 0.95;
  R381: $null => nucleus_RNA_InR; function_342(dnabound, dnabound_Foxo1_Pa1_Pd0_Pe0_pUb0, R381_ktranscr); R381 is "transcription of InR by dnabound_Foxo1_Pa1_Pd0_Pe0_pUb0";  // modifiers: dnabound_Foxo1_Pa1_Pd0_Pe0_pUb0
    R381_ktranscr = 0.24;
  R382: $null => nucleus_RNA_SOD2; function_343(dnabound, dnabound_Foxo1_Pa1_Pd0_Pe0_pUb0, R382_ktranscr); R382 is "transcription of SOD2 by dnabound_Foxo1_Pa1_Pd0_Pe0_pUb0";  // modifiers: dnabound_Foxo1_Pa1_Pd0_Pe0_pUb0
    R382_ktranscr = 0.95;
  R383: $null => nucleus_RNA_InR; function_344(dnabound, dnabound_Foxo1_Pa1_Pd0_Pe0_pUb1, R383_ktranscr); R383 is "transcription of InR by dnabound_Foxo1_Pa1_Pd0_Pe0_pUb1";  // modifiers: dnabound_Foxo1_Pa1_Pd0_Pe0_pUb1
    R383_ktranscr = 0.24;
  R384: $null => nucleus_RNA_SOD2; function_345(dnabound, dnabound_Foxo1_Pa1_Pd0_Pe0_pUb1, R384_ktranscr); R384 is "transcription of SOD2 by dnabound_Foxo1_Pa1_Pd0_Pe0_pUb1";  // modifiers: dnabound_Foxo1_Pa1_Pd0_Pe0_pUb1
    R384_ktranscr = 0.95;
  R385: $null => nucleus_RNA_InR; function_346(dnabound, dnabound_Foxo1_Pa1_Pd0_Pe1_pUb0, R385_ktranscr); R385 is "transcription of InR by dnabound_Foxo1_Pa1_Pd0_Pe1_pUb0";  // modifiers: dnabound_Foxo1_Pa1_Pd0_Pe1_pUb0
    R385_ktranscr = 0.24;
  R386: $null => nucleus_RNA_SOD2; function_347(dnabound, dnabound_Foxo1_Pa1_Pd0_Pe1_pUb0, R386_ktranscr); R386 is "transcription of SOD2 by dnabound_Foxo1_Pa1_Pd0_Pe1_pUb0";  // modifiers: dnabound_Foxo1_Pa1_Pd0_Pe1_pUb0
    R386_ktranscr = 0.95;
  R387: $null => nucleus_RNA_InR; function_348(dnabound, dnabound_Foxo1_Pa1_Pd0_Pe1_pUb1, R387_ktranscr); R387 is "transcription of InR by dnabound_Foxo1_Pa1_Pd0_Pe1_pUb1";  // modifiers: dnabound_Foxo1_Pa1_Pd0_Pe1_pUb1
    R387_ktranscr = 0.24;
  R388: $null => nucleus_RNA_SOD2; function_349(dnabound, dnabound_Foxo1_Pa1_Pd0_Pe1_pUb1, R388_ktranscr); R388 is "transcription of SOD2 by dnabound_Foxo1_Pa1_Pd0_Pe1_pUb1";  // modifiers: dnabound_Foxo1_Pa1_Pd0_Pe1_pUb1
    R388_ktranscr = 0.95;
  R389: $null => nucleus_RNA_InR; function_350(dnabound, dnabound_Foxo1_Pa1_Pd1_Pe0_pUb0, R389_ktranscr); R389 is "transcription of InR by dnabound_Foxo1_Pa1_Pd1_Pe0_pUb0";  // modifiers: dnabound_Foxo1_Pa1_Pd1_Pe0_pUb0
    R389_ktranscr = 0.24;
  R390: $null => nucleus_RNA_SOD2; function_351(dnabound, dnabound_Foxo1_Pa1_Pd1_Pe0_pUb0, R390_ktranscr); R390 is "transcription of SOD2 by dnabound_Foxo1_Pa1_Pd1_Pe0_pUb0";  // modifiers: dnabound_Foxo1_Pa1_Pd1_Pe0_pUb0
    R390_ktranscr = 0.95;
  R391: $null => nucleus_RNA_InR; function_352(dnabound, dnabound_Foxo1_Pa1_Pd1_Pe0_pUb1, R391_ktranscr); R391 is "transcription of InR by dnabound_Foxo1_Pa1_Pd1_Pe0_pUb1";  // modifiers: dnabound_Foxo1_Pa1_Pd1_Pe0_pUb1
    R391_ktranscr = 0.24;
  R392: $null => nucleus_RNA_SOD2; function_353(dnabound, dnabound_Foxo1_Pa1_Pd1_Pe0_pUb1, R392_ktranscr); R392 is "transcription of SOD2 by dnabound_Foxo1_Pa1_Pd1_Pe0_pUb1";  // modifiers: dnabound_Foxo1_Pa1_Pd1_Pe0_pUb1
    R392_ktranscr = 0.95;
  R393: $null => nucleus_RNA_InR; function_354(dnabound, dnabound_Foxo1_Pa1_Pd1_Pe1_pUb0, R393_ktranscr); R393 is "transcription of InR by dnabound_Foxo1_Pa1_Pd1_Pe1_pUb0";  // modifiers: dnabound_Foxo1_Pa1_Pd1_Pe1_pUb0
    R393_ktranscr = 0.24;
  R394: $null => nucleus_RNA_SOD2; function_355(dnabound, dnabound_Foxo1_Pa1_Pd1_Pe1_pUb0, R394_ktranscr); R394 is "transcription of SOD2 by dnabound_Foxo1_Pa1_Pd1_Pe1_pUb0";  // modifiers: dnabound_Foxo1_Pa1_Pd1_Pe1_pUb0
    R394_ktranscr = 0.95;
  R395: $null => nucleus_RNA_InR; function_356(dnabound, dnabound_Foxo1_Pa1_Pd1_Pe1_pUb1, R395_ktranscr); R395 is "transcription of InR by dnabound_Foxo1_Pa1_Pd1_Pe1_pUb1";  // modifiers: dnabound_Foxo1_Pa1_Pd1_Pe1_pUb1
    R395_ktranscr = 0.24;
  R396: $null => nucleus_RNA_SOD2; function_357(dnabound, dnabound_Foxo1_Pa1_Pd1_Pe1_pUb1, R396_ktranscr); R396 is "transcription of SOD2 by dnabound_Foxo1_Pa1_Pd1_Pe1_pUb1";  // modifiers: dnabound_Foxo1_Pa1_Pd1_Pe1_pUb1
    R396_ktranscr = 0.95;
  basal_transcription_of_InR: $null => nucleus_RNA_InR; Constant_flux_irreversible(basal_transcription_of_InR_v);
    basal_transcription_of_InR_v = 5;
  export_of_InR_RNA: nucleus_RNA_InR => cytoplasm_RNA_InR; Function_for_export_of_InR_RNA_1(export_of_InR_RNA_kexp, nucleus, nucleus_RNA_InR);
    export_of_InR_RNA_kexp = 0.22;
  cyto_degr_of_InR_RNA: cytoplasm_RNA_InR => $null; cytoplasm*function_360(cytoplasm, cytoplasm_RNA_InR, cyto_degr_of_InR_RNA_kmdeg);
    cyto_degr_of_InR_RNA_kmdeg = 5.622;
  translation_of_InR: $null => cytoplasm_InR; cytoplasm*function_361(cytoplasm, cytoplasm_RNA_InR, translation_of_InR_ktransl);  // modifiers: cytoplasm_RNA_InR
    translation_of_InR_ktransl = 2.46;
  degradation_of_InR_protein: cytoplasm_InR => $null; cytoplasm*function_362(cytoplasm, cytoplasm_InR, degradation_of_InR_protein_kpdeg);
    degradation_of_InR_protein_kpdeg = 0.0044;
  basal_transcription_of_SOD2: $null => nucleus_RNA_SOD2; Constant_flux_irreversible(basal_transcription_of_SOD2_v);
    basal_transcription_of_SOD2_v = 15;
  export_of_SOD2_RNA: nucleus_RNA_SOD2 => cytoplasm_RNA_SOD2; function_363(export_of_SOD2_RNA_kexp, nucleus, nucleus_RNA_SOD2);
    export_of_SOD2_RNA_kexp = 0.22;
  cyto_degr_of_SOD2_RNA: cytoplasm_RNA_SOD2 => $null; cytoplasm*function_364(cytoplasm, cytoplasm_RNA_SOD2, cyto_degr_of_SOD2_RNA_kmdeg);
    cyto_degr_of_SOD2_RNA_kmdeg = 5.622;
  translation_of_SOD2: $null => cytoplasm_SOD2; cytoplasm*function_365(cytoplasm, cytoplasm_RNA_SOD2, translation_of_SOD2_ktransl);  // modifiers: cytoplasm_RNA_SOD2
    translation_of_SOD2_ktransl = 1.23;
  degradation_of_SOD2_protein: cytoplasm_SOD2 => $null; cytoplasm*function_366(cytoplasm, cytoplasm_SOD2, degradation_of_SOD2_protein_kpdeg);
    degradation_of_SOD2_protein_kpdeg = 0.0019;

  // Unit definitions:
  unit volume = litre;
  unit substance = item;
  unit time = 60 second;
  unit area = metre^2;
end
