// SBML level 3 version 2

model MODEL1305280001()
  // Proctor2013 - Cartilage breakdown, interventions to reduce collagen release
  // The molecular pathways involved in cartilage breakdown is studied using this model to examine possible interventions to reduce cartilage collagen release. The model contains three separate submodels, one which describes the IL-1/JNK signalling pathway, secondly the OSM/STAT3 signalling pathway, and lastly a module which includes proMMP (Matrix matalloproteinase) activation, and aggrecan and collagen release.
  // This model is described in the article:
  // A computer simulation approach for assessing therapeutic intervention points to prevent cytokine-induced cartilage breakdown.
  // Proctor CJ, Macdonald C, Milner JM, Rowan AD, Cawston TE.
  // Arthritis Rheum. 2013 Nov 27.
  // Abstract:
  // Objective. To use a novel computational approach to examine the molecular pathways involved in cartilage breakdown and to use computer simulation to test possible interventions to reduce collagen release. Methods. We constructed a computational model of the relevant molecular pathways using the Systems Biology Markup Language (SBML), a computer-readable format of a biochemical network. The model was constructed using our experimental data showing that interleukin-1 (IL-1) and oncostatin M (OSM) act synergistically to up-regulate collagenase protein and activity and initiate cartilage collagen breakdown. Simulations were performed in the COPASI software package. Results. The model predicted that simulated inhibition of c-Jun N-terminal kinase (JNK) or p38 mitogen-activated protein kinase, and over-expression of tissue inhibitor of metalloproteinases 3 (TIMP-3) led to a reduction in collagen release. Over-expression of TIMP-1 was much less effective than TIMP-3 and led to a delay, rather than a reduction, in collagen release. Simulated interventions of receptor antagonists and inhibition of Janus kinase 1 (JAK1), the first kinase in the OSM pathway, were ineffective. So, importantly, the model predicts that it is more effective to intervene at targets which are downstream, such as the JNK pathway, rather than close to the cytokine signal. In vitro experiments confirmed the effectiveness of JNK inhibition. Conclusion. Our study shows the value of computer modelling as a tool for examining possible interventions to reduce cartilage collagen breakdown. The model predicts interventions that either prevent transcription or inhibit activity of collagenases are promising strategies and should be investigated further in an experimental setting. © 2013 American College of Rheumatology.
  // This model is hosted on BioModels Database and identified by: BIOMD0000000504 .
  // To cite BioModels Database, please use: BioModels Database: An enhanced, curated and annotated resource for published quantitative kinetic models .
  // To the extent possible under law, all copyright and related or neighbouring rights to this encoded model have been dedicated to the public domain worldwide. Please refer to CC0 Public Domain Dedication for more information.
  // biomodels.db:MODEL1305280001
  // biomodels.db:BIOMD0000000504
  // isDescribedBy pubmed:24285357
  // occursIn BTO:0000249
  // hasTaxon taxonomy:9606
  // isVersionOf GO:0010710
  // model units - substance: substance, time: second, volume: volume, area: area, length: metre, extent: substance

  // Compartments:
  compartment cytoplasm = 1 volume;  // isVersionOf BTO:0000249
  compartment nucleus = 1 volume;  // isVersionOf GO:0005634
  compartment membrane = 1 volume;  // isVersionOf GO:0009986
  compartment ecm = 1 volume;  // isVersionOf GO:0005737

  // Species:
  substanceOnly species ADAMTS4_mRNA in cytoplasm = 0;  // encodes uniprot:O75173; isEncodedBy ensembl:ENSG00000158859
  substanceOnly species cFos in cytoplasm = 0;  // isVersionOf uniprot:P01100
  substanceOnly species cFos_mRNA in cytoplasm = 0;  // encodes uniprot:P01100; isEncodedBy ensembl:ENSG00000170345
  substanceOnly species cJun in cytoplasm = 100;  // isVersionOf uniprot:P05412
  substanceOnly species cJun_mRNA in cytoplasm = 5;  // encodes uniprot:P05412; isEncodedBy ensembl:ENSG00000177606
  substanceOnly species DUSP16 in cytoplasm = 0;  // isVersionOf uniprot:Q9BY84
  substanceOnly species IRAK2 in cytoplasm = 100;  // isVersionOf uniprot:O43187
  substanceOnly species IRAK2_TRAF6 in cytoplasm = 0;  // hasPart uniprot:Q9Y4K3 uniprot:O43187
  substanceOnly species IRAK2_TRAF6_PP4 in cytoplasm = 0;  // hasPart uniprot:P60510 uniprot:O43187 uniprot:Q9Y4K3
  substanceOnly species JAK1 in cytoplasm = 100;  // isVersionOf uniprot:P23458
  substanceOnly species JAK1_P in cytoplasm = 0;  // isVersionOf uniprot:P23458 pubchem.compound:3842
  substanceOnly species JNK in cytoplasm = 100;  // isVersionOf uniprot:P45983
  substanceOnly species JNK_P in cytoplasm = 0;  // isVersionOf uniprot:P45983 pubchem.compound:3842
  // Matriptase is referred to as MMPActivator in the paper.
  substanceOnly species Matriptase in cytoplasm = 100;  // isVersionOf uniprot:Q9Y5Y6
  substanceOnly species MKP1 in cytoplasm = 0;  // isVersionOf uniprot:P28562
  substanceOnly species MMP1_mRNA in cytoplasm = 0;  // encodes uniprot:P03956; isEncodedBy ensembl:ENSG00000196611
  substanceOnly species MMP3_mRNA in cytoplasm = 0;  // encodes uniprot:P08254; isEncodedBy ensembl:ENSG00000149968
  substanceOnly species MMP13_mRNA in cytoplasm = 0;  // isEncodedBy ensembl:ENSG00000137745; encodes uniprot:P45452
  substanceOnly species p38 in cytoplasm = 100;  // isVersionOf uniprot:Q15759
  substanceOnly species p38_P in cytoplasm = 0;  // isVersionOf uniprot:Q15759 pubchem.compound:3842
  substanceOnly species PP4 in cytoplasm = 0;  // isVersionOf uniprot:P60510
  substanceOnly species proMMP1 in cytoplasm = 0;  // isVersionOf uniprot:P03956
  substanceOnly species proMMP3 in cytoplasm = 0;  // isVersionOf uniprot:P08254
  substanceOnly species proMMP13 in cytoplasm = 0;  // isVersionOf uniprot:P45452
  substanceOnly species PTPRT in cytoplasm = 0;  // isVersionOf uniprot:O14522
  substanceOnly species SOCS3 in cytoplasm = 0;  // isVersionOf uniprot:O14543
  substanceOnly species SOCS3_mRNA in cytoplasm = 0;  // isEncodedBy ensembl:ENSG00000184557; encodes uniprot:O14543
  substanceOnly species STAT3_cyt in cytoplasm = 100;  // occursIn GO:0005737; isVersionOf uniprot:P40763
  substanceOnly species STAT3_P_cyt in cytoplasm = 0;  // occursIn GO:0005737; isVersionOf uniprot:P40763 pubchem.compound:3842
  substanceOnly species TIMP1_mRNA in cytoplasm = 20;  // isEncodedBy ensembl:ENSG00000102265; encodes uniprot:P01033
  substanceOnly species TIMP3_mRNA in cytoplasm = 20;  // isEncodedBy ensembl:ENSG00000100234; encodes uniprot:P35625
  substanceOnly species TRAF6 in cytoplasm = 100;  // isVersionOf uniprot:Q9Y4K3
  substanceOnly species TRAF6_PP4 in cytoplasm = 0;  // hasPart uniprot:P60510 uniprot:Q9Y4K3
  substanceOnly species ADAMTS4 in ecm = 0;  // isVersionOf uniprot:O75173
  substanceOnly species ADAMTS4_TIMP1 in ecm = 0;  // hasPart uniprot:P01033 uniprot:O75173
  substanceOnly species ADAMTS4_TIMP3 in ecm = 0;  // hasPart uniprot:P01033 uniprot:O75173
  substanceOnly species Aggrecan in ecm = 0;  // isVersionOf uniprot:Q6PID9
  substanceOnly species Aggrecan_Collagen2 in ecm = 100000;  // hasPart uniprot:P02458 uniprot:Q6PID9
  substanceOnly species AggFrag in ecm = 0;  // isVersionOf uniprot:Q6PID9
  substanceOnly species ColFrag in ecm = 0;  // isVersionOf uniprot:P02458
  substanceOnly species Collagen2 in ecm = 0;  // isVersionOf uniprot:P02458
  substanceOnly species IL1 in ecm = 100;  // isVersionOf uniprot:P01583
  substanceOnly species MMP1 in ecm = 0;  // isVersionOf uniprot:P03956
  substanceOnly species MMP1_TIMP1 in ecm = 0;  // hasPart uniprot:P01033 uniprot:P03956
  substanceOnly species MMP1_TIMP3 in ecm = 0;  // hasPart uniprot:P35625 uniprot:P03956
  substanceOnly species MMP3 in ecm = 0;  // isVersionOf uniprot:P08254
  substanceOnly species MMP3_TIMP1 in ecm = 0;  // hasPart uniprot:P01033 uniprot:P08254
  substanceOnly species MMP3_TIMP3 in ecm = 0;  // hasPart uniprot:P35625 uniprot:P08254
  substanceOnly species MMP13 in ecm = 0;  // isVersionOf uniprot:P45452
  substanceOnly species MMP13_TIMP1 in ecm = 0;  // hasPart uniprot:P01033 uniprot:P45452
  substanceOnly species MMP13_TIMP3 in ecm = 0;  // hasPart uniprot:P35625 uniprot:P45452
  substanceOnly species OSM in ecm = 1000;  // isVersionOf uniprot:P13725
  substanceOnly species TIMP1 in ecm = 200;  // isVersionOf uniprot:P01033
  substanceOnly species TIMP3 in ecm = 200;  // isVersionOf uniprot:P35625
  substanceOnly species IL1_IL1R in membrane = 0;  // hasPart uniprot:P01583 uniprot:P14778
  substanceOnly species IL1_IL1Ra in membrane = 0;  // hasPart uniprot:P01583 uniprot:P14778
  substanceOnly species IL1_IL1R_IRAK2 in membrane = 0;  // hasPart uniprot:O43187 uniprot:P01583 uniprot:P14778
  substanceOnly species IL1R in membrane = 100;  // isVersionOf uniprot:P14778
  substanceOnly species IL1Ra in membrane = 0;  // isVersionOf uniprot:P14778
  substanceOnly species OSM_OSMR in membrane = 0;  // hasPart uniprot:Q99650 uniprot:P13725
  substanceOnly species OSM_OSMRa in membrane = 0;  // hasPart uniprot:P13725 uniprot:Q99650
  substanceOnly species OSMR_SOCS3 in membrane = 0;  // hasPart uniprot:Q99650 uniprot:O14543
  substanceOnly species OSMR in membrane = 100;  // isVersionOf uniprot:Q99650
  substanceOnly species OSMRa in membrane = 0;  // isVersionOf uniprot:Q99650
  substanceOnly species cFos_cJun in nucleus = 0;  // hasPart uniprot:P01100 uniprot:P05412
  substanceOnly species cFos_P in nucleus = 0;  // isVersionOf uniprot:P01100 pubchem.compound:3842
  substanceOnly species cJun_P in nucleus = 0;  // isVersionOf uniprot:P05412 pubchem.compound:3842
  substanceOnly species cJun_dimer in nucleus = 0;  // hasPart uniprot:P05412
  substanceOnly species SP1 in nucleus = 0;  // isVersionOf uniprot:P08047
  substanceOnly species SP1_TIMP1_DNA in nucleus = 0;  // hasPart CHEBI:16991 uniprot:P08047 uniprot:P01033
  substanceOnly species STAT3_nuc in nucleus = 0;  // isVersionOf uniprot:P40763; occursIn GO:0005634
  substanceOnly species STAT3_P_nuc in nucleus = 0;  // isVersionOf uniprot:P40763 pubchem.compound:3842; occursIn GO:0005634
  substanceOnly species TIMP1_DNA in nucleus = 2;  // hasPart CHEBI:16991 uniprot:P01033
  substanceOnly species $Source in cytoplasm = 1;
  substanceOnly species $Sink in cytoplasm = 1;

  // Parameters:
  kactMMP13mmp3 = 5e-8;
  kactMMP1mat = 1e-9;
  kactMMP1mmp3 = 1e-8;
  kactMMP3mat = 4e-6;
  kAP1activity = 1;
  kbincFoscJun = 5e-5;
  kbinIL1IL1R = 0.0001;
  kbinIL1IL1Ra = 0.0001;
  kbinIRAK2 = 5e-5;
  kbinOSMOSMR = 1e-5;
  kbinOSMOSMRa = 0.0001;
  kbinSOCS3OSMR = 0.005;
  kbinSP1TIMP1DNA = 1e-5;
  kbinTRAF6 = 1e-5;
  kcyt2nucSTAT3 = 0.001;
  kdedimercJun = 0.01;
  kdegADAMTS4 = 5e-5;
  kdegADAMTS4mRNA = 1.4e-5;
  kdegAggrecan = 3e-8;
  kdegcFos = 0.0002;
  kdegcFosmRNA = 0.003;
  kdegcJun = 0.00013;
  kdegcJunmRNA = 0.003;
  kdegCollagen2mmp1 = 5e-12;
  kdegCollagen2mmp13 = 5e-11;
  kdegDUSP16 = 0.00013;
  kdegIL1 = 0.0002;
  kdegMatriptase = 8e-6;
  kdegMKP1 = 0.0001;
  kdegMMP1 = 1e-6;
  kdegMMP13 = 1e-6;
  kdegMMP13mRNA = 6.4e-6;
  kdegMMP1mRNA = 6.4e-6;
  kdegMMP3 = 1e-6;
  kdegMMP3mRNA = 6.4e-6;
  kdegOSM = 4.8e-5;
  kdegPP4 = 0.0001;
  kdegPTPRT = 5e-5;
  kdegSOCS3 = 0.0008;
  kdegSOCS3mRNA = 0.0004;
  kdegSP1 = 2e-5;
  kdegTIMP1 = 2e-5;
  kdegTIMP1mRNA = 1.4e-5;
  kdegTIMP3 = 2e-5;
  kdegTIMP3mRNA = 1.4e-5;
  kdephoscFos = 0.0001;
  kdephoscFosDUSP16 = 0.0001;
  kdephoscJun = 0.01;
  kdephosJAK1 = 0.0004;
  kdephosJAK1PTPRT = 0.004;
  kdephosJNK = 0.001;
  kdephosJNKDUSP16 = 0.001;
  kdephosp38 = 0.001;
  kdephosp38MKP1 = 1e-5;
  kdephosSTAT3 = 1e-5;
  kdephosSTAT3nuc = 1e-7;
  kdephosSTAT3nucPTPRT = 0.0005;
  kdephosSTAT3PTPRT = 0.0008;
  kdimercJun = 5e-5;
  kinhibADAMTS4TIMP1 = 3e-6;
  kinhibADAMTS4TIMP3 = 0.0005;
  kinhibMMP13TIMP1 = 3e-7;
  kinhibMMP13TIMP3 = 1e-8;
  kinhibMMP1TIMP1 = 3e-7;
  kinhibMMP1TIMP3 = 1e-8;
  kinhibMMP3TIMP1 = 3e-7;
  kinhibMMP3TIMP3 = 1e-8;
  kinhibTRAF6 = 0.5;
  knuc2cytSTAT3 = 0.001;
  kphoscFos = 5e-7;
  kphoscJun = 0.0001;
  kphosJAK1 = 1e-5;
  kphosJNK = 0.0001;
  kphosp38 = 0.0001;
  kphosSTAT3 = 0.005;
  krelADAMTS4TIMP1 = 0.001;
  krelADAMTS4TIMP3 = 0.001;
  krelcFoscJun = 4e-5;
  krelIL1IL1R = 0.001;
  krelIL1IL1Ra = 0.0001;
  krelIRAK2 = 0.001;
  krelMMP1 = 0.001;
  krelMMP13 = 0.001;
  krelMMP13TIMP3 = 0.001;
  krelMMP1TIMP3 = 0.001;
  krelMMP3 = 0.001;
  krelMMP3TIMP3 = 0.001;
  krelOSMOSMR = 1e-5;
  krelOSMOSMRa = 1e-5;
  krelSOCS3OSMR = 1e-5;
  krelSP1TIMP1DNA = 5e-6;
  krelTRAF6 = 0.0001;
  krelTRAF6PP4 = 1e-6;
  ksynADAMTS4 = 0.0005;
  ksynADAMTS4mRNA = 0.0005;
  ksynADAMTS4mRNAcJun = 4e-6;
  ksynbasalcJunmRNA = 0.015;
  ksynbasalTIMP1mRNA = 0.00014;
  ksynbasalTIMP3mRNA = 0.00028;
  ksyncFos = 0.001;
  ksyncFosmRNA = 5e-6;
  ksyncFosmRNAStat3 = 0.05;
  ksyncJun = 0.0026;
  ksyncJunmRNA = 0.0125;
  ksyncJunmRNAcJun = 0.005;
  ksynDUSP16 = 0.005;
  ksynDUSP16cJun = 0.0002;
  ksynMatriptase = 9e-10;
  ksynMKP1 = 2.5e-5;
  ksynMKP1cJun = 1e-6;
  ksynMMP1 = 0.00015;
  ksynMMP13 = 1.5e-5;
  ksynMMP13mRNA = 0.0005;
  ksynMMP13mRNAcJun = 2e-5;
  ksynMMP1mRNA = 0.005;
  ksynMMP1mRNAcJun = 0.0002;
  ksynMMP3 = 3e-5;
  ksynMMP3mRNA = 0.005;
  ksynMMP3mRNAcJun = 0.0002;
  ksynPP4 = 0.005;
  ksynPP4cJun = 0.0002;
  ksynPTPRT = 0.0001;
  ksynSOCS3 = 0.001;
  ksynSOCS3mRNA = 0.006;
  ksynSP1 = 2e-5;
  ksynTIMP1 = 0.0002;
  ksynTIMP1mRNA = 5e-7;
  ksynTIMP1mRNAStat3 = 4e-5;
  ksynTIMP3 = 0.0004;
  ksynTIMP3mRNA = 5e-7;
  ksynTIMP3mRNAStat3 = 4e-5;

  // Reactions:
  IL1binding: IL1 + IL1R => IL1_IL1R; kbinIL1IL1R*IL1*IL1R;
  IL1release: IL1_IL1R => IL1 + IL1R; krelIL1IL1R*IL1_IL1R;
  IL1antagonistbinding: IL1 + IL1Ra => IL1_IL1Ra; kbinIL1IL1Ra*IL1*IL1Ra;
  IL1antagonistrelease: IL1_IL1Ra => IL1 + IL1Ra; krelIL1IL1Ra*IL1_IL1Ra;
  IL1degradation: IL1 => $Sink; kdegIL1*IL1;
  IRAK2binding: IL1_IL1R + IRAK2 => IL1_IL1R_IRAK2; kbinIRAK2*IL1_IL1R*IRAK2;
  IRAK2release: IL1_IL1R_IRAK2 => IL1_IL1R + IRAK2; krelIRAK2*IL1_IL1R_IRAK2;
  TRAF6binding: IL1_IL1R_IRAK2 + TRAF6 => IL1_IL1R + IRAK2_TRAF6; kbinTRAF6*IL1_IL1R_IRAK2*TRAF6;
  TRAF6release: IRAK2_TRAF6 => IRAK2 + TRAF6; krelTRAF6*IRAK2_TRAF6;
  JNKphosphorylation: JNK + IRAK2_TRAF6 => JNK_P + IRAK2_TRAF6; kphosJNK*JNK*IRAK2_TRAF6;
  JNKdephosphorylation: JNK_P => JNK; kdephosJNK*JNK_P;
  JNKdephosphorylationByDUSP16: JNK_P + DUSP16 => JNK + DUSP16; kdephosJNKDUSP16*JNK_P*DUSP16;
  cJunPhosphorylation: cJun + JNK_P => cJun_P + JNK_P; kphoscJun*cJun*JNK_P;
  cJunDephosphorylation: cJun_P => cJun; kdephoscJun*cJun_P;
  cJunDimerisation: 2 cJun_P => cJun_dimer; kdimercJun*cJun_P*(cJun_P - 1)*0.5;
  cJunDedimerisation: cJun_dimer => 2 cJun_P; kdedimercJun*cJun_dimer;
  cJunTranscriptionAP1: cFos_cJun => cJun_mRNA + cFos_cJun; ksyncJunmRNA*cFos_cJun*kAP1activity;
  cJunTranscriptioncJun: cJun_dimer => cJun_mRNA + cJun_dimer; ksyncJunmRNAcJun*cJun_dimer;
  cJunBasalTranscription: $Source => cJun_mRNA; ksynbasalcJunmRNA*Source;
  cJunmRNADegradation: cJun_mRNA => $Sink; kdegcJunmRNA*cJun_mRNA;
  cJunTranslation: cJun_mRNA => cJun_mRNA + cJun; ksyncJun*cJun_mRNA;
  cJunDegradation: cJun => $Sink; kdegcJun*cJun;
  p38phosphorylation: p38 + IRAK2_TRAF6 => p38_P + IRAK2_TRAF6; kphosp38*p38*IRAK2_TRAF6;
  p38dephosphorylation: p38_P => p38; kdephosp38*p38_P;
  p38dephosphorylationMKP1: p38_P + MKP1 => p38 + MKP1; kdephosp38MKP1*p38_P*MKP1;
  MMP1Transcription_AP1: cFos_cJun => cFos_cJun + MMP1_mRNA; ksynMMP1mRNA*cFos_cJun*kAP1activity;
  MMP1Transcription_cJun_dimer: cJun_dimer => cJun_dimer + MMP1_mRNA; ksynMMP1mRNAcJun*cJun_dimer;
  MMP1Translation: MMP1_mRNA => MMP1_mRNA + proMMP1; ksynMMP1*MMP1_mRNA;
  MMP1mRNADegradation: MMP1_mRNA => $Sink; kdegMMP1mRNA*MMP1_mRNA;
  proMMP1cleavageByMatriptase: proMMP1 + Matriptase => MMP1 + Matriptase; kactMMP1mat*proMMP1*Matriptase;
  proMMP1cleavageByMMP3: proMMP1 + MMP3 => MMP1 + MMP3; kactMMP1mmp3*proMMP1*MMP3;
  MMP1Degradation: MMP1 => $Sink; kdegMMP1*MMP1;
  MMP3Transcription_AP1: cFos_cJun => cFos_cJun + MMP3_mRNA; ksynMMP3mRNA*cFos_cJun*kAP1activity;
  MMP3Transcription_cJun_dimer: cJun_dimer => cJun_dimer + MMP3_mRNA; ksynMMP3mRNAcJun*cJun_dimer;
  MMP3Translation: MMP3_mRNA => MMP3_mRNA + proMMP3; ksynMMP3*MMP3_mRNA;
  MMP3mRNADegradation: MMP3_mRNA => $Sink; kdegMMP3mRNA*MMP3_mRNA;
  proMMP3cleavageByMatriptase: proMMP3 + Matriptase => MMP3 + Matriptase; kactMMP3mat*proMMP3*Matriptase;
  MMP3Degradation: MMP3 => $Sink; kdegMMP3*MMP3;
  MMP13Transcription_AP1: cFos_cJun => cFos_cJun + MMP13_mRNA; ksynMMP13mRNA*cFos_cJun*kAP1activity;
  MMP13Transcription_cJun_dimer: cJun_dimer => cJun_dimer + MMP13_mRNA; ksynMMP13mRNAcJun*cJun_dimer;
  MMP13Translation: MMP13_mRNA => MMP13_mRNA + proMMP13; ksynMMP13*MMP13_mRNA;
  MMP13mRNADegradation: MMP13_mRNA => $Sink; kdegMMP13mRNA*MMP13_mRNA;
  proMMP13cleavageByMMP3: proMMP13 + MMP3 => MMP13 + MMP3; kactMMP13mmp3*proMMP13*MMP3;
  MMP13Degradation: MMP13 => $Sink; kdegMMP13*MMP13;
  TIMP1Translation: TIMP1_mRNA => TIMP1_mRNA + TIMP1; ksynTIMP1*TIMP1_mRNA;
  TIMP1mRNADegradation: TIMP1_mRNA => $Sink; kdegTIMP1mRNA*TIMP1_mRNA;
  TIMP1Degradation: TIMP1 => $Sink; kdegTIMP1*TIMP1;
  ADAMTS4Transcription_AP1: cFos_cJun => cFos_cJun + ADAMTS4_mRNA; ksynADAMTS4mRNA*cFos_cJun*kAP1activity;
  ADAMTS4Transcription_cJun_dimer: cJun_dimer => cJun_dimer + ADAMTS4_mRNA; ksynADAMTS4mRNAcJun*cJun_dimer;
  ADAMTS4Translation: ADAMTS4_mRNA => ADAMTS4_mRNA + ADAMTS4; ksynADAMTS4*ADAMTS4_mRNA;
  ADAMTS4mRNADegradation: ADAMTS4_mRNA => $Sink; kdegADAMTS4mRNA*ADAMTS4_mRNA;
  ADAMTS4Degradation: ADAMTS4 => $Sink; kdegADAMTS4*ADAMTS4;
  PP4Synthesis: cFos_cJun => cFos_cJun + PP4; ksynPP4*cFos_cJun*kAP1activity;
  PP4Synthesis_cJun_dimer: cJun_dimer => cJun_dimer + PP4; ksynPP4cJun*cJun_dimer;
  DUSP16Synthesis: cFos_cJun => cFos_cJun + DUSP16; ksynDUSP16*cFos_cJun*kAP1activity;
  DUSP16Synthesis_cJun_dimer: cJun_dimer => cJun_dimer + DUSP16; ksynDUSP16cJun*cJun_dimer;
  PP4Degradation: PP4 => $Sink; kdegPP4*PP4;
  DUSP16Degradation: DUSP16 => $Sink; kdegDUSP16*DUSP16;
  TRAF6Inhibition: TRAF6 + PP4 => TRAF6_PP4; kinhibTRAF6*TRAF6*PP4;
  BoundTRAF6Inhibition: IRAK2_TRAF6 + PP4 => IRAK2_TRAF6_PP4; kinhibTRAF6*IRAK2_TRAF6*PP4;
  TRAF6PP4Disassociation: TRAF6_PP4 => TRAF6 + PP4; krelTRAF6PP4*TRAF6_PP4;
  IRAK2_TRAF6PP4Disassociation: IRAK2_TRAF6_PP4 => IRAK2_TRAF6 + PP4; krelTRAF6PP4*IRAK2_TRAF6_PP4;
  Transcription_cFos_byAP1: cFos_cJun => cFos_cJun + cFos_mRNA; ksyncFosmRNA*cFos_cJun*kAP1activity;
  cFosmRNA_Degradation: cFos_mRNA => $Sink; kdegcFosmRNA*cFos_mRNA;
  cFosSynthesis: cFos_mRNA => cFos_mRNA + cFos; ksyncFos*cFos_mRNA;
  cFosDegradation: cFos => $Sink; kdegcFos*cFos;
  cFosPhosphorylation_p38: p38_P + cFos => p38_P + cFos_P; kphoscFos*p38_P*cFos;
  cFosDephosphorylation: cFos_P => cFos; kdephoscFos*cFos_P;
  MKP1Synthesis: cFos_cJun => MKP1 + cFos_cJun; ksynMKP1*cFos_cJun*kAP1activity;
  MKP1Synthesis_cJun_dimer: cJun_dimer => MKP1 + cJun_dimer; ksynMKP1cJun*cJun_dimer;
  MKP1Degradation: MKP1 => $Sink; kdegMKP1*MKP1;
  cFosDephosphorylationByDusp16: cFos_P + DUSP16 => cFos + DUSP16; kdephoscFosDUSP16*cFos_P*DUSP16;
  cFoscJunBinding: cFos_P + cJun_P => cFos_cJun; kbincFoscJun*cFos_P*cJun_P;
  cFoscJunRelease: cFos_cJun => cFos_P + cJun_P; krelcFoscJun*cFos_cJun;
  OSM_OSMR_binding: OSM + OSMR => OSM_OSMR; kbinOSMOSMR*OSM*OSMR;
  OSM_OSMR_release: OSM_OSMR => OSM + OSMR; krelOSMOSMR*OSM_OSMR;
  OSM_OSMRa_binding: OSM + OSMRa => OSM_OSMRa; kbinOSMOSMRa*OSM*OSMRa;
  OSM_OSMRa_release: OSM_OSMRa => OSM + OSMRa; krelOSMOSMRa*OSM_OSMRa;
  JAK1_Phosphorylation: JAK1 + OSM_OSMR => JAK1_P + OSM_OSMR; kphosJAK1*JAK1*OSM_OSMR;
  JAK1_Dephosphorylation: JAK1_P => JAK1; kdephosJAK1*JAK1_P;
  JAK1_DephosphorylationByPTPRT: JAK1_P + PTPRT => JAK1 + PTPRT; kdephosJAK1PTPRT*JAK1_P*PTPRT;
  STAT3_Phosphorylation: STAT3_cyt + JAK1_P => STAT3_P_cyt + JAK1_P; kphosSTAT3*STAT3_cyt*JAK1_P;
  STAT3_cyt_Dephosphorylation: STAT3_P_cyt => STAT3_cyt; kdephosSTAT3*STAT3_P_cyt;
  STAT3_cyt_DephosphorylationByPTPRT: STAT3_P_cyt + PTPRT => STAT3_cyt + PTPRT; kdephosSTAT3PTPRT*STAT3_P_cyt*PTPRT;
  STAT3_nuc_Dephosphorylation: STAT3_P_nuc => STAT3_nuc; kdephosSTAT3nuc*STAT3_P_nuc;
  STAT3_nuc_DephosphorylationByPTPRT: STAT3_P_nuc + PTPRT => STAT3_nuc + PTPRT; kdephosSTAT3nucPTPRT*STAT3_P_nuc*PTPRT;
  STAT3_transport_to_nucleus: STAT3_P_cyt => STAT3_P_nuc; kcyt2nucSTAT3*STAT3_P_cyt;
  STAT3_transport_from_nucleus: STAT3_nuc => STAT3_cyt; knuc2cytSTAT3*STAT3_nuc;
  cFos_induction_by_STAT3: STAT3_P_nuc => STAT3_P_nuc + cFos_mRNA; ksyncFosmRNAStat3*STAT3_P_nuc;
  PTPRT_induction_by_STAT3: STAT3_P_nuc => STAT3_P_nuc + PTPRT; ksynPTPRT*STAT3_P_nuc;
  PTPRT_degradation: PTPRT => $Sink; kdegPTPRT*PTPRT;
  STAT3_induction_of_SOCS3: STAT3_P_nuc => STAT3_P_nuc + SOCS3_mRNA; ksynSOCS3mRNA*STAT3_P_nuc;
  SOCS3mRNAdegradation: SOCS3_mRNA => $Sink; kdegSOCS3mRNA*SOCS3_mRNA;
  SOCS3_translation: SOCS3_mRNA => SOCS3_mRNA + SOCS3; ksynSOCS3*SOCS3_mRNA;
  SOCS3_degradation: SOCS3 => $Sink; kdegSOCS3*SOCS3;
  SOCS3_OSMR_binding: SOCS3 + OSMR => OSMR_SOCS3; kbinSOCS3OSMR*SOCS3*OSMR;
  SOCS3_OSMR_release: OSMR_SOCS3 => SOCS3 + OSMR; krelSOCS3OSMR*OSMR_SOCS3;
  OSM_degradation: OSM => $Sink; kdegOSM*OSM;
  MMP1InhibtionByTIMP1: MMP1 + TIMP1 => MMP1_TIMP1; kinhibMMP1TIMP1*MMP1*TIMP1;
  MMP1_TIMP1release: MMP1_TIMP1 => MMP1 + TIMP1; krelMMP1*MMP1_TIMP1;
  MMP3InhibtionByTIMP1: MMP3 + TIMP1 => MMP3_TIMP1; kinhibMMP3TIMP1*MMP3*TIMP1;
  MMP3_TIMP1release: MMP3_TIMP1 => MMP3 + TIMP1; krelMMP3*MMP3_TIMP1;
  MMP13InhibtionByTIMP1: MMP13 + TIMP1 => MMP13_TIMP1; kinhibMMP13TIMP1*MMP13*TIMP1;
  MMP13_TIMP1release: MMP13_TIMP1 => MMP13 + TIMP1; krelMMP13*MMP13_TIMP1;
  ADAMTS4InhibtionByTIMP1: ADAMTS4 + TIMP1 => ADAMTS4_TIMP1; kinhibADAMTS4TIMP1*ADAMTS4*TIMP1;
  ADAMTS4_TIMP1release: ADAMTS4_TIMP1 => ADAMTS4 + TIMP1; krelADAMTS4TIMP1*ADAMTS4_TIMP1;
  Collagen2DegradationByMMP1: Collagen2 + MMP1 => MMP1 + ColFrag; kdegCollagen2mmp1*Collagen2*MMP1;
  Collagen2DegradationByMMP13: Collagen2 + MMP13 => MMP13 + ColFrag; kdegCollagen2mmp13*Collagen2*MMP13;
  AggrecanDegradationByADAMTS4: Aggrecan_Collagen2 + ADAMTS4 => ADAMTS4 + Collagen2 + AggFrag; kdegAggrecan*Aggrecan_Collagen2*ADAMTS4;
  MatriptaseSynthesis: cFos_cJun => Matriptase + cFos_cJun; ksynMatriptase*cFos_cJun*kAP1activity;
  MatriptaseDegradation: Matriptase => $Sink; kdegMatriptase*Matriptase;
  SP1Synthesis: cFos_cJun => SP1 + cFos_cJun; ksynSP1*cFos_cJun*kAP1activity;
  SP1Degradation: SP1 => $Sink; kdegSP1*SP1;
  SP1_TIMP1_DNAbinding: SP1 + TIMP1_DNA => SP1_TIMP1_DNA; kbinSP1TIMP1DNA*SP1*TIMP1_DNA;
  SP1_TIMP1_DNArelease: SP1_TIMP1_DNA => SP1 + TIMP1_DNA; krelSP1TIMP1DNA*SP1_TIMP1_DNA;
  TIMP1_transcription_STAT3: STAT3_P_nuc + TIMP1_DNA => STAT3_P_nuc + TIMP1_DNA + TIMP1_mRNA; ksynTIMP1mRNAStat3*STAT3_P_nuc*TIMP1_DNA;
  TIMP1BasalTranscription: TIMP1_DNA => TIMP1_mRNA + TIMP1_DNA; ksynbasalTIMP1mRNA*TIMP1_DNA;
  TIMP1Transcription_AP1: cFos_cJun + TIMP1_DNA => cFos_cJun + TIMP1_mRNA + TIMP1_DNA; ksynTIMP1mRNA*cFos_cJun*TIMP1_DNA*kAP1activity;
  TIMP3BasalTranscriptionn: $Source => TIMP3_mRNA; ksynbasalTIMP3mRNA*Source;
  TIMP3Transcription_AP1: cFos_cJun => cFos_cJun + TIMP3_mRNA; ksynTIMP3mRNA*cFos_cJun*kAP1activity;
  TIMP3Transcription_STAT3: STAT3_P_nuc => STAT3_P_nuc + TIMP3_mRNA; ksynTIMP3mRNAStat3*STAT3_P_nuc*kAP1activity;
  TIMP3Translation: TIMP3_mRNA => TIMP3_mRNA + TIMP3; ksynTIMP3*TIMP3_mRNA;
  TIMP3mRNADegradation: TIMP3_mRNA => $Sink; kdegTIMP3mRNA*TIMP3_mRNA;
  TIMP3Degradation: TIMP3 => $Sink; kdegTIMP3*TIMP3;
  ADAMTS4InhibitionByTimp3: TIMP3 + ADAMTS4 => ADAMTS4_TIMP3; kinhibADAMTS4TIMP3*TIMP3*ADAMTS4;
  ADAMTS4_TIMP3release: ADAMTS4_TIMP3 => ADAMTS4 + TIMP3; krelADAMTS4TIMP3*ADAMTS4_TIMP3;
  MMP1InhibtionByTIMP3: MMP1 + TIMP3 => MMP1_TIMP3; kinhibMMP1TIMP3*MMP1*TIMP3;
  MMP1_TIMP3release: MMP1_TIMP3 => MMP1 + TIMP3; krelMMP1TIMP3*MMP1_TIMP3;
  MMP3InhibtionByTIMP3: MMP3 + TIMP3 => MMP3_TIMP3; kinhibMMP3TIMP3*MMP3*TIMP3;
  MMP3_TIMP3release: MMP3_TIMP3 => MMP3 + TIMP3; krelMMP3TIMP3*MMP3_TIMP3;
  MMP13InhibtionByTIMP3: MMP13 + TIMP3 => MMP13_TIMP3; kinhibMMP13TIMP3*MMP13*TIMP3;
  MMP13_TIMP3release: MMP13_TIMP3 => MMP13 + TIMP3; krelMMP13TIMP3*MMP13_TIMP3;

  // Unit definitions:
  unit substance = item;
  unit volume = litre;
  unit area = metre^2;
end
