// SBML level 3 version 2

function function_3(substrate, Km, V)
  V*substrate/(Km + substrate);
end
function_3 is "Henri-Michaelis-Menten (irreversible)";

function function_4_reaction_34(k34, mRNA_SOCS3C)
  k34*mRNA_SOCS3C;
end
function_4_reaction_34 is "function_4_reaction-34";

function function_4_reaction_32(k32f, k32r, STAT3N_2)
  k32f*STAT3N_2/(k32r + STAT3N_2);
end
function_4_reaction_32 is "function_4_reaction-32";

function function_4_reaction_v15(Nucluse1, kf15, kb15, PP2, PP2_STAT1N, species_95)
  Nucluse1*(kf15*PP2*species_95 - kb15*PP2_STAT1N);
end
function_4_reaction_v15 is "function_4_reaction-v15";

function function_4_reaction_v16(Nucluse1, kf16, PP2_STAT1N)
  Nucluse1*kf16*PP2_STAT1N;
end
function_4_reaction_v16 is "function_4_reaction-v16";

function function_4_reaction_v18(k18a, k18b, STAT1N_2)
  k18a*STAT1N_2/(k18b + STAT1N_2);
end
function_4_reaction_v18 is "function_4_reaction-v18";

function function_4_reaction_v20(kf20, mRNA_SOCS1C)
  kf20*mRNA_SOCS1C;
end
function_4_reaction_v20 is "function_4_reaction-v20";

function function_4_reaction_v27(Nucluse1, kf27, kb27, PP2_STAT1N_2, PP2, STAT1N_2)
  Nucluse1*(kf27*PP2*STAT1N_2 - kb27*PP2_STAT1N_2);
end
function_4_reaction_v27 is "function_4_reaction-v27";

function function_4_reaction_v28(Nucluse1, kf28, PP2_STAT1N_2)
  Nucluse1*kf28*PP2_STAT1N_2;
end
function_4_reaction_v28 is "function_4_reaction-v28";

function function_4_reaction_n7_1(n_kf7, n_kr7, STAT1N_2)
  n_kf7*STAT1N_2/(n_kr7 + STAT1N_2);
end

function function_activation(v, a, b, k)
  v*a*b/(b + k);
end

model MODEL1408190003()
  // Qi2013 - IL-6 and IFN crosstalk model (non-competitive)
  // This model [BIOMD0000000543] describes the crosstalk between IFN-gamma and IL-6 induced signalling; it aims to outline mechanisms and factors that may control the interaction between both signalling pathways, discussing a role of heterodimer formation in signalling dysfunction.
  // To account for the possibility of different IFNR and gp130 binding sites for STAT1 and STAT3, model 1 [BIOMD0000000543] assumes that there is no competition between STAT1 and STAT3 for the receptor complexes (includes two extra reactions).
  // The reverse of this is true in model 2 [BIOMD0000000544] where it generally is assumed that there is competition between STAT1 and STAT3 for the receptor complexes.
  // This model is described in the article:
  // Elucidating the crosstalk mechanism between IFN-gamma and IL-6 via mathematical modelling.
  // Qi YF, Huang YX, Wang HY, Zhang Y, Bao YL, Sun LG, Wu Y, Yu CL, Song ZB, Zheng LH, Sun Y, Wang GN, Li YX.
  // BMC Bioinformatics 2013; 14: 41
  // Abstract:
  // BACKGROUND: Interferon-gamma (IFN-gamma) and interleukin-6 (IL-6) are multifunctional cytokines that regulate immune responses, cell proliferation, and tumour development and progression, which frequently have functionally opposing roles. The cellular responses to both cytokines are activated via the Janus kinase/signal transducer and activator of transcription (JAK/STAT) pathway. During the past 10 years, the crosstalk mechanism between the IFN-gamma and IL-6 pathways has been studied widely and several biological hypotheses have been proposed, but the kinetics and detailed crosstalk mechanism remain unclear. RESULTS: Using established mathematical models and new experimental observations of the crosstalk between the IFN-gamma and IL-6 pathways, we constructed a new crosstalk model that considers three possible crosstalk levels: (1) the competition between STAT1 and STAT3 for common receptor docking sites; (2) the mutual negative regulation between SOCS1 and SOCS3; and (3) the negative regulatory effects of the formation of STAT1/3 heterodimers. A number of simulations were tested to explore the consequences of cross-regulation between the two pathways. The simulation results agreed well with the experimental data, thereby demonstrating the effectiveness and correctness of the model. CONCLUSION: In this study, we developed a crosstalk model of the IFN-gamma and IL-6 pathways to theoretically investigate their cross-regulation mechanism. The simulation experiments showed the importance of the three crosstalk levels between the two pathways. In particular, the unbalanced competition between STAT1 and STAT3 for IFNR and gp130 led to preferential activation of IFN-gamma and IL-6, while at the same time the formation of STAT1/3 heterodimers enhanced preferential signal transduction by sequestering a fraction of the activated STATs. The model provided a good explanation of the experimental observations and provided insights that may inform further research to facilitate a better understanding of the cross-regulation mechanism between the two pathways.
  // This model is hosted on BioModels Database and identified by: BIOMD0000000543.
  // To cite BioModels Database, please use: BioModels Database: An enhanced, curated and annotated resource for published quantitative kinetic models.
  // To the extent possible under law, all copyright and related or neighbouring rights to this encoded model have been dedicated to the public domain worldwide. Please refer to CC0 Public Domain Dedication for more information.
  // biomodels.db:MODEL1408190003
  // biomodels.db:BIOMD0000000543
  // isDescribedBy pubmed:23384097
  // hasTaxon taxonomy:131567
  // hasPart GO:0070102 GO:0060333
  // isPartOf reactome:REACT_25078 reactome:REACT_27307
  // model units - substance: substance, time: second, volume: volume, area: area, length: metre, extent: substance

  // Compartments:
  compartment default = 1 volume; default is "Extracellular";  // isVersionOf GO:0005576
  compartment Cell = 1 volume;  // isVersionOf GO:0005623
  compartment Nucluse1 = 1 volume;  // isVersionOf GO:0005634
  compartment Nucluse2 = 1 volume;  // isVersionOf GO:0005634

  // Species:
  species $IL6 in default = 0;  // isVersionOf uniprot:P05231
  species $IFN in default = 0.1;  // isVersionOf uniprot:P01579
  species species_17 in default = 0; species_17 is "(IL6-gp80-gp130-JAK)2*-STAT1C-STAT3C";  // hasPart uniprot:P05231 uniprot:P40189 uniprot:P08887 uniprot:P23458; hasPart uniprot:P42224 uniprot:P40763
  species IL6_gp80_gp130_JAK_2_STAT1C in default = 0; IL6_gp80_gp130_JAK_2_STAT1C is "(IL6-gp80-gp130-JAK)2*-STAT1C";  // hasPart uniprot:P05231 uniprot:P08887 uniprot:P23458 uniprot:P40189; hasPart uniprot:P42224
  species s118 in Cell = 0; s118 is "(IFN-R-JAK)2*-STAT3C";  // hasPart uniprot:P01579 uniprot:P15260 uniprot:O60674; isVersionOf uniprot:P40763
  species s119 in Cell = 0; s119 is "(IFN-R-JAK)2*-STAT3C*";  // hasPart uniprot:P15260 uniprot:P01579 uniprot:O60674; hasProperty PATO:0002220; hasPart uniprot:P40763
  species STAT1C_STAT3C in Cell = 0; STAT1C_STAT3C is "STAT1C*-STAT3C*";  // hasPart uniprot:P40763 uniprot:P42224; hasProperty PATO:0002220
  species STAT1N_STAT3N in Cell = 0; STAT1N_STAT3N is "STAT1N*-STAT3N*";  // hasPart uniprot:P40763 uniprot:P42224; hasProperty PATO:0002220
  species PP2_STAT1N_STAT3N in Cell = 0; PP2_STAT1N_STAT3N is "PP2-STAT1N*-STAT3N*";  // hasPart uniprot:P42224 uniprot:P40763 uniprot:P67775; hasProperty PATO:0002220
  species PP1_STAT1C_STAT3C in Cell = 0; PP1_STAT1C_STAT3C is "PP1-STAT1C*-STAT3C*";  // hasPart uniprot:P40763 uniprot:P42224 uniprot:P62136; hasProperty PATO:0002220
  species $gp80 in Cell = 8;  // isVersionOf uniprot:P08887
  species IL6_gp80 in Cell = 0; IL6_gp80 is "IL6-gp80";  // hasPart uniprot:P08887 uniprot:P05231
  species $gp130 in Cell = 0.8;  // isVersionOf uniprot:P40189
  species JAK_IFN in Cell = 12; JAK_IFN is "JAK(IFN)";  // isVersionOf uniprot:O60674
  species gp130_JAK in Cell = 0; gp130_JAK is "gp130-JAK";  // isVersionOf uniprot:P23458 uniprot:P40189
  species IL6_gp80_gp130_JAK in Cell = 0; IL6_gp80_gp130_JAK is "IL6-gp80-gp130-JAK";  // hasPart uniprot:P05231 uniprot:P08887 uniprot:P23458 uniprot:P40189
  species species_8 in Cell = 0; species_8 is "(IL6-gp80-gp130-JAK)2";  // hasPart uniprot:P08887 uniprot:P05231 uniprot:P23458 uniprot:P40189
  species species_9 in Cell = 0; species_9 is "(IL6-gp80-gp130-JAK)2*";  // hasPart uniprot:P08887 uniprot:P05231 uniprot:P23458 uniprot:P40189; hasProperty PATO:0002354
  species species_10 in Cell = 0; species_10 is "(IL6-gp80-gp130-JAK)2*-STAT3C";  // hasPart uniprot:P40763; hasPart uniprot:P08887 uniprot:P05231 uniprot:P23458 uniprot:P40189
  species species_11 in Cell = 1000; species_11 is "STAT3C";  // isVersionOf uniprot:P40763
  species species_12 in Cell = 0; species_12 is "STAT3C*";  // isVersionOf uniprot:P40763; hasProperty PATO:0002220
  species species_13 in Cell = 0; species_13 is "(IL6-gp80-gp130-JAK)2*-STAT3C*";  // hasPart uniprot:P40763; hasPart uniprot:P08887 uniprot:P05231 uniprot:P23458 uniprot:P40189; hasProperty PATO:0002220
  species STAT3C_2 in Cell = 0; STAT3C_2 is "(STAT3C*)2";  // hasProperty PATO:0002220; isVersionOf uniprot:P40763
  species IL6_gp80_gp130_JAK_2_SOCS3 in Cell = 0; IL6_gp80_gp130_JAK_2_SOCS3 is "(IL6-gp80-gp130-JAK)2*-SOCS3";  // hasPart uniprot:P08887 uniprot:P05231 uniprot:P23458 uniprot:P40189; hasPart uniprot:O14543
  species species_16 in Cell = 0; species_16 is "(IL6-gp80-gp130-JAK)2*-SHP2";  // hasPart uniprot:P08887 uniprot:P05231 uniprot:P23458 uniprot:P40189; hasPart uniprot:Q06124
  species STAT3C_STAT3C in Cell = 0; STAT3C_STAT3C is "STAT3C-STAT3C*";  // isVersionOf uniprot:P40763; hasProperty PATO:0002220
  species SOCS3 in Cell = 0;  // isVersionOf uniprot:O14543
  species PP1 in Cell = 50;  // isVersionOf uniprot:P62136
  species PP1_STAT3C in Cell = 0; PP1_STAT3C is "PP1-STAT3C*";  // hasPart uniprot:P62136 uniprot:P40763; hasProperty PATO:0002220
  species PP1_STAT3C_2 in Cell = 0; PP1_STAT3C_2 is "PP1-(STAT3C*)2";  // hasPart uniprot:P40763 uniprot:P62136; hasProperty PATO:0002220
  species mRNA_SOCS3C in Cell = 0; mRNA_SOCS3C is "mRNA-SOCS3C";  // isVersionOf uniprot:O14543
  species Grb2 in Cell = 85;  // isVersionOf uniprot:P62993
  species species_33 in Cell = 0; species_33 is "(IL6-gp80-gp130-JAK)2*-SHP2*";  // hasPart uniprot:P05231 uniprot:P08887 uniprot:P40189 uniprot:P23458; hasProperty PATO:0002220; hasPart uniprot:Q06124
  species IL6_gp80_gp130_JAK_2_SHP2_Grb2 in Cell = 0; IL6_gp80_gp130_JAK_2_SHP2_Grb2 is "(IL6-gp80-gp130-JAK)2*-SHP2*-Grb2";  // hasPart uniprot:P08887 uniprot:P05231 uniprot:P23458 uniprot:P40189; hasPart uniprot:Q06124 uniprot:P62993
  species SOS in Cell = 34;  // isVersionOf uniprot:Q07889
  species SHP2_Grb2 in Cell = 0; SHP2_Grb2 is "SHP2*-Grb2";  // isVersionOf uniprot:P62993 uniprot:Q06124
  species species_37 in Cell = 0; species_37 is "(IL6-gp80-gp130-JAK)2*-SHP2*-Grb2-SOS";  // hasPart uniprot:P08887 uniprot:P05231 uniprot:P40189 uniprot:P23458; hasPart uniprot:Q07889 uniprot:Q06124 uniprot:P62993
  species Ras_GDP in Cell = 19000; Ras_GDP is "Ras-GDP";  // isVersionOf uniprot:P01112; hasProperty PATO:0002355
  species species_39 in Cell = 0; species_39 is "(IL6-gp80-gp130-JAK)2*-SHP2*-Grb2-SOS-Ras-GDP";  // hasPart uniprot:P08887 uniprot:P05231 uniprot:P23458 uniprot:P40189; hasPart uniprot:Q07889 uniprot:Q06124 uniprot:P62993 uniprot:P01112
  species species_40 in Cell = 0; species_40 is "Ras-GTP";  // isVersionOf uniprot:P01112; hasProperty PATO:0002354
  species species_41 in Cell = 67; species_41 is "Raf";  // isVersionOf uniprot:P04049
  species Raf_Ras_GTP in Cell = 0; Raf_Ras_GTP is "Raf-Ras-GTP";  // hasPart uniprot:P04049 uniprot:P01112
  species species_43 in Cell = 0; species_43 is "Ras-GTP*";  // isVersionOf uniprot:P01112; hasProperty PATO:0002220 PATO:0002354
  species species_44 in Cell = 0; species_44 is "Raf*";  // isVersionOf uniprot:P04049; hasProperty PATO:0002354
  species species_45 in Cell = 0; species_45 is "(IL6-gp80-gp130-JAK)2*-SHP2*-Grb2-SOS-Ras-GTP";  // hasPart uniprot:P08887 uniprot:P05231 uniprot:P23458 uniprot:P40189; hasPart uniprot:Q06124 uniprot:Q07889 uniprot:P62993 uniprot:P01112
  species SHP2_Grb2_SOS in Cell = 0; SHP2_Grb2_SOS is "SHP2*-Grb2-SOS";  // hasPart uniprot:Q06124 uniprot:Q07889 uniprot:P62993
  species Grb2_SOS in Cell = 0; Grb2_SOS is "Grb2-SOS";  // hasPart uniprot:P62993 uniprot:Q07889
  species species_48 in Cell = 0; species_48 is "SHP2*";  // isVersionOf uniprot:Q06124; hasProperty PATO:0002220
  species Phosp1 in Cell = 67;  // isVersionOf uniprot:P62136
  species Raf_Phosp1 in Cell = 0; Raf_Phosp1 is "Raf*-Phosp1";  // hasPart uniprot:P62136 uniprot:P04049
  species MEK in Cell = 41667;  // isVersionOf uniprot:Q02750
  species MEK_Raf in Cell = 0; MEK_Raf is "MEK-Raf*";  // hasPart uniprot:Q02750 uniprot:P04049
  species MEK_P in Cell = 0; MEK_P is "MEK-P";  // isVersionOf uniprot:Q02750; hasProperty PATO:0002220
  species MEK_P_Raf in Cell = 0; MEK_P_Raf is "MEK-P-Raf*";  // hasPart uniprot:Q02750 uniprot:P04049; hasProperty PATO:0002220
  species MEK_PP in Cell = 0; MEK_PP is "MEK-PP";  // isVersionOf uniprot:Q02750; hasProperty PATO:0002220
  species MEK_PP_Phosp2 in Cell = 0; MEK_PP_Phosp2 is "MEK-PP-Phosp2";  // isVersionOf uniprot:P67775 uniprot:Q02750; hasProperty PATO:0002220
  species Phosp2 in Cell = 67;  // isVersionOf uniprot:P67775
  species MEK_P_Phosp2 in Cell = 0; MEK_P_Phosp2 is "MEK-P-Phosp2";  // hasPart uniprot:P67775 uniprot:Q02750; hasProperty PATO:0002220
  species ERK in Cell = 35000;  // isVersionOf uniprot:P28482
  species ERK_MEK_PP in Cell = 0; ERK_MEK_PP is "ERK-MEK-PP";  // hasPart uniprot:P28482 uniprot:Q02750; hasProperty PATO:0002220
  species ERK_P in Cell = 0; ERK_P is "ERK-P";  // isVersionOf uniprot:P28482; hasProperty PATO:0002220
  species ERK_P_MEK_PP in Cell = 0; ERK_P_MEK_PP is "ERK-P-MEK-PP";  // hasPart uniprot:P28482 uniprot:Q02750; hasProperty PATO:0002220
  species ERK_PP in Cell = 0; ERK_PP is "ERK-PP";  // isVersionOf uniprot:P28482
  species Phosp3 in Cell = 16667;  // isVersionOf uniprot:P67775
  species ERK_PP_Phosp3 in Cell = 0; ERK_PP_Phosp3 is "ERK-PP-Phosp3";  // hasPart uniprot:P28482 uniprot:P67775; hasProperty PATO:0002220
  species ERK_P_Phosp3 in Cell = 0; ERK_P_Phosp3 is "ERK-P-Phosp3";  // hasPart uniprot:P28482 uniprot:P67775; hasProperty PATO:0002220
  species CEBPi in Cell = 40493;  // isVersionOf uniprot:P17676
  species CEBP in Cell = 0;  // isVersionOf uniprot:P17676; hasProperty PATO:0002354
  species CEBPn in Cell = 0;  // isVersionOf uniprot:P17676; hasProperty PATO:0002354
  species R_JAK in Cell = 0; R_JAK is "R-JAK";  // hasPart uniprot:P15260 uniprot:O60674
  species IFN_R_JAK in Cell = 0; IFN_R_JAK is "IFN-R-JAK";  // hasPart uniprot:O60674 uniprot:P15260 uniprot:P01579
  species species_81 in Cell = 0; species_81 is "(IFN-R-JAK)2";  // hasPart uniprot:P01579 uniprot:O60674 uniprot:P15260
  species species_82 in Cell = 0; species_82 is "(IFN-R-JAK)2*";  // hasPart uniprot:P01579 uniprot:O60674 uniprot:P15260; hasProperty PATO:0002220
  species species_83 in Cell = 0; species_83 is "(IFN-R-JAK)2*-STAT1C";  // hasPart uniprot:P01579 uniprot:O60674 uniprot:P15260; hasProperty PATO:0002220; hasPart uniprot:P42224
  species species_84 in Cell = 1000; species_84 is "STAT1C";  // isVersionOf uniprot:P42224
  species species_85 in Cell = 0; species_85 is "STAT1C*";  // isVersionOf uniprot:P42224; hasProperty PATO:0002220
  species species_86 in Cell = 0; species_86 is "(IFN-R-JAK)2*-STAT1C*";  // hasPart uniprot:P01579 uniprot:P15260 uniprot:O60674; hasProperty PATO:0002220; hasPart uniprot:P42224; hasProperty PATO:0002220
  species STAT1C_2 in Cell = 0; STAT1C_2 is "(STAT1C*)2";  // isVersionOf uniprot:P42224; hasProperty PATO:0002220
  species IFN_R_JAK_2_SHP2 in Cell = 0; IFN_R_JAK_2_SHP2 is "(IFN-R-JAK)2*-SHP2";  // hasPart uniprot:P01579 uniprot:P15260 uniprot:O60674; hasProperty PATO:0002220; hasPart uniprot:Q06124
  species PP1_STAT1C in Cell = 0; PP1_STAT1C is "PP1-STAT1C*";  // hasPart uniprot:P62136 uniprot:P42224; hasProperty PATO:0002220
  species STAT1C_STAT1C in Cell = 0; STAT1C_STAT1C is "STAT1C-STAT1C*";  // hasPart uniprot:P42224; hasPart uniprot:P42224; hasProperty PATO:0002220
  species mRNA_SOCS1C in Cell = 0; mRNA_SOCS1C is "mRNA-SOCS1C";  // isVersionOf uniprot:O15524
  species SOCS1 in Cell = 0;  // isVersionOf uniprot:O15524
  species IFN_R_JAK_2_SOCS1 in Cell = 0; IFN_R_JAK_2_SOCS1 is "(IFN-R-JAK)2*-SOCS1";  // hasPart uniprot:O60674 uniprot:P01579 uniprot:P15260; hasProperty PATO:0002220; hasPart uniprot:O15524
  species PP1_STAT1C_2 in Cell = 0; PP1_STAT1C_2 is "PP1-(STAT1C*)2";  // hasPart uniprot:P62136; hasPart uniprot:P42224; hasProperty PATO:0002220
  species IFN_R_JAK_2_STAT1C_SOCS1 in Cell = 0; IFN_R_JAK_2_STAT1C_SOCS1 is "(IFN-R-JAK)2*-STAT1C-SOCS1";  // hasPart uniprot:P15260 uniprot:P01579 uniprot:O60674; hasProperty PATO:0002220; hasPart uniprot:P42224 uniprot:O15524
  species IFN_R_JAK_2_STAT1C_SHP2_SOCS1 in Cell = 0; IFN_R_JAK_2_STAT1C_SHP2_SOCS1 is "(IFN-R-JAK)2*-STAT1C-SHP2-SOCS1";  // hasPart uniprot:P15260 uniprot:P01579 uniprot:O60674; hasProperty PATO:0002220; hasPart uniprot:P42224 uniprot:O15524 uniprot:Q06124
  species IFN_R_JAK_2_STAT1C_SHP2 in Cell = 0; IFN_R_JAK_2_STAT1C_SHP2 is "(IFN-R-JAK)2*-STAT1C-SHP2";  // hasPart uniprot:P15260 uniprot:P01579 uniprot:O60674; hasProperty PATO:0002220; hasPart uniprot:P42224 uniprot:Q06124
  species R in Cell = 12;  // isVersionOf uniprot:P15260
  species species_108 in Cell = 100; species_108 is "SHP2";  // isVersionOf uniprot:Q06124
  species $STAT3 in Cell; STAT3 is "STAT3*";  // isVersionOf uniprot:P40763; hasProperty PATO:0002220
  species $STAT1 in Cell; STAT1 is "STAT1*";  // isVersionOf uniprot:P42224; hasProperty PATO:0002220
  species s138 in Cell = 0; s138 is "(IL6-gp80-gp130-JAK)2*-STAT1";  // hasPart uniprot:P08887 uniprot:P05231 uniprot:P40189 uniprot:P23458; hasProperty PATO:0002220; hasPart uniprot:P42224
  species s139 in Cell = 0; s139 is "(IL6-gp80-gp130-JAK)2*-STAT1*";  // hasPart uniprot:P08887 uniprot:P05231 uniprot:P40189 uniprot:P23458; hasProperty PATO:0002220; hasPart uniprot:P42224; hasProperty PATO:0002220
  species JAK_IL_6 in Cell = 12; JAK_IL_6 is "JAK(IL-6)";  // isVersionOf uniprot:P23458
  species IFN_R_JAK_2_STAT1C_STAT3C in Cell = 0; IFN_R_JAK_2_STAT1C_STAT3C is "(IFN-R-JAK)2*-STAT1C-STAT3C";  // hasPart uniprot:P15260 uniprot:P01579 uniprot:O60674; hasProperty PATO:0002220; hasPart uniprot:P42224 uniprot:P40763
  species STAT1N_2 in Nucluse1 = 0; STAT1N_2 is "(STAT1N*)2";  // hasProperty PATO:0002220; hasPart uniprot:P42224
  species PP2_STAT1N in Nucluse1 = 0; PP2_STAT1N is "PP2-STAT1N*";  // hasPart uniprot:P42224; hasProperty PATO:0002220; hasPart uniprot:P67775
  species species_95 in Nucluse1 = 0; species_95 is "STAT1N*";  // isVersionOf uniprot:P42224; hasProperty PATO:0002220
  species species_96 in Nucluse1 = 0; species_96 is "STAT1N";  // isVersionOf uniprot:P42224
  species mRNA_SOCS1N in Nucluse1 = 0; mRNA_SOCS1N is "mRNA-SOCS1N";  // isVersionOf uniprot:O15524
  species PP2_STAT1N_2 in Nucluse1 = 0; PP2_STAT1N_2 is "PP2-(STAT1N*)2";  // hasPart uniprot:P67775; hasPart uniprot:P42224; hasProperty PATO:0002220
  species STAT1N_STAT1N in Nucluse1 = 0; STAT1N_STAT1N is "STAT1N-STAT1N*";  // hasPart uniprot:P42224; hasProperty PATO:0002220; hasPart uniprot:P42224
  species STAT3N_2 in Nucluse2 = 0; STAT3N_2 is "(STAT3N*)2";  // hasPart uniprot:P40763; hasProperty PATO:0002220
  species PP2 in Nucluse2 = 60;  // isVersionOf uniprot:P67775
  species PP2_STAT3N_2 in Nucluse2 = 0; PP2_STAT3N_2 is "PP2-(STAT3N*)2";  // hasPart uniprot:P67775; hasPart uniprot:P40763; hasProperty PATO:0002220
  species species_26 in Nucluse2 = 0; species_26 is "STAT3N*";  // isVersionOf uniprot:P40763; hasProperty PATO:0002220
  species PP2_STAT3N in Nucluse2 = 0; PP2_STAT3N is "PP2-STAT3N*";  // hasPart uniprot:P67775; hasPart uniprot:P40763; hasProperty PATO:0002220
  species species_28 in Nucluse2 = 0; species_28 is "STAT3N";  // isVersionOf uniprot:P40763
  species STAT3N_STAT3N in Nucluse2 = 0; STAT3N_STAT3N is "STAT3N-STAT3N*";  // hasPart uniprot:P40763; hasPart uniprot:P40763; hasProperty PATO:0002220
  species mRNA_SOCS3N in Nucluse2 = 0; mRNA_SOCS3N is "mRNA-SOCS3N";  // isVersionOf uniprot:O14543

  // Parameters:
  k1f = 0.1;
  k1r = 0.05;
  k2f = 0.1;
  k2r = 0.05;
  k3f = 0.02;
  k3r = 0.02;
  k6f = 0.04;
  k6r = 0.2;
  k7 = 0.005;
  k8f = 0.008;
  k8r = 0.8;
  k9 = 0.4;
  k10f = 0.005;
  k10r = 0.5;
  k16f = 0.02;
  k16r = 0.1;
  k17f = 0.001;
  k17r = 0.2;
  k18 = 0.003;
  k19f = 0.001;
  k19r = 0.2;
  k20 = 0.003;
  k21f = 0.001;
  k21r = 0.2;
  k22 = 0.003;
  k23f = 2e-7;
  k23r = 0.2;
  k24 = 0.005;
  k25f = 0.1;
  k25r = 0.02;
  k26f = 0.001;
  k26r = 0.2;
  k27 = 0.005;
  k28f = 0.001;
  k28r = 0.2;
  k29 = 0.005;
  k30f = 0.2;
  k30r = 2e-7;
  k31 = 0.05;
  k32f = 0.01;
  k32r = 400;
  k33 = 0.001;
  k34 = 0.01;
  k35f = 5;
  k35r = 0.1;
  k36 = 0.0005;
  k37 = 0.0006;
  k38 = 0.003;
  k39f = 6;
  k39r = 0.06;
  k40f = 0.01;
  k40r = 0.55;
  k41f = 0.01;
  k41r = 0.0214;
  k42f = 0.015;
  k42r = 1.3;
  k43f = 0.5;
  k43r = 0.0001;
  k44f = 0.001;
  k44r = 0.0053;
  k45f = 1;
  k45r = 0.0007;
  k46f = 0.0079;
  k46r = 0.4;
  k47f = 0.023;
  k47r = 0.00022;
  k48f = 0.47;
  k48r = 0.000245;
  k49f = 0.3;
  k49r = 0.021;
  k50f = 0.0015;
  k50r = 0.0045;
  k51f = 1.7;
  k51r = 340;
  k52f = 0.3;
  k52r = 0.0009;
  k53f = 0.01;
  k53r = 0.55;
  k54f = 0.3;
  k54r = 0.0009;
  k55f = 0.03;
  k55r = 0.064;
  k56f = 0.03;
  k56r = 0.0429;
  k57f = 0.0717;
  k57r = 0.2;
  k58 = 1;
  k59f = 0.011;
  k59r = 0.001833;
  k60 = 3.5;
  k61f = 0.011;
  k61r = 0.001833;
  k62 = 2.9;
  k63f = 0.0143;
  k63r = 0.8;
  k64 = 0.058;
  k65f = 0.00025;
  k65r = 0.5;
  k66 = 0.058;
  k67f = 0.00011;
  k67r = 0.033;
  k68 = 16;
  k69f = 0.00011;
  k69r = 0.033;
  k70 = 6.7;
  k71f = 0.014;
  k71r = 0.6;
  k72 = 0.27;
  k73f = 0.005;
  k73r = 0.5;
  k74 = 0.3;
  k75f = 0.2335;
  k75r = 20000;
  k76 = 0.0388;
  k77f = 0.9854;
  k77r = 0.0009;
  kf1 = 0.1;
  kb1 = 0.05;
  kf2 = 0.02;
  kb2 = 0.02;
  kf3 = 0.04;
  kb3 = 0.2;
  kf4 = 0.005;
  kf5 = 0.008;
  kb5 = 0.8;
  kf6 = 0.4;
  kf7 = 0.005;
  kb7 = 0.5;
  kf8 = 0.02;
  kb8 = 0.1;
  kf9 = 0.001;
  kb9 = 0.2;
  kf10 = 0.003;
  kf11 = 0.001;
  kb11 = 0.2;
  kf12 = 0.003;
  kf13 = 2e-7;
  kb13 = 0.2;
  kf14 = 0.005;
  kf15 = 0.001;
  kb15 = 0.2;
  kf17 = 0.05;
  kf16 = 0.005;
  k18a = 0.01;
  k18b = 400;
  kf19 = 0.001;
  kf20 = 0.01;
  kf21 = 0.02;
  kb21 = 0.1;
  kf22 = 0.0005;
  kf23 = 0.0005;
  kf24 = 0.001;
  kb24 = 0.2;
  kf25 = 0.003;
  kf26 = 0.005;
  kb26 = 0.5;
  kf27 = 0.001;
  kb27 = 0.2;
  kf28 = 0.005;
  kf29 = 2e-7;
  kb29 = 0.2;
  kf30 = 0.008;
  kb30 = 0.8;
  kf31 = 0.001;
  kb31 = 0.2;
  kf32 = 0.003;
  kf33 = 0.0005;
  n_kf1 = 0.002;
  n_kr1 = 2;
  n_k2 = 0.2;
  n_kf3 = 0.005;
  n_kr3 = 0.5;
  n_kf4 = 0.002;
  n_kr4 = 2;
  n_k5 = 0.2;
  n_kf6 = 0.005;
  n_kr6 = 0.5;
  n_kf7 = 0.001;
  n_kr7 = 400;
  n_kf8 = 0.02;
  n_kr8 = 0.1;
  n_kf9 = 0.02;
  n_kr9 = 0.1;
  n_k10 = 0.005;
  n_kf11 = 0.001;
  n_kr11 = 0.2;
  n_kf12 = 0.001;
  n_kr12 = 0.2;
  n_k13 = 0.0015;
  n_k14 = 0.0015;
  n_k15 = 0.0025;
  n_k16 = 0.0025;
  n_kf17 = 0.008;
  n_kr17 = 0.8;
  n_kf18 = 0.002;
  n_kr18 = 2;
  n_k19 = 0.4;
  n_k20 = 0.2;
  n_kf21 = 0.002;
  n_kr21 = 2;
  n_kf22 = 0.008;
  n_kr22 = 0.8;
  n_k23 = 0.2;
  n_k24 = 0.4;

  // Assignment rules:
  STAT1 := species_86 + 2*PP1_STAT1C_2 + PP1_STAT1C_STAT3C + PP1_STAT1C + 2*PP2_STAT1N_2 + PP2_STAT1N_STAT3N + PP2_STAT1N + 2*STAT1C_2 + STAT1C_STAT3C + species_85 + STAT1C_STAT1C + 2*STAT1N_2 + STAT1N_STAT3N + species_95 + STAT1N_STAT1N + s139;
  STAT3 := s119 + species_13 + PP1_STAT1C_STAT3C + 2*PP1_STAT3C_2 + PP1_STAT3C + PP2_STAT1N_STAT3N + 2*PP2_STAT3N_2 + PP2_STAT3N + STAT1C_STAT3C + STAT1N_STAT3N + 2*STAT3C_2 + species_12 + STAT3C_STAT3C + 2*STAT3N_2 + species_26 + STAT3N_STAT3N;

  // Reactions:
  reaciton_2: JAK_IL_6 + $gp130 -> gp130_JAK; Cell*(k2f*JAK_IL_6*gp130 - k2r*gp130_JAK); reaciton_2 is "reaciton-2";
  reaction_1: $gp80 + $IL6 -> IL6_gp80; k1f*gp80*IL6 - k1r*IL6_gp80; reaction_1 is "reaction-1";
  reaction_8: species_9 + species_12 -> species_13; Cell*(k10f*species_9*species_12 - k10r*species_13); reaction_8 is "reaction-10";
  reaction_9: 2 species_12 -> STAT3C_2; Cell*(k16f*species_12^2 - k16r*STAT3C_2); reaction_9 is "reaction-16";
  re138: species_9 + species_108 -> species_16; Cell*(k17f*species_9*species_108 - k17r*species_16); re138 is "reaction-17";
  re137: species_16 => species_8 + species_108; Cell*k18*species_16; re137 is "reaction-18";
  reaction_12: species_12 + PP1 -> PP1_STAT3C; Cell*(k19f*species_12*PP1 - k19r*PP1_STAT3C); reaction_12 is "reaction-19";
  reaction_14: PP1_STAT3C => species_11 + PP1; Cell*k20*PP1_STAT3C; reaction_14 is "reaction-20";
  reaction_13: STAT3C_2 + PP1 -> PP1_STAT3C_2; Cell*(k21f*STAT3C_2*PP1 - k21r*PP1_STAT3C_2); reaction_13 is "reaction-21";
  reaction_15: PP1_STAT3C_2 => STAT3C_STAT3C + PP1; Cell*k22*PP1_STAT3C_2; reaction_15 is "reaction-22";
  reaction_16: species_11 + species_12 -> STAT3C_STAT3C; Cell*(k23f*species_11*species_12 - k23r*STAT3C_STAT3C); reaction_16 is "reaction-23";
  reaction_17: STAT3C_2 => STAT3N_2; k24*STAT3C_2; reaction_17 is "reaction-24";
  reaction_65: STAT3N_2 -> 2 species_26; Nucluse2*(k25f*STAT3N_2 - k25r*species_26^2); reaction_65 is "reaction-25";
  reaction_19: PP2 + species_26 -> PP2_STAT3N; Nucluse2*(k26f*PP2*species_26 - k26r*PP2_STAT3N); reaction_19 is "reaction-26";
  reaction_20: PP2_STAT3N => species_28 + PP2; Nucluse2*k27*PP2_STAT3N; reaction_20 is "reaction-27";
  reaction_18: PP2 + STAT3N_2 -> PP2_STAT3N_2; Nucluse2*(k28f*PP2*STAT3N_2 - k28r*PP2_STAT3N_2); reaction_18 is "reaction-28";
  reaction_21: PP2_STAT3N_2 => PP2 + STAT3N_STAT3N; Nucluse2*k29*PP2_STAT3N_2; reaction_21 is "reaction-29";
  reaction_3: IL6_gp80 + gp130_JAK -> IL6_gp80_gp130_JAK; Cell*(k3f*IL6_gp80*gp130_JAK - k3r*IL6_gp80_gp130_JAK); reaction_3 is "reaction-3";
  reaction_66: STAT3N_STAT3N -> species_26 + species_28; Nucluse2*(k30f*STAT3N_STAT3N - k30r*species_26*species_28); reaction_66 is "reaction-30";
  reaction_22: species_28 => species_11; k31*species_28; reaction_22 is "reaction-31";
  reaction_23: => mRNA_SOCS3N; Nucluse2*function_4_reaction_32(k32f, k32r, STAT3N_2); reaction_23 is "reaction-32";  // modifiers: STAT3N_2
  reaction_24: mRNA_SOCS3N => mRNA_SOCS3C; k33*mRNA_SOCS3N; reaction_24 is "reaction-33";
  reaction_25: => SOCS3; Cell*function_4_reaction_34(k34, mRNA_SOCS3C); reaction_25 is "reaction-34";  // modifiers: mRNA_SOCS3C
  reaction_26: species_9 + SOCS3 -> IL6_gp80_gp130_JAK_2_SOCS3; Cell*(k35f*species_9*SOCS3 - k35r*IL6_gp80_gp130_JAK_2_SOCS3); reaction_26 is "reaction-35";
  reaction_27: mRNA_SOCS3C => ; Cell*k36*mRNA_SOCS3C; reaction_27 is "reaction-36";
  reaction_28: SOCS3 => ; Cell*k37*SOCS3; reaction_28 is "reaction-37";
  reaction_73: IL6_gp80_gp130_JAK_2_SOCS3 => species_8 + SOCS3; Cell*k38*IL6_gp80_gp130_JAK_2_SOCS3; reaction_73 is "reaction-38";
  reaction_39: species_16 -> species_33; Cell*(k39f*species_16 - k39r*species_33); reaction_39 is "reaction-39";
  reaction_29: species_33 + Grb2 -> IL6_gp80_gp130_JAK_2_SHP2_Grb2; Cell*(k40f*species_33*Grb2 - k40r*IL6_gp80_gp130_JAK_2_SHP2_Grb2); reaction_29 is "reaction-40";
  reaction_30: SOS + IL6_gp80_gp130_JAK_2_SHP2_Grb2 -> species_37; Cell*(k41f*SOS*IL6_gp80_gp130_JAK_2_SHP2_Grb2 - k41r*species_37); reaction_30 is "reaction-41";
  reaction_31: Ras_GDP + species_37 -> species_39; Cell*(k42f*Ras_GDP*species_37 - k42r*species_39); reaction_31 is "reaction-42";
  reaction_32: species_39 -> species_40 + species_37; Cell*(k43f*species_39 - k43r*species_40*species_37); reaction_32 is "reaction-43";
  reaction_33: species_40 + species_41 -> Raf_Ras_GTP; Cell*(k44f*species_40*species_41 - k44r*Raf_Ras_GTP); reaction_33 is "reaction-44";
  reaction_34: Raf_Ras_GTP -> species_43 + species_44; Cell*(k45f*Raf_Ras_GTP - k45r*species_43*species_44); reaction_34 is "reaction-45";
  reaction_35: species_37 + species_43 -> species_45; Cell*(k46f*species_37*species_43 - k46r*species_45); reaction_35 is "reaction-46";
  reaction_36: species_45 -> species_37 + Ras_GDP; Cell*(k47f*species_45 - k47r*species_37*Ras_GDP); reaction_36 is "reaction-47";
  reaction_37: species_37 -> SHP2_Grb2_SOS + species_9; Cell*(k48f*species_37 - k48r*SHP2_Grb2_SOS*species_9); reaction_37 is "reaction-48";
  reaction_38: SHP2_Grb2_SOS -> Grb2_SOS + species_48; Cell*(k49f*SHP2_Grb2_SOS - k49r*Grb2_SOS*species_48); reaction_38 is "reaction-49";
  reaction_40: Grb2_SOS -> Grb2 + SOS; Cell*(k50f*Grb2_SOS - k50r*Grb2*SOS); reaction_40 is "reaction-50";
  re136: species_48 => species_108; Cell*function_3(species_48, k51r, k51f); re136 is "reaction-51";
  reaction_42: species_33 -> species_9 + species_48; Cell*(k52f*species_33 - k52r*species_9*species_48); reaction_42 is "reaction-52";
  reaction_43: Grb2 + species_48 -> SHP2_Grb2; Cell*(k53f*Grb2*species_48 - k53r*SHP2_Grb2); reaction_43 is "reaction-53";
  reaction_44: IL6_gp80_gp130_JAK_2_SHP2_Grb2 -> species_9 + SHP2_Grb2; Cell*(k54f*IL6_gp80_gp130_JAK_2_SHP2_Grb2 - k54r*species_9*SHP2_Grb2); reaction_44 is "reaction-54";
  reaction_45: SOS + SHP2_Grb2 -> SHP2_Grb2_SOS; Cell*(k55f*SOS*SHP2_Grb2 - k55r*SHP2_Grb2_SOS); reaction_45 is "reaction-55";
  reaction_46: species_33 + Grb2_SOS -> species_37; Cell*(k56f*species_33*Grb2_SOS - k56r*species_37); reaction_46 is "reaction-56";
  reaction_47: Phosp1 + species_44 -> Raf_Phosp1; Cell*(k57f*Phosp1*species_44 - k57r*Raf_Phosp1); reaction_47 is "reaction-57";
  reaction_48: Raf_Phosp1 => species_41 + Phosp1; Cell*k58*Raf_Phosp1; reaction_48 is "reaction-58";
  reaction_49: species_44 + MEK -> MEK_Raf; Cell*(k59f*species_44*MEK - k59r*MEK_Raf); reaction_49 is "reaction-59";
  reaction_5: 2 IL6_gp80_gp130_JAK -> species_8; Cell*(k6f*IL6_gp80_gp130_JAK^2 - k6r*species_8); reaction_5 is "reaction-6";
  reaction_50: MEK_Raf => MEK_P + species_44; Cell*k60*MEK_Raf; reaction_50 is "reaction-60";
  reaction_51: species_44 + MEK_P -> MEK_P_Raf; Cell*(k61f*species_44*MEK_P - k61r*MEK_P_Raf); reaction_51 is "reaction-61";
  reaction_52: MEK_P_Raf => MEK_PP + species_44; Cell*k62*MEK_P_Raf; reaction_52 is "reaction-62";
  reaction_53: MEK_PP + Phosp2 -> MEK_PP_Phosp2; Cell*(k63f*MEK_PP*Phosp2 - k63r*MEK_PP_Phosp2); reaction_53 is "reaction-63";
  reaction_54: MEK_PP_Phosp2 => Phosp2 + MEK_P; Cell*k64*MEK_PP_Phosp2; reaction_54 is "reaction-64";
  reaction_55: MEK_P + Phosp2 -> MEK_P_Phosp2; Cell*(k65f*MEK_P*Phosp2 - k65r*MEK_P_Phosp2); reaction_55 is "reaction-65";
  reaction_56: MEK_P_Phosp2 => Phosp2 + MEK; Cell*k66*MEK_P_Phosp2; reaction_56 is "reaction-66";
  reaction_57: MEK_PP + ERK -> ERK_MEK_PP; Cell*(k67f*MEK_PP*ERK - k67r*ERK_MEK_PP); reaction_57 is "reaction-67";
  reaction_58: ERK_MEK_PP => ERK_P + MEK_PP; Cell*k68*ERK_MEK_PP; reaction_58 is "reaction-68";
  reaction_59: MEK_PP + ERK_P -> ERK_P_MEK_PP; Cell*(k69f*MEK_PP*ERK_P - k69r*ERK_P_MEK_PP); reaction_59 is "reaction-69";
  reaction_6: species_8 => species_9; Cell*k7*species_8; reaction_6 is "reaction-7";
  reaction_60: ERK_P_MEK_PP => ERK_PP + MEK_PP; Cell*k70*ERK_P_MEK_PP; reaction_60 is "reaction-70";
  reaction_71: ERK_PP + Phosp3 -> ERK_PP_Phosp3; Cell*(k71f*ERK_PP*Phosp3 - k71r*ERK_PP_Phosp3); reaction_71 is "reaction-71";
  reaction_72: ERK_PP_Phosp3 => Phosp3 + ERK_P; Cell*k72*ERK_PP_Phosp3; reaction_72 is "reaction-72";
  reaction_62: ERK_P + Phosp3 -> ERK_P_Phosp3; Cell*(k73f*ERK_P*Phosp3 - k73r*ERK_P_Phosp3); reaction_62 is "reaction-73";
  reaction_63: ERK_P_Phosp3 => Phosp3 + ERK; Cell*k74*ERK_P_Phosp3; reaction_63 is "reaction-74";
  reaction_74: CEBPi => CEBP; Cell*function_activation(k75f, ERK_PP, CEBPi, k75r); reaction_74 is "reaction-75";  // modifiers: ERK_PP
  reaction_75: CEBP => CEBPi; Cell*k76*CEBP; reaction_75 is "reaction-76";
  reaction_77: 2 CEBP -> CEBPn; Cell*(k77f*CEBP^2 - k77r*CEBPn); reaction_77 is "reaction-77";
  reaction_4: species_9 + species_11 -> species_10; Cell*(k8f*species_9*species_11 - k8r*species_10); reaction_4 is "reaction-8";
  reaction_7: species_10 => species_9 + species_12; Cell*k9*species_10; reaction_7 is "reaction-9";
  reaction_v1: JAK_IFN + R -> R_JAK; Cell*(kf1*JAK_IFN*R - kb1*R_JAK); reaction_v1 is "reaction-v1";
  reaction_v10: IFN_R_JAK_2_SHP2 => species_81 + species_108; Cell*kf10*IFN_R_JAK_2_SHP2; reaction_v10 is "reaction-v10";
  reaction_v11: species_85 + PP1 -> PP1_STAT1C; Cell*(kf11*species_85*PP1 - kb11*PP1_STAT1C); reaction_v11 is "reaction-v11";
  reaction_v12: PP1_STAT1C => species_84 + PP1; Cell*kf12*PP1_STAT1C; reaction_v12 is "reaction-v12";
  reaction_v13: species_84 + species_85 -> STAT1C_STAT1C; Cell*(kf13*species_84*species_85 - kb13*STAT1C_STAT1C); reaction_v13 is "reaction-v13";
  reaction_v14: STAT1C_2 => STAT1N_2; kf14*STAT1C_2; reaction_v14 is "reaction-v14";
  reaction_v15: species_95 + PP2 -> PP2_STAT1N; function_4_reaction_v15(Nucluse1, kf15, kb15, PP2, PP2_STAT1N, species_95); reaction_v15 is "reaction-v15";
  reaction_v16: PP2_STAT1N => species_96 + PP2; function_4_reaction_v16(Nucluse1, kf16, PP2_STAT1N); reaction_v16 is "reaction-v16";
  reaction_v17: species_96 => species_84; kf17*species_96; reaction_v17 is "reaction-v17";
  reaction_v18: => mRNA_SOCS1N; Nucluse1*function_4_reaction_v18(k18a, k18b, STAT1N_2); reaction_v18 is "reaction-v18";  // modifiers: STAT1N_2
  reaction_v19: mRNA_SOCS1N => mRNA_SOCS1C; kf19*mRNA_SOCS1N; reaction_v19 is "reaction-v19";
  reaction_v2: $IFN + R_JAK -> IFN_R_JAK; kf2*IFN*R_JAK - kb2*IFN_R_JAK; reaction_v2 is "reaction-v2";
  reaction_v20: => SOCS1; Cell*function_4_reaction_v20(kf20, mRNA_SOCS1C); reaction_v20 is "reaction-v20";  // modifiers: mRNA_SOCS1C
  reaction_v21: SOCS1 + species_82 -> IFN_R_JAK_2_SOCS1; Cell*(kf21*SOCS1*species_82 - kb21*IFN_R_JAK_2_SOCS1); reaction_v21 is "reaction-v21";
  reaction_v22: mRNA_SOCS1C => ; Cell*kf22*mRNA_SOCS1C; reaction_v22 is "reaction-v22";
  reaction_v23: SOCS1 => ; Cell*kf23*SOCS1; reaction_v23 is "reaction-v23";
  reaction_v24: STAT1C_2 + PP1 -> PP1_STAT1C_2; Cell*(kf24*STAT1C_2*PP1 - kb24*PP1_STAT1C_2); reaction_v24 is "reaction-v24";
  reaction_v25: PP1_STAT1C_2 => STAT1C_STAT1C + PP1; Cell*kf25*PP1_STAT1C_2; reaction_v25 is "reaction-v25";
  reaction_v26: 2 species_95 -> STAT1N_2; Nucluse1*(kf26*species_95^2 - kb26*STAT1N_2); reaction_v26 is "reaction-v26";
  reaction_v27: STAT1N_2 + PP2 -> PP2_STAT1N_2; function_4_reaction_v27(Nucluse1, kf27, kb27, PP2_STAT1N_2, PP2, STAT1N_2); reaction_v27 is "reaction-v27";
  reaction_v28: PP2_STAT1N_2 => STAT1N_STAT1N + PP2; function_4_reaction_v28(Nucluse1, kf28, PP2_STAT1N_2); reaction_v28 is "reaction-v28";
  reaction_v29: species_96 + species_95 -> STAT1N_STAT1N; Nucluse1*(kf29*species_96*species_95 - kb29*STAT1N_STAT1N); reaction_v29 is "reaction-v29";
  reaction_v3: 2 IFN_R_JAK -> species_81; Cell*(kf3*IFN_R_JAK^2 - kb3*species_81); reaction_v3 is "reaction-v3";
  reaction_v30: species_84 + IFN_R_JAK_2_SOCS1 -> IFN_R_JAK_2_STAT1C_SOCS1; Cell*(kf30*species_84*IFN_R_JAK_2_SOCS1 - kb30*IFN_R_JAK_2_STAT1C_SOCS1); reaction_v30 is "reaction-v30";
  reaction_v31: species_108 + IFN_R_JAK_2_STAT1C_SOCS1 -> IFN_R_JAK_2_STAT1C_SHP2_SOCS1; Cell*(kf31*species_108*IFN_R_JAK_2_STAT1C_SOCS1 - kb31*IFN_R_JAK_2_STAT1C_SHP2_SOCS1); reaction_v31 is "reaction-v31";
  reaction_v32: IFN_R_JAK_2_STAT1C_SHP2_SOCS1 => SOCS1 + species_81 + species_84 + species_108; Cell*kf32*IFN_R_JAK_2_STAT1C_SHP2_SOCS1; reaction_v32 is "reaction-v32";
  reaction_v33: IFN_R_JAK_2_STAT1C_SHP2_SOCS1 => SOCS1 + IFN_R_JAK_2_STAT1C_SHP2; Cell*kf33*IFN_R_JAK_2_STAT1C_SHP2_SOCS1; reaction_v33 is "reaction-v33";
  reaction_v4: species_81 => species_82; Cell*kf4*species_81; reaction_v4 is "reaction-v4";
  reaction_v5: species_82 + species_84 -> species_83; Cell*(kf5*species_82*species_84 - kb5*species_83); reaction_v5 is "reaction-v5";
  reaction_v6: species_83 => species_82 + species_85; Cell*kf6*species_83; reaction_v6 is "reaction-v6";
  reaction_v7: species_82 + species_85 -> species_86; Cell*(kf7*species_82*species_85 - kb7*species_86); reaction_v7 is "reaction-v7";
  reaction_v8: 2 species_85 -> STAT1C_2; Cell*(kf8*species_85^2 - kb8*STAT1C_2); reaction_v8 is "reaction-v8";
  reaction_v9: species_82 + species_108 -> IFN_R_JAK_2_SHP2; Cell*(kf9*species_82*species_108 - kb9*IFN_R_JAK_2_SHP2); reaction_v9 is "reaction-v9";
  reaction_n1: species_82 + species_11 -> s118; Cell*(n_kf1*species_82*species_11 - n_kr1*s118);
  reaction_n10: STAT1C_STAT3C => STAT1N_STAT3N; Cell*n_k10*STAT1C_STAT3C;
  reaction_n11: PP1 + STAT1C_STAT3C -> PP1_STAT1C_STAT3C; Cell*(n_kf11*PP1*STAT1C_STAT3C - n_kr11*PP1_STAT1C_STAT3C);
  reaction_n12: STAT1N_STAT3N + PP2 -> PP2_STAT1N_STAT3N; n_kf12*STAT1N_STAT3N*PP2 - n_kr12*PP2_STAT1N_STAT3N;
  reaction_n2: s118 => species_12 + species_82; Cell*n_k2*s118;
  reaction_n3: species_12 + species_82 -> s119; Cell*(n_kf3*species_12*species_82 - n_kr3*s119);
  reaction_n4: species_9 + species_84 -> s138; Cell*(n_kf4*species_9*species_84 - n_kr4*s138);
  reaction_n5: s138 => species_9 + species_85; Cell*n_k5*s138;
  reaction_n6: species_85 + species_9 -> s139; Cell*(n_kf6*species_85*species_9 - n_kr6*s139);
  reaction_n7: => mRNA_SOCS3N; Nucluse2*function_4_reaction_n7_1(n_kf7, n_kr7, STAT1N_2);  // modifiers: STAT1N_2
  reaction_n8: species_12 + species_85 -> STAT1C_STAT3C; Cell*(n_kf8*species_12*species_85 - n_kr8*STAT1C_STAT3C);
  reaction_n9: species_26 + species_95 -> STAT1N_STAT3N; n_kf9*species_26*species_95 - n_kr9*STAT1N_STAT3N;
  reaction_n13: PP1_STAT1C_STAT3C => PP1 + species_12 + species_84; Cell*n_k13*PP1_STAT1C_STAT3C;
  reaction_n14: PP1_STAT1C_STAT3C => species_85 + species_11 + PP1; Cell*n_k14*PP1_STAT1C_STAT3C;
  reaction_n15: PP2_STAT1N_STAT3N => species_26 + PP2 + species_96; n_k15*PP2_STAT1N_STAT3N;
  reaction_n16: PP2_STAT1N_STAT3N => species_95 + species_28 + PP2; n_k16*PP2_STAT1N_STAT3N;
  reaction_n17: s118 + species_84 -> IFN_R_JAK_2_STAT1C_STAT3C; Cell*(n_kf17*s118*species_84 - n_kr17*IFN_R_JAK_2_STAT1C_STAT3C);
  reaction_n18: species_83 + species_11 -> IFN_R_JAK_2_STAT1C_STAT3C; Cell*(n_kf18*species_83*species_11 - n_kr18*IFN_R_JAK_2_STAT1C_STAT3C);
  reaction_n19: IFN_R_JAK_2_STAT1C_STAT3C => s118 + species_85; Cell*n_k19*IFN_R_JAK_2_STAT1C_STAT3C;
  reaction_n20: IFN_R_JAK_2_STAT1C_STAT3C => species_83 + species_12; Cell*n_k20*IFN_R_JAK_2_STAT1C_STAT3C;
  reaction_n21: species_10 + species_84 -> species_17; n_kf21*species_10*species_84 - n_kr21*species_17;
  reaction_n22: IL6_gp80_gp130_JAK_2_STAT1C + species_11 -> species_17; n_kf22*IL6_gp80_gp130_JAK_2_STAT1C*species_11 - n_kr22*species_17;
  reaction_n23: species_17 => species_10 + species_85; n_k23*species_17;
  reaction_n24: species_17 => IL6_gp80_gp130_JAK_2_STAT1C + species_12; n_k24*species_17;

  // Unit definitions:
  unit substance = 1e-9 mole;
  unit volume = litre;
  unit area = metre^2;
end
