// SBML level 2 version 4
// This model was downloaded from BioModels Database
// http://www.ebi.ac.uk/biomodels/
// dcterms:bibliographicCitation: http://identifiers.org/pubmed/24413179

function function_4_PTS_Glc(FBP, G6P, Glucose, PEP, PYR, Pint, Vmax_PTS_Glc, kaPint_PTS_Glc, kiFBP_PTS_Glc, kmG6P_PTS_Glc, kmGlucose_PTS_Glc, kmPEP_PTS_Glc, kmPYR_PTS_Glc)
  Pint/(Pint + kaPint_PTS_Glc)*(kiFBP_PTS_Glc/(FBP + kiFBP_PTS_Glc))*Vmax_PTS_Glc*(Glucose/kmGlucose_PTS_Glc)*(PEP/kmPEP_PTS_Glc)/((1 + Glucose/kmGlucose_PTS_Glc)*(1 + PEP/kmPEP_PTS_Glc) + (1 + G6P/kmG6P_PTS_Glc)*(1 + PYR/kmPYR_PTS_Glc) - 1);
end

function function_4_ATPase(ATP, Vmax_ATPase, kmATP_ATPase, nATPase)
  Vmax_ATPase*((ATP/kmATP_ATPase)^nATPase/((ATP/kmATP_ATPase)^nATPase + 1));
end

function function_4_P_transp(ADP, ATP, Pext, Pint, Vmax_Ptransport, kiPint_Ptransport, kmADP_Ptransport, kmATP_Ptransport, kmPext_Ptransport, kmPint_Ptransport)
  kiPint_Ptransport/(Pint + kiPint_Ptransport)*Vmax_Ptransport*(ATP/kmATP_Ptransport)*(Pext/kmPext_Ptransport)/((1 + Pext/kmPext_Ptransport)*(1 + ATP/kmATP_Ptransport) + (1 + Pint/kmPint_Ptransport + (Pint/kmPint_Ptransport)^2)*(1 + ADP/kmADP_Ptransport) - 1);
end

function function_4_PGI(F6P, G6P, Keq_PGI, Vmax_PGI, kmF6P_PGI, kmG6P_PGI)
  (Vmax_PGI*(G6P/kmG6P_PGI) - Vmax_PGI/Keq_PGI*(F6P/kmG6P_PGI))/(1 + G6P/kmG6P_PGI + F6P/kmF6P_PGI);
end

function function_4_PFK(ADP, ATP, F6P, FBP, Vmax_PFK, kmADP_PFK, kmATP_PFK, kmF6P_PFK, kmFBP_PFK)
  Vmax_PFK*(F6P/kmF6P_PFK)*(ATP/kmATP_PFK)/((1 + F6P/kmF6P_PFK)*(1 + ATP/kmATP_PFK) + (1 + FBP/kmFBP_PFK)*(1 + ADP/kmADP_PFK) - 1);
end

function function_4_FBA(FBP, G3P, Keq_FBA, Vmax_FBA, kmFBP_FBA, kmG3P_FBA)
  (Vmax_FBA*(FBP/kmFBP_FBA) - Vmax_FBA/Keq_FBA*(G3P^2/kmFBP_FBA))/(1 + FBP/kmFBP_FBA + G3P/kmG3P_FBA + (G3P/kmG3P_FBA)^2);
end

function function_4_GAPDH(BPG, G3P, Keq_GAPDH, NAD, NADH, Pint, Vmax_GAPDH, kmBPG_GAPDH, kmG3P_GAPDH, kmNADH_GAPDH, kmNAD_GAPDH, kmPint_GAPDH)
  (Vmax_GAPDH*(G3P/kmG3P_GAPDH)*(NAD/kmNAD_GAPDH)*(Pint/kmPint_GAPDH) - Vmax_GAPDH/Keq_GAPDH*(BPG/kmG3P_GAPDH)*(NADH/kmNAD_GAPDH)*(1/kmPint_GAPDH))/((1 + G3P/kmG3P_GAPDH)*(1 + Pint/kmPint_GAPDH)*(1 + NAD/kmNAD_GAPDH) + (1 + BPG/kmBPG_GAPDH)*(1 + NADH/kmNADH_GAPDH) - 1);
end

function function_4_ENO(ADP, ATP, BPG, Keq_ENO, PEP, Vmax_ENO, kmADP_ENO, kmATP_ENO, kmBPG_ENO, kmPEP_ENO)
  (Vmax_ENO*(BPG/kmBPG_ENO)*(ADP/kmADP_ENO) - Vmax_ENO/Keq_ENO*(PEP/kmBPG_ENO)*(ATP/kmADP_ENO))/((1 + BPG/kmBPG_ENO)*(1 + ADP/kmADP_ENO) + (1 + PEP/kmPEP_ENO)*(1 + ATP/kmATP_ENO) - 1);
end

function function_4_PYK(ADP, ATP, FBP, PEP, PYR, Pint, Vmax_PYK, kaFBP_PYK, kiPint_PYK, kmADP_PYK, kmATP_PYK, kmPEP_PYK, kmPYR_PYK, nPYK)
  FBP/(FBP + kaFBP_PYK)*(kiPint_PYK^nPYK/(Pint^nPYK + kiPint_PYK^nPYK))*Vmax_PYK*(ADP/kmADP_PYK)*(PEP/kmPEP_PYK)/((1 + ADP/kmADP_PYK)*(1 + PEP/kmPEP_PYK) + (1 + ATP/kmATP_PYK)*(1 + PYR/kmPYR_PYK) - 1);
end

function function_4_LDH(FBP, Lactate, NAD, NADH, PYR, Pint, Vmax_LDH, kaFBP_LDH, kiPint_LDH, kmLactate_LDH, kmNADH_LDH, kmNAD_LDH, kmPYR_LDH)
  FBP/(FBP + kaFBP_LDH)*(kiPint_LDH/(Pint + kiPint_LDH))*Vmax_LDH*(PYR/kmPYR_LDH)*(NADH/kmNADH_LDH)/((1 + PYR/kmPYR_LDH)*(1 + NADH/kmNADH_LDH) + (1 + Lactate/kmLactate_LDH)*(1 + NAD/kmNAD_LDH) - 1);
end

function function_4_PFL(AcetCoA, CoA, Formate, G3P, Keq_PFL, KmCoA_PFL, PYR, Vmax_PFL, kiG3P_PFL, kmAcetCoA_PFL, kmFormate_PFL, kmPYR_PFL)
  kiG3P_PFL/(G3P + kiG3P_PFL)*(Vmax_PFL*(PYR/kmPYR_PFL)*(CoA/KmCoA_PFL) - Vmax_PFL/Keq_PFL*(AcetCoA/kmPYR_PFL)*(Formate/KmCoA_PFL))/((1 + PYR/kmPYR_PFL)*(1 + CoA/KmCoA_PFL) + (1 + AcetCoA/kmAcetCoA_PFL)*(1 + Formate/kmFormate_PFL) - 1);
end

function function_4_AE(ATP, AcetCoA, CoA, Ethanol, NAD, NADH, Vmax_AE, kiATP_AE, kmAcetCoA_AE, kmCoA_AE, kmEthanol_AE, kmNADH_AE, kmNAD_AE)
  kiATP_AE/(ATP + kiATP_AE)*Vmax_AE*(AcetCoA/kmAcetCoA_AE)*(NADH/kmNADH_AE)^2/((1 + NADH/kmNADH_AE + (NADH/kmNADH_AE)^2)*(1 + AcetCoA/kmAcetCoA_AE) + (1 + Ethanol/kmEthanol_AE)*(1 + CoA/kmCoA_AE)*(1 + NAD/kmNAD_AE + (NAD/kmNAD_AE)^2) - 1);
end

function function_4_ACK(ADP, ATP, AcetCoA, Acetate, CoA, Vmax_ACK, kmADP_ACK, kmATP_ACK, kmAcetCoA_ACK, kmAcetate_ACK, kmCoA_ACK)
  Vmax_ACK*(AcetCoA/kmAcetCoA_ACK)*(ADP/kmADP_ACK)/((1 + AcetCoA/kmAcetCoA_ACK)*(1 + ADP/kmADP_ACK) + (1 + Acetate/kmAcetate_ACK)*(1 + ATP/kmATP_ACK)*(1 + CoA/kmCoA_ACK) - 1);
end

function function_4_ALS(Acetoin, Keq_ALS, PYR, Vmax_ALS, kmAcetoin_ALS, kmPYR_ALS)
  (Vmax_ALS*(PYR/kmPYR_ALS)^2 - Vmax_ALS/Keq_ALS*(Acetoin/kmPYR_ALS))/(1 + PYR/kmPYR_ALS + (PYR/kmPYR_ALS)^2 + 1 + Acetoin/kmAcetoin_ALS - 1);
end

function function_4_BDH(Acetoin, Butanediol, Keq_BDH, NAD, NADH, Vmax_BDH, kmAcetoin_BDH, kmButanediol_BDH, kmNADH_BDH, kmNAD_BDH)
  (Vmax_BDH*(Acetoin/kmAcetoin_BDH)*(NADH/kmNADH_BDH) - Vmax_BDH/Keq_BDH*(Butanediol/kmAcetoin_BDH)*(NAD/kmNADH_BDH))/((1 + Acetoin/kmAcetoin_BDH)*(1 + NADH/kmNADH_BDH) + (1 + Butanediol/kmButanediol_BDH)*(1 + NAD/kmNAD_BDH) - 1);
end

function function_4_MPD(F6P, Keq_MPD, Mannitol1Phosphate, NAD, NADH, Vmax_MPD, kiF6P_MPD, kmF6P_MPD, kmMannitol1Phoshate_MPD, kmNADH_MPD, kmNAD_MPD)
  kiF6P_MPD/(F6P + kiF6P_MPD)*(Vmax_MPD*(F6P/kmF6P_MPD)*(NADH/kmNADH_MPD) - Vmax_MPD/Keq_MPD*(Mannitol1Phosphate/kmF6P_MPD)*(NAD/kmNADH_MPD))/((1 + F6P/kmF6P_MPD)*(1 + NADH/kmNADH_MPD) + (1 + Mannitol1Phosphate/kmMannitol1Phoshate_MPD)*(1 + NAD/kmNAD_MPD) - 1);
end

function function_4_MP(Mannitol, Mannitol1Phosphate, Vmax_MP, kmMannitol1Phosphate_MP, kmMannitol_MP)
  Vmax_MP*(Mannitol1Phosphate/kmMannitol1Phosphate_MP)/(1 + Mannitol1Phosphate/kmMannitol1Phosphate_MP + 1 + Mannitol/kmMannitol_MP - 1);
end

function function_4_PTS_Man(Mannitol1Phosphate, Mannitol_Ext, PEP, PYR, Vmax_PTS_Man, kmMannitol1Phosphate_PTS_Man, kmMannitolExt_PTS_Man, kmPEP_PTS_Man, kmPYR_PTS_Man)
  Vmax_PTS_Man*(Mannitol_Ext/kmMannitolExt_PTS_Man)*(PEP/kmPEP_PTS_Man)/((1 + Mannitol_Ext/kmMannitolExt_PTS_Man)*(1 + PEP/kmPEP_PTS_Man) + (1 + Mannitol1Phosphate/kmMannitol1Phosphate_PTS_Man)*(1 + PYR/kmPYR_PTS_Man) - 1);
end

function function_4_Acetoin_transp(Acetoin, Acetoin_Ext, Vmax_Acetoin_transp, kmAcetoin_Acetoin_transp, kmAcetoin_Ext_Acetoin_transp)
  Vmax_Acetoin_transp*(Acetoin/kmAcetoin_Acetoin_transp)/(1 + Acetoin/kmAcetoin_Acetoin_transp + Acetoin_Ext/kmAcetoin_Ext_Acetoin_transp);
end

function function_4_Mannitol_transp(Mannitol, Mannitol_Ext, Vmax_Mannitol_transp, kmMannitol_Ext_Mannitol_transp, kmMannitol_Mannitol_transp)
  Vmax_Mannitol_transp*(Mannitol/kmMannitol_Mannitol_transp)/(1 + Mannitol/kmMannitol_Mannitol_transp + Mannitol_Ext/kmMannitol_Ext_Mannitol_transp);
end

function function_4_FBPase(F6P, FBP, Pint, Vmax_FBPase, kmF6P_FBPase, kmFBP_FBPase, kmPint_FBPase)
  Vmax_FBPase*(FBP/kmFBP_FBPase)/(FBP/kmFBP_FBPase + (1 + F6P/kmF6P_FBPase)*(1 + Pint/kmPint_FBPase));
end

model MODEL1503180000()
  // Costa2014 - Computational Model of L. lactis Metabolism
  // This model is described in the article:
  // An extended dynamic model of Lactococcus lactis metabolism for mannitol and 2,3-butanediol production.
  // Costa RS, Hartmann A, Gaspar P, Neves AR, Vinga S.
  // Mol Biosyst 2014 Mar; 10(3): 628-639
  // Abstract:
  // Biomedical research and biotechnological production are greatly benefiting from the results provided by the development of dynamic models of microbial metabolism. Although several kinetic models of Lactococcus lactis (a Lactic Acid Bacterium (LAB) commonly used in the dairy industry) have been developed so far, most of them are simplified and focus only on specific metabolic pathways. Therefore, the application of mathematical models in the design of an engineering strategy for the production of industrially important products by L. lactis has been very limited. In this work, we extend the existing kinetic model of L. lactis central metabolism to include industrially relevant production pathways such as mannitol and 2,3-butanediol. In this way, we expect to study the dynamics of metabolite production and make predictive simulations in L. lactis. We used a system of ordinary differential equations (ODEs) with approximate Michaelis-Menten-like kinetics for each reaction, where the parameters were estimated from multivariate time-series metabolite concentrations obtained by our team through in vivo Nuclear Magnetic Resonance (NMR). The results show that the model captures observed transient dynamics when validated under a wide range of experimental conditions. Furthermore, we analyzed the model using global perturbations, which corroborate experimental evidence about metabolic responses upon enzymatic changes. These include that mannitol production is very sensitive to lactate dehydrogenase (LDH) in the wild type (W.T.) strain, and to mannitol phosphoenolpyruvate: a phosphotransferase system (PTS(Mtl)) in a LDH mutant strain. LDH reduction has also a positive control on 2,3-butanediol levels. Furthermore, it was found that overproduction of mannitol-1-phosphate dehydrogenase (MPD) in a LDH/PTS(Mtl) deficient strain can increase the mannitol levels. The results show that this model has prediction capability over new experimental conditions and offers promising possibilities to elucidate the effect of alterations in the main metabolism of L. lactis, with application in strain optimization.
  // This model is hosted on BioModels Database and identified by: BIOMD0000000572.
  // To cite BioModels Database, please use: BioModels Database: An enhanced, curated and annotated resource for published quantitative kinetic models.
  // To the extent possible under law, all copyright and related or neighbouring rights to this encoded model have been dedicated to the public domain worldwide. Please refer to CC0 Public Domain Dedication for more information.
  // biomodels.db:MODEL1503180000
  // biomodels.db:BIOMD0000000572
  // isDescribedBy pubmed:24413179
  // isDerivedFrom pubmed:11932446 pubmed:22325620 pubmed:15006767 pubmed:873604 pubmed:21841021 pubmed:15345435
  // hasTaxon taxonomy:1358
  // isVersionOf GO:0034079

  // Compartments:
  compartment Intracellular = 0.047;  // GO:0005622
  compartment Extracellular = 1;  // GO:0005576

  // Species:
  species G6P in Intracellular = 0;  // CHEBI:17665
  species ATP in Intracellular = 4.886325;  // CHEBI:15422
  species ADP in Intracellular = 20.38569;  // CHEBI:16761
  species Pint in Intracellular = 38.26;  // CHEBI:18367
  species F6P in Intracellular = 0;  // CHEBI:15946
  species FBP in Intracellular = 15.3;  // CHEBI:16905
  species G3P in Intracellular = 0;  // CHEBI:17138
  species BPG in Intracellular = 1.263485;  // CHEBI:16001
  species PEP in Intracellular = 2.479018;  // CHEBI:18021
  species NAD in Intracellular = 4.67;  // CHEBI:15846
  species NADH in Intracellular = 2.033379e-6;  // CHEBI:16908
  species PYR in Intracellular = 0;  // CHEBI:15361
  species AcetCoA in Intracellular = 0;  // CHEBI:15351
  species Acetoin in Intracellular = 0;  // CHEBI:15688
  species Mannitol in Intracellular = 0;  // CHEBI:29864
  species Mannitol1Phosphate in Intracellular = 0;  // CHEBI:16298
  species CoA in Intracellular = 1;  // CHEBI:15346
  species Pext in Extracellular = 50;  // CHEBI:18367
  species Lactate in Extracellular = 0;  // CHEBI:422
  species Ethanol in Extracellular = 0;  // CHEBI:16236
  species Acetate in Extracellular = 0;  // CHEBI:30089
  species Butanediol in Extracellular = 0;  // CHEBI:52684
  species Glucose in Extracellular = 80;  // CHEBI:17234
  species Acetoin_Ext in Extracellular = 0;  // CHEBI:15688
  species Mannitol_Ext in Extracellular = 0;  // CHEBI:29864
  species Formate in Extracellular = 0;  // CHEBI:15740

  // Reactions:
  PTS_Glc: Glucose + PEP => G6P + PYR; function_4_PTS_Glc(FBP, G6P, Glucose, PEP, PYR, Pint, Vmax_PTS_Glc, kaPint_PTS_Glc, kiFBP_PTS_Glc, kmG6P_PTS_Glc, kmGlucose_PTS_Glc, kmPEP_PTS_Glc, kmPYR_PTS_Glc);  // modifiers: FBP, Pint
    Vmax_PTS_Glc = 3.71082; kaPint_PTS_Glc = 0.070909; kiFBP_PTS_Glc = 1.16937; kmG6P_PTS_Glc = 0.284871; kmGlucose_PTS_Glc = 0.0485045; kmPEP_PTS_Glc = 0.305604; kmPYR_PTS_Glc = 1.95993;
  ATPase: ATP => ADP + Pint; Intracellular*function_4_ATPase(ATP, Vmax_ATPase, kmATP_ATPase, nATPase);
    Vmax_ATPase = 3.2901; kmATP_ATPase = 4.34159; nATPase = 3;
  P_transp: Pext + ATP => 2 Pint + ADP; function_4_P_transp(ADP, ATP, Pext, Pint, Vmax_Ptransport, kiPint_Ptransport, kmADP_Ptransport, kmATP_Ptransport, kmPext_Ptransport, kmPint_Ptransport);
    Vmax_Ptransport = 3.59588; kiPint_Ptransport = 0.561093; kmADP_Ptransport = 0.192278; kmATP_Ptransport = 0.523288; kmPext_Ptransport = 0.749898; kmPint_Ptransport = 0.30336;
  PGI: G6P -> F6P; Intracellular*function_4_PGI(F6P, G6P, Keq_PGI, Vmax_PGI, kmF6P_PGI, kmG6P_PGI);
    Keq_PGI = 0.43; Vmax_PGI = 21.681; kmF6P_PGI = 3.13894; kmG6P_PGI = 0.199409;
  PFK: F6P + ATP => FBP + ADP; Intracellular*function_4_PFK(ADP, ATP, F6P, FBP, Vmax_PFK, kmADP_PFK, kmATP_PFK, kmF6P_PFK, kmFBP_PFK);
    Vmax_PFK = 18.3577; kmADP_PFK = 10.7357; kmATP_PFK = 0.0616607; kmF6P_PFK = 1.01973; kmFBP_PFK = 86.8048;
  FBA: FBP -> 2 G3P; Intracellular*function_4_FBA(FBP, G3P, Keq_FBA, Vmax_FBA, kmFBP_FBA, kmG3P_FBA);
    Keq_FBA = 0.056; Vmax_FBA = 56.1311; kmFBP_FBA = 0.300745; kmG3P_FBA = 10.1058;
  GAPDH: G3P + Pint + NAD -> BPG + NADH; Intracellular*function_4_GAPDH(BPG, G3P, Keq_GAPDH, NAD, NADH, Pint, Vmax_GAPDH, kmBPG_GAPDH, kmG3P_GAPDH, kmNADH_GAPDH, kmNAD_GAPDH, kmPint_GAPDH);
    Keq_GAPDH = 0.0007; Vmax_GAPDH = 30.0058; kmBPG_GAPDH = 0.0481603; kmG3P_GAPDH = 0.181788; kmNADH_GAPDH = 0.643019; kmNAD_GAPDH = 0.0477445; kmPint_GAPDH = 6.75302;
  ENO: BPG + ADP -> PEP + ATP; Intracellular*function_4_ENO(ADP, ATP, BPG, Keq_ENO, PEP, Vmax_ENO, kmADP_ENO, kmATP_ENO, kmBPG_ENO, kmPEP_ENO);
    Keq_ENO = 27.55; Vmax_ENO = 29.132; kmADP_ENO = 0.413195; kmATP_ENO = 0.748238; kmBPG_ENO = 0.0241572; kmPEP_ENO = 1.38899;
  PYK: PEP + ADP => PYR + ATP; Intracellular*function_4_PYK(ADP, ATP, FBP, PEP, PYR, Pint, Vmax_PYK, kaFBP_PYK, kiPint_PYK, kmADP_PYK, kmATP_PYK, kmPEP_PYK, kmPYR_PYK, nPYK);  // modifiers: FBP, Pint
    Vmax_PYK = 2.22404; kaFBP_PYK = 0.0388651; kiPint_PYK = 3.70071; kmADP_PYK = 3.07711; kmATP_PYK = 29.6028; kmPEP_PYK = 0.330583; kmPYR_PYK = 96.4227; nPYK = 3;
  LDH: PYR + NADH => Lactate + NAD; function_4_LDH(FBP, Lactate, NAD, NADH, PYR, Pint, Vmax_LDH, kaFBP_LDH, kiPint_LDH, kmLactate_LDH, kmNADH_LDH, kmNAD_LDH, kmPYR_LDH);  // modifiers: FBP, Pint
    Vmax_LDH = 566.598; kaFBP_LDH = 0.0184011; kiPint_LDH = 0.0676829; kmLactate_LDH = 94.1203; kmNADH_LDH = 0.144443; kmNAD_LDH = 3.08447; kmPYR_LDH = 0.01;
  PDH: PYR + CoA -> AcetCoA + Formate; function_4_PFL(AcetCoA, CoA, Formate, G3P, Keq_PFL, KmCoA_PFL, PYR, Vmax_PFL, kiG3P_PFL, kmAcetCoA_PFL, kmFormate_PFL, kmPYR_PFL);  // modifiers: G3P
    Keq_PFL = 650; KmCoA_PFL = 0.124066; Vmax_PFL = 0.00230934; kiG3P_PFL = 0.511288; kmAcetCoA_PFL = 7.34319; kmFormate_PFL = 54.2693; kmPYR_PFL = 5.77662;
  AE: AcetCoA + 2 NADH => Ethanol + 2 NAD + CoA; function_4_AE(ATP, AcetCoA, CoA, Ethanol, NAD, NADH, Vmax_AE, kiATP_AE, kmAcetCoA_AE, kmCoA_AE, kmEthanol_AE, kmNADH_AE, kmNAD_AE);  // modifiers: ATP
    Vmax_AE = 2.11844; kiATP_AE = 6.28119; kmAcetCoA_AE = 7.38021; kmCoA_AE = 0.091813; kmEthanol_AE = 2.28106; kmNADH_AE = 0.43127; kmNAD_AE = 1.31442;
  AC: AcetCoA + ADP => Acetate + ATP + CoA; function_4_ACK(ADP, ATP, AcetCoA, Acetate, CoA, Vmax_ACK, kmADP_ACK, kmATP_ACK, kmAcetCoA_ACK, kmAcetate_ACK, kmCoA_ACK);
    Vmax_ACK = 3.83918; kmADP_ACK = 1.17242; kmATP_ACK = 14.1556; kmAcetCoA_ACK = 0.55824; kmAcetate_ACK = 0.552221; kmCoA_ACK = 0.173388;
  PA: 2 PYR -> Acetoin; Intracellular*function_4_ALS(Acetoin, Keq_ALS, PYR, Vmax_ALS, kmAcetoin_ALS, kmPYR_ALS);
    Keq_ALS = 900000; Vmax_ALS = 0.354581; kmAcetoin_ALS = 0.0495418; kmPYR_ALS = 0.262819;
  AB: Acetoin + NADH -> Butanediol + NAD; function_4_BDH(Acetoin, Butanediol, Keq_BDH, NAD, NADH, Vmax_BDH, kmAcetoin_BDH, kmButanediol_BDH, kmNADH_BDH, kmNAD_BDH);
    Keq_BDH = 1400; Vmax_BDH = 2.28578; kmAcetoin_BDH = 5.62373; kmButanediol_BDH = 1.80684; kmNADH_BDH = 3.54858; kmNAD_BDH = 1.29567;
  MPD: F6P + NADH -> Mannitol1Phosphate + NAD; Intracellular*function_4_MPD(F6P, Keq_MPD, Mannitol1Phosphate, NAD, NADH, Vmax_MPD, kiF6P_MPD, kmF6P_MPD, kmMannitol1Phoshate_MPD, kmNADH_MPD, kmNAD_MPD);
    Keq_MPD = 200; Vmax_MPD = 1.32695; kiF6P_MPD = 22.0284; kmF6P_MPD = 0.321372; kmMannitol1Phoshate_MPD = 0.0891203; kmNADH_MPD = 0.0303446; kmNAD_MPD = 0.373149;
  MP: Mannitol1Phosphate => Mannitol; Intracellular*function_4_MP(Mannitol, Mannitol1Phosphate, Vmax_MP, kmMannitol1Phosphate_MP, kmMannitol_MP);
    Vmax_MP = 3.48563; kmMannitol1Phosphate_MP = 3.51571; kmMannitol_MP = 0.238849;
  PTS_Man: Mannitol_Ext + PEP => Mannitol1Phosphate + PYR; function_4_PTS_Man(Mannitol1Phosphate, Mannitol_Ext, PEP, PYR, Vmax_PTS_Man, kmMannitol1Phosphate_PTS_Man, kmMannitolExt_PTS_Man, kmPEP_PTS_Man, kmPYR_PTS_Man);
    Vmax_PTS_Man = 4.44903; kmMannitol1Phosphate_PTS_Man = 0.362571; kmMannitolExt_PTS_Man = 0.0127321; kmPEP_PTS_Man = 2.20816; kmPYR_PTS_Man = 0.344134;
  Acetoin_transp: Acetoin => Acetoin_Ext; function_4_Acetoin_transp(Acetoin, Acetoin_Ext, Vmax_Acetoin_transp, kmAcetoin_Acetoin_transp, kmAcetoin_Ext_Acetoin_transp);
    Vmax_Acetoin_transp = 1.60066; kmAcetoin_Acetoin_transp = 1.89255; kmAcetoin_Ext_Acetoin_transp = 7.05248;
  Mannitol_transp: Mannitol => Mannitol_Ext; function_4_Mannitol_transp(Mannitol, Mannitol_Ext, Vmax_Mannitol_transp, kmMannitol_Ext_Mannitol_transp, kmMannitol_Mannitol_transp);
    Vmax_Mannitol_transp = 1.62459; kmMannitol_Ext_Mannitol_transp = 0.940662; kmMannitol_Mannitol_transp = 0.0223502;
  FBPase: FBP => F6P + Pint; Intracellular*function_4_FBPase(F6P, FBP, Pint, Vmax_FBPase, kmF6P_FBPase, kmFBP_FBPase, kmPint_FBPase);
    Vmax_FBPase = 0.0970486; kmF6P_FBPase = 1.90796; kmFBP_FBPase = 0.412307; kmPint_FBPase = 0.0109675;

  // Unit definitions:
  unit substance = 1e-3 mole;
end
