// SBML level 2 version 4
// This model was downloaded from BioModels Database
// http://www.ebi.ac.uk/biomodels/
// dcterms:bibliographicCitation: http://identifiers.org/doi/doi:10.1074/jbc.M113.474908
// dcterms:bibliographicCitation: http://identifiers.org/pubmed/18620547
// dcterms:bibliographicCitation: http://identifiers.org/pubmed/15383589
// dcterms:bibliographicCitation: http://identifiers.org/pubmed/18370401
// dcterms:bibliographicCitation: http://identifiers.org/pubmed/4991409
// dcterms:bibliographicCitation: http://identifiers.org/pubmed/17300176
// dcterms:bibliographicCitation: http://identifiers.org/pubmed/19143568
// dcterms:bibliographicCitation: http://identifiers.org/pubmed/457635
// dcterms:bibliographicCitation: http://identifiers.org/pubmed/15663479
// dcterms:bibliographicCitation: http://identifiers.org/pubmed/19816759
// dcterms:bibliographicCitation: http://identifiers.org/pubmed/4190298
// dcterms:bibliographicCitation: urn:miriam:pubmed:10672018
// dcterms:bibliographicCitation: http://identifiers.org/pubmed/16973376
// dcterms:bibliographicCitation: http://identifiers.org/pubmed/9852119
// dcterms:bibliographicCitation: http://identifiers.org/pubmed/3949799
// dcterms:bibliographicCitation: urn:miriam:pubmed:3112306
// dcterms:bibliographicCitation: http://identifiers.org/pubmed/12672479
// dcterms:bibliographicCitation: http://identifiers.org/pubmed/18547057
// dcterms:bibliographicCitation: http://identifiers.org/pubmed/26687
// dcterms:bibliographicCitation: http://identifiers.org/pubmed/19737010
// dcterms:bibliographicCitation: http://identifiers.org/pubmed/11676605
// dcterms:bibliographicCitation: http://identifiers.org/pubmed/4135014
// dcterms:bibliographicCitation: http://identifiers.org/pubmed/15656614
// dcterms:bibliographicCitation: http://identifiers.org/pubmed/11754741
// dcterms:bibliographicCitation: http://identifiers.org/pubmed/2949752
// dcterms:bibliographicCitation: http://identifiers.org/pubmed/2872885
// dcterms:bibliographicCitation: http://identifiers.org/pubmed/17868694
// dcterms:bibliographicCitation: http://identifiers.org/pubmed/118164
// dcterms:bibliographicCitation: http://identifiers.org/pubmed/17402747
// dcterms:bibliographicCitation: http://identifiers.org/pubmed/17288562
// dcterms:bibliographicCitation: http://identifiers.org/pubmed/15848762
// dcterms:bibliographicCitation: http://identifiers.org/pubmed/15477086
// dcterms:bibliographicCitation: http://identifiers.org/pubmed/18771288
// dcterms:bibliographicCitation: http://identifiers.org/pubmed/2723766

model Stavrum2013___Tryptophan_Metabolism_in_Liver()
  // Stavrum2013 - Tryptophan Metabolism in Liver
  // This model is described in the article:
  // Model of tryptophan metabolism, readily scalable using tissue-specific gene expression data.
  // Stavrum AK, Heiland I, Schuster S, Puntervoll P, Ziegler M.
  // J. Biol. Chem. 2013 Nov; 288(48): 34555-34566
  // Abstract:
  // Tryptophan is utilized in various metabolic routes including protein synthesis, serotonin, and melatonin synthesis and the kynurenine pathway. Perturbations in these pathways have been associated with neurodegenerative diseases and cancer. Here we present a comprehensive kinetic model of the complex network of human tryptophan metabolism based upon existing kinetic data for all enzymatic conversions and transporters. By integrating tissue-specific expression data, modeling tryptophan metabolism in liver and brain returned intermediate metabolite concentrations in the physiological range. Sensitivity and metabolic control analyses identified expected key enzymes to govern fluxes in the branches of the network. Combining tissue-specific models revealed a considerable impact of the kynurenine pathway in liver on the concentrations of neuroactive derivatives in the brain. Moreover, using expression data from a cancer study predicted metabolite changes that resembled the experimental observations. We conclude that the combination of the kinetic model with expression data represents a powerful diagnostic tool to predict alterations in tryptophan metabolism. The model is readily scalable to include more tissues, thereby enabling assessment of organismal tryptophan metabolism in health and disease.
  // This model is hosted on BioModels Database and identified by: BIOMD0000000602.
  // To cite BioModels Database, please use: BioModels Database: An enhanced, curated and annotated resource for published quantitative kinetic models.
  // To the extent possible under law, all copyright and related or neighbouring rights to this encoded model have been dedicated to the public domain worldwide. Please refer to CC0 Public Domain Dedication for more information.
  // biomodels.db:MODEL1310160000
  // biomodels.db:BIOMD0000000602
  // isDescribedBy pubmed:24129579
  // hasTaxon taxonomy:9606
  // occursIn BTO:0000759
  // isVersionOf GO:0006587 GO:0006568

  // Compartments:
  compartment Cytosol = 1;

  // Species:
  species M_3hanthrn_c in Cytosol = 3.297677e-6; M_3hanthrn_c is "M_3HAA";  // CHEBI:15793
  species M_5hoxnfkyn_c in Cytosol = 2.328526e-10; M_5hoxnfkyn_c is "M_5HFKyn";  // CHEBI:2065
  species M_5htrp_c in Cytosol = 9.864854e-7; M_5htrp_c is "M_5HTrp";  // CHEBI:28171
  species $M_5hxkyn_c in Cytosol = 0; M_5hxkyn_c is "M_5HKyn";  // CHEBI:36408
  species M_Lfmkynr_c in Cytosol = 2.184002e-5; M_Lfmkynr_c is "M_FKyn";  // CHEBI:18377
  species M_Lkynr_c in Cytosol = 0.002632437; M_Lkynr_c is "M_L-Kyn";  // CHEBI:16946; kegg.compound:C00328
  species $M_ahcys_c in Cytosol = 1; M_ahcys_c is "M_AHCys";  // CHEBI:16680
  species $M_akg_c in Cytosol = 1; M_akg_c is "M_Ketoglutarate";  // CHEBI:16810
  species $M_ala_DASH_L_c in Cytosol = 1; M_ala_DASH_L_c is "M_L_ALA";  // CHEBI:16977
  species $M_amet_c in Cytosol = 1; M_amet_c is "M_AMet";  // CHEBI:15414
  species $M_anth_c in Cytosol = 0; M_anth_c is "M_AA";  // CHEBI:30754
  species M_cmusa_c in Cytosol = 1.121817e-5; M_cmusa_c is "M_Acms";  // CHEBI:995
  species $M_dhbpt_c in Cytosol = 1; M_dhbpt_c is "M_Dhbpt";  // CHEBI:43120 kegg.compound:C00268
  species $M_for_c in Cytosol = 0; M_for_c is "M_Formate";  // CHEBI:15740
  species $M_glu_DASH_L_c in Cytosol = 0; M_glu_DASH_L_c is "M_LGlu";  // CHEBI:29985
  species M_hLkynr_c in Cytosol = 1.196602e-5; M_hLkynr_c is "M_3HKyn";  // CHEBI:36408
  species $M_id3acald_c in Cytosol = 0; M_id3acald_c is "M_IndolAc";  // CHEBI:28311
  species $M_indpyr_c in Cytosol = 0; M_indpyr_c is "M_IndolP";  // CHEBI:29750
  species M_nmtrpta_c in Cytosol = 2.599475e-9; M_nmtrpta_c is "M_MTrypta";  // CHEBI:28136
  species M_quln_c in Cytosol = 1.784496e-15; M_quln_c is "M_Quin";  // CHEBI:16675
  species M_srtn_c in Cytosol = 7.763066e-8; M_srtn_c is "M_Serotonin";  // CHEBI:28790
  species $M_thbpt in Cytosol = 1; M_thbpt is "M_Thbpt";  // CHEBI:15372
  species $M_trna_trp_c in Cytosol = 1e-5; M_trna_trp_c is "M_tRNA";  // CHEBI:17843
  species M_trp_DASH_L_c in Cytosol = 0.0001200644; M_trp_DASH_L_c is "M_Trp";  // CHEBI:27897
  species $M_trp_L_trna_c in Cytosol = 0; M_trp_L_trna_c is "M_Trp_tRNA";  // CHEBI:29181
  species M_trypta_c in Cytosol = 3.590902e-9; M_trypta_c is "M_Trypta";  // CHEBI:16765
  species $M_amp_c in Cytosol = 1; M_amp_c is "M_AMP";  // CHEBI:16027
  species $M_atp_c in Cytosol = 1; M_atp_c is "M_ATP";  // CHEBI:15422
  species $M_co2_c in Cytosol = 1; M_co2_c is "M_CO2";  // CHEBI:16526
  species $M_h2o2_c in Cytosol = 0; M_h2o2_c is "M_H2O2";  // CHEBI:16240
  species $M_h2o_c in Cytosol = 1; M_h2o_c is "M_H2O";  // CHEBI:15377
  species $M_h_c in Cytosol = 1; M_h_c is "M_H";  // CHEBI:29235
  species $M_nadp_c in Cytosol = 0; M_nadp_c is "M_NADP";  // CHEBI:18009
  species $M_nadph_c in Cytosol = 0.03; M_nadph_c is "M_NADPH";  // CHEBI:16474
  species $M_nh4_c in Cytosol = 0; M_nh4_c is "M_NH4";  // CHEBI:28938
  species $M_o2_c in Cytosol = 1; M_o2_c is "M_O2";  // CHEBI:15379
  species $M_o2s_c in Cytosol = 0; M_o2s_c is "M_O2s";  // CHEBI:18422
  species $M_ppi_c in Cytosol = 0; M_ppi_c is "M_PPi";  // CHEBI:18361
  species $M_Cinnavalininate_c in Cytosol = 1;  // CHEBI:3715
  species $M_kynate_c in Cytosol = 1; M_kynate_c is "M_Kyna";  // CHEBI:18344
  species $TRP_ex in Cytosol = 0.005; TRP_ex is "Trp_ex";  // CHEBI:27897
  species M_nicrnt_c in Cytosol = 9.500215e-16; M_nicrnt_c is "M_NaMN";  // CHEBI:15763
  species $M_prpp_c in Cytosol = 1; M_prpp_c is "M_PRPP";  // CHEBI:17111
  species M_nformanth_c in Cytosol = 7.141527e-9; M_nformanth_c is "M_FAA";  // CHEBI:36575
  species $M_dnad_c in Cytosol = 0; M_dnad_c is "M_NAAD";  // CHEBI:18304
  species $M_am6sa_c in Cytosol = 1; M_am6sa_c is "M_Am6sa";  // CHEBI:15745
  species $M_5hoxindact_c in Cytosol = 1; M_5hoxindact_c is "M_5HAc";  // CHEBI:50157
  species $M_Nacsertn_c in Cytosol = 0; M_Nacsertn_c is "M_NAcSet";  // CHEBI:28136
  species $M_accoa_c in Cytosol = 1; M_accoa_c is "M_AcetylCoA";  // CHEBI:15351
  species $M_coa_c in Cytosol = 1; M_coa_c is "M_CoA";  // CHEBI:15346
  species $M_Xanthurenate in Cytosol = 0;  // CHEBI:10072
  species $M_f5hoxkyn_c in Cytosol = 0; M_f5hoxkyn_c is "M_F5HKyn";  // CHEBI:28736
  species $M_nndmtrpta_c in Cytosol = 0; M_nndmtrpta_c is "M_MMTrypta";  // CHEBI:28969
  species $M_nmsrtn_c in Cytosol = 0; M_nmsrtn_c is "M_NMSer";  // CHEBI:48294
  species $M_Nactrypta_c in Cytosol = 0;  // CHEBI:55469
  species $M_Lkynr_ex in Cytosol = 0; M_Lkynr_ex is "M_LKyn_ex";  // CHEBI:16946

  // Parameters:
  scaling = 1;
  AADAT_E_T_kat1 = 9455.136; AADAT_E_T_kat1 is "KAT1_E_T";
  AADAT_E_T_kat2 = 7744.315; AADAT_E_T_kat2 is "KAT2_E_T";
  AADAT_E_T_kat3 = 15588.21; AADAT_E_T_kat3 is "KAT3_E_T";
  AADAT_Km_hLkynr = 3.8; AADAT_Km_hLkynr is "KAT_Km_3HKyn";  // isDescribedBy pubmed:18620547
  AADAT_Km_Lkynr = 4.7; AADAT_Km_Lkynr is "KAT_Km_L-kyn";  // isDescribedBy pubmed:18620547
  AANAT_E_T = 2770.968;
  AANAT_Km_Srtn = 1.35; AANAT_Km_Srtn is "AANAT_Km_Serotonin";
  AANAT_Km_trypta = 0.88; AANAT_Km_trypta is "AANAT_Km_Trypta";
  AFMID_E_T = 15820.22;
  AFMID_Km_5hoxnfky = 0.4; AFMID_Km_5hoxnfky is "AFMID_Km_5HFKyn";
  AFMID_Km_Lfmkynr = 0.05; AFMID_Km_Lfmkynr is "AFMID_Km_FKyn";
  AFMID_Km_nformanth = 0.211; AFMID_Km_nformanth is "AFMID_Km_FAA";
  DDC_E_T = 36074.91;
  DDC_Km_5htrp = 0.049;
  DDC_Km_trp_DASH_L = 10; DDC_Km_trp_DASH_L is "DDC_Km_Trp";
  IDO_E_T = 453.4834;
  IDO_Km_trp_DASH_L = 0.045; IDO_Km_trp_DASH_L is "IDO_Km_Trp";
  IDO_Km_5htrp = 0.02;
  IDO_Km_srtn = 0.1; IDO_Km_srtn is "IDO_Km_Serotonin";
  IMNT_E_T = 4186.587;
  IMNT_Km_srtn = 1.38; IMNT_Km_srtn is "IMNT_Km_Serotonin";
  IMNT_Km_trypta = 0.27; IMNT_Km_trypta is "IMNT_Km_Trypta";
  IMNT_Km_nmtrpta = 0.086; IMNT_Km_nmtrpta is "IMNT_Km_MTrypta";
  KYNU_Km_hLkynr = 0.028; KYNU_Km_hLkynr is "KYNU_Km_3HKyn";
  Transporter_E_T_Slc7a8 = 2226.373;
  KYNU_E_T = 56601.76;
  KYNU_Km_Lfmkynr = 2.2; KYNU_Km_Lfmkynr is "KYNU_Km_FKyn";
  KYNU_Km_Lkynr = 0.495; KYNU_Km_Lkynr is "KYNU_Km_L-kyn";
  Transporter_Km_Lkynr = 0.032; Transporter_Km_Lkynr is "Transporter_Km_L-kyn";
  Transporter_Km_Trp_Slc7a8 = 0.0573;
  Transporter_E_T_Slc7a5 = 1961.514;
  Transporter_Km_Trp_Slc7a5 = 0.019;
  MAOA_E_T = 137204.8;
  MAOB_E_T = 2.94114875e5;
  MAO_Km_srtn = 0.43; MAO_Km_srtn is "MAO_Km_Serotonin";
  MAO_Km_trypta = 0.033; MAO_Km_trypta is "MAO_Km_Trypta";
  IDO_Km_O2 = 0.042;
  AADAT_kcat_hLkynr = 1.7; AADAT_kcat_hLkynr is "KAT_kcat_3HKyn";  // isDescribedBy pubmed:18620547
  AADAT_kcat_Lkynr = 9.76; AADAT_kcat_Lkynr is "KAT_kcat_L-kyn";  // isDescribedBy pubmed:18620547
  Transporter_kcat_Trp = 1.3;
  Transporter_kcat_Lkynr = 1.3; Transporter_kcat_Lkynr is "Transporter_kcat_L-kyn";

  // Reactions:
  IL4I1: M_trp_DASH_L_c + $M_h2o_c + $M_o2_c => $M_indpyr_c + $M_nh4_c + $M_h2o2_c; Cytosol*(IL4I1_kcat*IL4I1_E_T*M_trp_DASH_L_c*M_o2_c*M_h2o_c*scaling/(IL4I1_Ka*IL4I1_Kb + IL4I1_Kb*M_trp_DASH_L_c + IL4I1_Ka*M_o2_c + M_trp_DASH_L_c*M_o2_c));  // isDescribedBy pubmed:15383589; isEncodedBy ncbigene:259307; ec-code:1.4.3.2; kegg.reaction:R00677
    IL4I1_E_T = 2046.74; IL4I1_Ka = 6.5; IL4I1_Kb = 1.2; IL4I1_kcat = 1;
  R00678_Tdo: M_trp_DASH_L_c + $M_o2_c => M_Lfmkynr_c; Cytosol*(R00678_Tdo_kcat*R00678_Tdo_E_T*M_trp_DASH_L_c*M_o2_c*scaling/(R00678_Tdo_Ka*R00678_Tdo_Kb + R00678_Tdo_Ka*M_o2_c + R00678_Tdo_Kb*M_trp_DASH_L_c + M_trp_DASH_L_c*M_o2_c)); R00678_Tdo is "TDO";  // isDescribedBy pubmed:18370401; isEncodedBy ncbigene:6999; ec-code:1.13.11.11; kegg.reaction:R00678
    R00678_Tdo_E_T = 943912; R00678_Tdo_Ka = 0.222; R00678_Tdo_Kb = 0.037; R00678_Tdo_kcat = 1.4;
  // km and kcat values taken from 4991409 (pig)
  DDC_Trypta: M_trp_DASH_L_c => M_trypta_c + $M_co2_c; Cytosol*(DDC_E_T*DDC_Trypta_kcat_B*scaling*M_trp_DASH_L_c*DDC_Km_5htrp/(DDC_Km_trp_DASH_L*DDC_Km_5htrp + DDC_Km_trp_DASH_L*M_5htrp_c + DDC_Km_5htrp*M_trp_DASH_L_c));  // modifiers: M_5htrp_c; isDescribedBy pubmed:4991409; isEncodedBy ncbigene:1644; ec-code:4.1.1.28; kegg.reaction:R00685
    DDC_Trypta_kcat_B = 0.38;
  KYNU_L_Kyn: M_Lkynr_c + $M_h2o_c => $M_anth_c + $M_ala_DASH_L_c; Cytosol*(KYNU_E_T*KYNU_L_Kyn_kcat_A*scaling*M_Lkynr_c*KYNU_Km_hLkynr*KYNU_Km_Lfmkynr/(KYNU_Km_Lkynr*KYNU_Km_hLkynr*KYNU_Km_Lfmkynr + KYNU_Km_hLkynr*KYNU_Km_Lfmkynr*M_Lkynr_c + KYNU_Km_Lkynr*KYNU_Km_Lfmkynr*M_hLkynr_c + KYNU_Km_Lkynr*KYNU_Km_hLkynr*M_Lfmkynr_c)); KYNU_L_Kyn is "KYNU_L-Kyn";  // modifiers: M_hLkynr_c, M_Lfmkynr_c; isDescribedBy pubmed:19143568; isDescribedBy pubmed:457635; kegg.reaction:R00987; isDescribedBy pubmed:17300176
    KYNU_L_Kyn_kcat_A = 0.23;
  R01814_Tph1: $M_thbpt + M_trp_DASH_L_c + $M_o2_c => M_5htrp_c + $M_dhbpt_c + $M_h2o_c; Cytosol*(R01814_Tph1_kcat*R01814_Tph1_E_T*M_trp_DASH_L_c*M_o2_c*M_thbpt*scaling/(R01814_Tph1_Ka*R01814_Tph1_Kb + R01814_Tph1_Kb*M_trp_DASH_L_c + R01814_Tph1_Ka*M_o2_c + M_trp_DASH_L_c*M_o2_c)); R01814_Tph1 is "TPH1";  // isDescribedBy pubmed:15663479; ec-code:1.14.16.4; isDescribedBy pubmed:19816759; isEncodedBy ncbigene:7166
    R01814_Tph1_E_T = 503.141; R01814_Tph1_Ka = 0.0228; R01814_Tph1_Kb = 0.109; R01814_Tph1_kcat = 0.57;
  R01956_Kat1: M_Lkynr_c + $M_akg_c => $M_kynate_c + $M_glu_DASH_L_c; Cytosol*(AADAT_E_T_kat1*AADAT_kcat_Lkynr*scaling*M_Lkynr_c*AADAT_Km_hLkynr/(AADAT_Km_Lkynr*AADAT_Km_hLkynr + AADAT_Km_Lkynr*M_hLkynr_c + AADAT_Km_hLkynr*M_Lkynr_c)); R01956_Kat1 is "KAT1_L-Kyn";  // modifiers: M_hLkynr_c; isDescribedBy pubmed:18620547; isEncodedBy ncbigene:883; kegg.reaction:R01956; ec-code:2.6.1.7
  AFMID_FKyn: M_Lfmkynr_c + $M_h2o_c => $M_for_c + M_Lkynr_c; Cytosol*(AFMID_E_T*AFMID_FKyn_kcat_A*scaling*M_Lfmkynr_c*AFMID_Km_5hoxnfky*AFMID_Km_nformanth/(AFMID_Km_Lfmkynr*AFMID_Km_5hoxnfky*AFMID_Km_nformanth + AFMID_Km_5hoxnfky*AFMID_Km_nformanth*M_Lfmkynr_c + AFMID_Km_Lfmkynr*AFMID_Km_nformanth*M_5hoxnfkyn_c + AFMID_Km_Lfmkynr*AFMID_Km_5hoxnfky*M_nformanth_c));  // modifiers: M_5hoxnfkyn_c, M_nformanth_c; isDescribedBy pubmed:4190298; occursIn brenda:209258; isEncodedBy ncbigene:125061; kegg.reaction:R01959
    AFMID_FKyn_kcat_A = 100;
  KMO: M_Lkynr_c + $M_o2_c + $M_nadph_c + $M_h_c => M_hLkynr_c + $M_nadp_c + $M_h2o_c; Cytosol*(KMO_kcat*KMO_E_T*M_Lkynr_c*M_o2_c*M_nadph_c*M_h_c*scaling/(KMO_Ka*KMO_Kb*Kc + M_Lkynr_c*KMO_Kb*Kc + M_o2_c*KMO_Ka*Kc + M_nadph_c*KMO_Ka*KMO_Kb + M_Lkynr_c*M_o2_c*Kc + M_o2_c*M_nadph_c*KMO_Ka + M_Lkynr_c*M_nadph_c*KMO_Kb + M_Lkynr_c*M_o2_c*M_nadph_c));  // isDescribedBy pubmed:16973376; ec-code:1.14.13.9; isDescribedBy pubmed:10672018+; isEncodedBy ncbigene:8564
    KMO_E_T = 9766.18; KMO_Ka = 0.1; KMO_Kb = 0.071; Kc = 0.153; KMO_kcat = 2.2;
  INMT_Trypta: $M_amet_c + M_trypta_c => $M_ahcys_c + M_nmtrpta_c; Cytosol*(IMNT_E_T*INMT_Trypta_kcat_A*scaling*M_trypta_c*IMNT_Km_nmtrpta*IMNT_Km_srtn/(IMNT_Km_trypta*IMNT_Km_nmtrpta*IMNT_Km_srtn + IMNT_Km_nmtrpta*IMNT_Km_srtn*M_trypta_c + IMNT_Km_trypta*IMNT_Km_srtn*M_nmtrpta_c + IMNT_Km_trypta*IMNT_Km_nmtrpta*M_srtn_c));  // modifiers: M_srtn_c; isDescribedBy pubmed:3949799; ec-code:2.1.1.49; isDescribedBy pubmed:9852119; occursIn brenda:441354
    INMT_Trypta_kcat_A = 0.4;
  HAAO: M_3hanthrn_c + $M_o2_c => M_cmusa_c; Cytosol*(HAAO_kcat*HAAO_E_T*M_3hanthrn_c*M_o2_c*scaling/(HAAO_Ka*HAAO_Kb + HAAO_Ka*M_o2_c + HAAO_Kb*M_3hanthrn_c + M_3hanthrn_c*M_o2_c));  // modifiers: M_quln_c, M_anth_c; isDescribedBy pubmed:3112306+; ec-code:1.13.11.6; isDescribedBy pubmed:12672479; occursIn brenda:439367
    HAAO_E_T = 1.03084e4; HAAO_Ka = 0.016; HAAO_Kb = 0.615; HAAO_kcat = 64;
  KYNU_3HKyn: M_hLkynr_c + $M_h2o_c => M_3hanthrn_c + $M_ala_DASH_L_c; Cytosol*(KYNU_E_T*KYNU_3HKyn_kcat_A*scaling*M_hLkynr_c*KYNU_Km_Lkynr*KYNU_Km_Lfmkynr/(KYNU_Km_hLkynr*KYNU_Km_Lkynr*KYNU_Km_Lfmkynr + KYNU_Km_Lkynr*KYNU_Km_Lfmkynr*M_hLkynr_c + KYNU_Km_hLkynr*KYNU_Km_Lfmkynr*M_Lkynr_c + KYNU_Km_hLkynr*KYNU_Km_Lkynr*M_Lfmkynr_c));  // modifiers: M_Lkynr_c, M_Lfmkynr_c; isDescribedBy pubmed:19143568; isEncodedBy ncbigene:8942; kegg.reaction:R02668; ec-code:3.7.1.3
    KYNU_3HKyn_kcat_A = 3.5;
  DDC_5HTrp: M_5htrp_c => M_srtn_c + $M_co2_c; Cytosol*(DDC_E_T*DDC_5HTrp_kcat_B*scaling*M_5htrp_c*DDC_Km_trp_DASH_L/(DDC_Km_5htrp*DDC_Km_trp_DASH_L + DDC_Km_5htrp*M_trp_DASH_L_c + DDC_Km_trp_DASH_L*M_5htrp_c));  // modifiers: M_trp_DASH_L_c; isDescribedBy pubmed:18547057; isEncodedBy ncbigene:1644; ec-code:4.1.1.28; kegg.reaction:R02701
    DDC_5HTrp_kcat_B = 2;
  IDO_5HTrp: M_5htrp_c + $M_o2_c => M_5hoxnfkyn_c; Cytosol*(IDO_5HTrp_kcat*IDO_E_T*M_5htrp_c*M_o2_c*IDO_Km_trp_DASH_L*IDO_Km_srtn*scaling/(IDO_Km_5htrp*IDO_Km_O2*IDO_Km_trp_DASH_L*IDO_Km_srtn + M_5htrp_c*IDO_Km_O2*IDO_Km_trp_DASH_L*IDO_Km_srtn + M_o2_c*IDO_Km_5htrp*IDO_Km_trp_DASH_L*IDO_Km_srtn + M_trp_DASH_L_c*IDO_Km_5htrp*IDO_Km_O2*IDO_Km_srtn + M_srtn_c*IDO_Km_5htrp*IDO_Km_O2*IDO_Km_trp_DASH_L + M_5htrp_c*M_o2_c*IDO_Km_trp_DASH_L*IDO_Km_srtn + M_trp_DASH_L_c*M_o2_c*IDO_Km_5htrp*IDO_Km_srtn + M_srtn_c*M_o2_c*IDO_Km_5htrp*IDO_Km_trp_DASH_L));  // modifiers: M_trp_DASH_L_c, M_srtn_c; isDescribedBy pubmed:26687; kegg.reaction:R02702; occursIn brenda:685239; isDescribedBy pubmed:19737010
    IDO_5HTrp_kcat = 0.043;
  WARS: $M_atp_c + M_trp_DASH_L_c + $M_trna_trp_c => $M_amp_c + $M_ppi_c + $M_trp_L_trna_c; Cytosol*(WARS_kcat*WARS_E_T*M_trp_DASH_L_c*M_trna_trp_c*M_atp_c*scaling/(WARS_Ka*WARS_Kb + WARS_Kb*M_trp_DASH_L_c + WARS_Ka*M_trna_trp_c + M_trp_DASH_L_c*M_trna_trp_c));  // isDescribedBy pubmed:11676605; occursIn brenda:653740; isEncodedBy ncbigene:7453; kegg.reaction:R03664
    WARS_E_T = 1.59615e4; WARS_Ka = 0.0074; WARS_Kb = 0.0011; WARS_kcat = 1.1;
  AFMID_5HFKyn: M_5hoxnfkyn_c + $M_h2o_c => $M_5hxkyn_c + $M_for_c; Cytosol*(AFMID_E_T*AFMID_5HFKyn_kcat_A*scaling*M_5hoxnfkyn_c*AFMID_Km_Lfmkynr*AFMID_Km_nformanth/(AFMID_Km_5hoxnfky*AFMID_Km_Lfmkynr*AFMID_Km_nformanth + AFMID_Km_Lfmkynr*AFMID_Km_nformanth*M_5hoxnfkyn_c + AFMID_Km_5hoxnfky*AFMID_Km_nformanth*M_Lfmkynr_c + AFMID_Km_5hoxnfky*AFMID_Km_Lfmkynr*M_nformanth_c));  // modifiers: M_Lfmkynr_c, M_nformanth_c; isDescribedBy pubmed:4135014; occursIn brenda:209255; isEncodedBy ncbigene:125061; ec-code:3.5.1.9
    AFMID_5HFKyn_kcat_A = 100;
  quin_form: M_cmusa_c => M_quln_c; Cytosol*quin_form_k1*M_cmusa_c; quin_form is "Quinolic Acid formation (spontaneous)";  // isDescribedBy pubmed:15656614
    quin_form_k1 = 0.00025;
  R02173_Maoa: M_trypta_c + $M_h2o_c + $M_o2_c => $M_id3acald_c + $M_nh4_c + $M_h2o2_c; Cytosol*(MAOA_E_T*R02173_Maoa_kcat_B*scaling*M_trypta_c*MAO_Km_srtn/(MAO_Km_trypta*MAO_Km_srtn + MAO_Km_trypta*M_srtn_c + MAO_Km_srtn*M_trypta_c)); R02173_Maoa is "MAOA_Trypta";  // modifiers: M_srtn_c; isDescribedBy pubmed:11754741; isEncodedBy ncbigene:4128; kegg.reaction:R02173; ec-code:1.4.3.4
    R02173_Maoa_kcat_B = 3.5;
  Cinnavalinate_formation: 2 M_3hanthrn_c + 4 $M_o2_c => $M_Cinnavalininate_c + 2 $M_o2s_c + 2 $M_h2o2_c + 2 $M_h_c; Cytosol*Cinnavalinate_formation_k1*M_3hanthrn_c^e1*M_o2_c^e2;  // isDescribedBy pubmed:2949752; kegg.reaction:R02670; ec-code:1.11.1.6
    e1 = 2; e2 = 4; Cinnavalinate_formation_k1 = 5.6667e-5;
  TRPtrans_Slc7a5: $TRP_ex -> M_trp_DASH_L_c; Cytosol*(scaling*(Transporter_E_T_Slc7a5*Transporter_kcat_Trp*TRP_ex/Transporter_Km_Trp_Slc7a5 - Transporter_E_T_Slc7a5*Transporter_kcat_Trp*M_trp_DASH_L_c/Transporter_Km_Trp_Slc7a5)/(1 + TRP_ex/Transporter_Km_Trp_Slc7a5 + M_Lkynr_ex/Transporter_Km_Lkynr + M_trp_DASH_L_c/Transporter_Km_Trp_Slc7a5 + M_Lkynr_c/Transporter_Km_Lkynr)); TRPtrans_Slc7a5 is "Tryptophan_Transport Slc7a5";  // modifiers: M_Lkynr_ex, M_Lkynr_c; isEncodedBy ncbigene:8140; isDescribedBy pubmed:2872885; uniprot:Q01650
  R00678_Indo: M_trp_DASH_L_c + $M_o2_c => M_Lfmkynr_c; Cytosol*(R00678_Indo_kcat*IDO_E_T*M_trp_DASH_L_c*M_o2_c*IDO_Km_5htrp*IDO_Km_srtn*scaling/(IDO_Km_trp_DASH_L*IDO_Km_O2*IDO_Km_5htrp*IDO_Km_srtn + M_trp_DASH_L_c*IDO_Km_O2*IDO_Km_5htrp*IDO_Km_srtn + M_o2_c*IDO_Km_trp_DASH_L*IDO_Km_5htrp*IDO_Km_srtn + M_5htrp_c*IDO_Km_trp_DASH_L*IDO_Km_O2*IDO_Km_srtn + M_srtn_c*IDO_Km_trp_DASH_L*IDO_Km_O2*IDO_Km_5htrp + M_trp_DASH_L_c*M_o2_c*IDO_Km_5htrp*IDO_Km_srtn + M_5htrp_c*M_o2_c*IDO_Km_trp_DASH_L*IDO_Km_srtn + M_srtn_c*M_o2_c*IDO_Km_trp_DASH_L*IDO_Km_5htrp)); R00678_Indo is "IDO";  // modifiers: M_5htrp_c, M_srtn_c; isDescribedBy pubmed:26687; ec-code:1.13.11.52; isEncodedBy ncbigene:3620; isDescribedBy pubmed:19737010
    R00678_Indo_kcat = 1.65;
  QPRT: $M_h_c + $M_prpp_c + M_quln_c => $M_co2_c + M_nicrnt_c + $M_ppi_c; Cytosol*(QPRT_kcat*QPRT_E_T*M_quln_c*M_prpp_c*M_h_c*scaling/(QPRT_Ka*QPRT_Kb + QPRT_Kb*M_quln_c + QPRT_Ka*M_prpp_c + M_quln_c*M_prpp_c));  // isDescribedBy pubmed:17868694; occursIn brenda:693620; isEncodedBy ncbigene:23475; ec-code:2.4.2.19
    QPRT_E_T = 138709; QPRT_Ka = 0.022; QPRT_Kb = 0.023; QPRT_kcat = 0.255;
  KYNU_FKyn: M_Lfmkynr_c + $M_h2o_c => M_nformanth_c + $M_ala_DASH_L_c; Cytosol*(KYNU_E_T*KYNU_FKyn_kcat_A*scaling*M_Lfmkynr_c*KYNU_Km_Lkynr*KYNU_Km_hLkynr/(KYNU_Km_Lfmkynr*KYNU_Km_Lkynr*KYNU_Km_hLkynr + KYNU_Km_Lkynr*KYNU_Km_hLkynr*M_Lfmkynr_c + KYNU_Km_Lfmkynr*KYNU_Km_hLkynr*M_Lkynr_c + KYNU_Km_Lfmkynr*KYNU_Km_Lkynr*M_hLkynr_c));  // modifiers: M_Lkynr_c, M_hLkynr_c; isDescribedBy pubmed:118164; isEncodedBy ncbigene:8942; kegg.reaction:R03936; ec-code:3.7.1.3
    KYNU_FKyn_kcat_A = 0.013;
  AFMID_FAA: M_nformanth_c + $M_h2o_c => $M_for_c + $M_anth_c; Cytosol*(AFMID_E_T*AFMID_FAA_kcat_A*scaling*M_nformanth_c*AFMID_Km_Lfmkynr*AFMID_Km_5hoxnfky/(AFMID_Km_nformanth*AFMID_Km_Lfmkynr*AFMID_Km_5hoxnfky + AFMID_Km_Lfmkynr*AFMID_Km_5hoxnfky*M_nformanth_c + AFMID_Km_nformanth*AFMID_Km_5hoxnfky*M_Lfmkynr_c + AFMID_Km_nformanth*AFMID_Km_Lfmkynr*M_5hoxnfkyn_c));  // modifiers: M_Lfmkynr_c, M_5hoxnfkyn_c; isDescribedBy pubmed:4190298; isEncodedBy ncbigene:125061; ec-code:3.5.1.9; kegg.reaction:R00988
    AFMID_FAA_kcat_A = 13.57;
  // Km and kcat values taken from 17402747
  NMNAT1: $M_atp_c + $M_h_c + M_nicrnt_c => $M_dnad_c + $M_ppi_c; Cytosol*(NMNAT1_E_T*NMNAT1_kcat*M_nicrnt_c*M_h_c*M_atp_c*scaling/(NMNAT1_Km + M_nicrnt_c));  // isDescribedBy pubmed:17402747; isEncodedBy ncbigene:64802; ec-code:2.7.7.1; kegg.reaction:R03005
    NMNAT1_E_T = 4658.65; NMNAT1_Km = 0.0677; NMNAT1_kcat = 42.9;
  ACMSD: M_cmusa_c => $M_am6sa_c + $M_co2_c; Cytosol*(ACMSD_E_T*ACMSD_kcat*M_cmusa_c*scaling/(ACMSD_Km + M_cmusa_c));  // modifiers: M_quln_c, M_kynate_c; isDescribedBy pubmed:17288562; isEncodedBy ncbigene:130013; occursIn brenda:679800; ec-code:4.1.1.45
    ACMSD_E_T = 4.88582e4; ACMSD_Km = 0.0065; ACMSD_kcat = 1;
  R02908_Maoa: M_srtn_c + $M_h2o_c + $M_o2_c => $M_5hoxindact_c + $M_h2o2_c + $M_nh4_c; Cytosol*(MAOA_E_T*R02908_Maoa_kcat_B*scaling*M_srtn_c*MAO_Km_trypta/(MAO_Km_srtn*MAO_Km_trypta + MAO_Km_srtn*M_trypta_c + MAO_Km_trypta*M_srtn_c)); R02908_Maoa is "MAOA_Serotonin";  // modifiers: M_trypta_c, M_5hxkyn_c; isDescribedBy pubmed:15848762; isEncodedBy ncbigene:4128; ec-code:1.4.3.4; kegg.reaction:R02908
    R02908_Maoa_kcat_B = 18.6;
  AANAT_Serotonin: $M_accoa_c + M_srtn_c => $M_Nacsertn_c + $M_coa_c + $M_h_c; Cytosol*(AANAT_E_T*AANAT_Serotonin_kcat_B*scaling*M_srtn_c*AANAT_Km_trypta/(AANAT_Km_Srtn*AANAT_Km_trypta + AANAT_Km_Srtn*M_trypta_c + AANAT_Km_trypta*M_srtn_c));  // modifiers: M_trypta_c; isDescribedBy pubmed:15477086; isEncodedBy ncbigene:15; kegg.reaction:R02911; ec-code:2.3.1.87
    AANAT_Serotonin_kcat_B = 25.9;
  R04171_Kat1: M_hLkynr_c + $M_akg_c => $M_Xanthurenate + $M_glu_DASH_L_c; Cytosol*(AADAT_E_T_kat1*AADAT_kcat_hLkynr*scaling*M_hLkynr_c*AADAT_Km_Lkynr/(AADAT_Km_hLkynr*AADAT_Km_Lkynr + AADAT_Km_hLkynr*M_Lkynr_c + AADAT_Km_Lkynr*M_hLkynr_c)); R04171_Kat1 is "KAT1_3HKyn";  // modifiers: M_Lkynr_c; isDescribedBy pubmed:18620547; isEncodedBy ncbigene:883; ec-code:2.6.1.7; kegg.reaction:R04171
  IDO_Serotonin: M_srtn_c + $M_o2_c => $M_f5hoxkyn_c; Cytosol*(IDO_Serotonin_kcat*IDO_E_T*M_srtn_c*M_o2_c*IDO_Km_5htrp*IDO_Km_trp_DASH_L*scaling/(IDO_Km_srtn*IDO_Km_O2*IDO_Km_5htrp*IDO_Km_trp_DASH_L + M_srtn_c*IDO_Km_O2*IDO_Km_5htrp*IDO_Km_trp_DASH_L + M_o2_c*IDO_Km_srtn*IDO_Km_5htrp*IDO_Km_trp_DASH_L + M_5htrp_c*IDO_Km_srtn*IDO_Km_O2*IDO_Km_trp_DASH_L + M_trp_DASH_L_c*IDO_Km_srtn*IDO_Km_O2*IDO_Km_5htrp + M_srtn_c*M_o2_c*IDO_Km_5htrp*IDO_Km_trp_DASH_L + M_5htrp_c*M_o2_c*IDO_Km_srtn*IDO_Km_trp_DASH_L + M_trp_DASH_L_c*M_o2_c*IDO_Km_srtn*IDO_Km_5htrp));  // modifiers: M_5htrp_c, M_trp_DASH_L_c; isDescribedBy pubmed:19737010; ec-code:1.13.11.52; isDescribedBy pubmed:26687; isEncodedBy ncbigene:3620
    IDO_Serotonin_kcat = 0.002;
  R02174_metTrypta: $M_amet_c + M_nmtrpta_c => $M_ahcys_c + $M_nndmtrpta_c; Cytosol*(IMNT_E_T*R02174_metTrypta_kcat_A*scaling*M_nmtrpta_c*IMNT_Km_srtn*IMNT_Km_trypta/(IMNT_Km_nmtrpta*IMNT_Km_srtn*IMNT_Km_trypta + IMNT_Km_srtn*IMNT_Km_trypta*M_nmtrpta_c + IMNT_Km_nmtrpta*IMNT_Km_trypta*M_srtn_c + IMNT_Km_nmtrpta*IMNT_Km_srtn*M_trypta_c)); R02174_metTrypta is "INMT_MTrypta";  // modifiers: M_srtn_c, M_trypta_c; isEncodedBy ncbigene:11185; isDescribedBy pubmed:9852119; ec-code:2.1.1.49
    R02174_metTrypta_kcat_A = 0.176;
  INMT_Serotonin: $M_amet_c + M_srtn_c => $M_ahcys_c + $M_nmsrtn_c; Cytosol*(IMNT_E_T*INMT_Serotonin_kcat_A*scaling*M_srtn_c*IMNT_Km_nmtrpta*IMNT_Km_trypta/(IMNT_Km_srtn*IMNT_Km_nmtrpta*IMNT_Km_trypta + IMNT_Km_nmtrpta*IMNT_Km_trypta*M_srtn_c + IMNT_Km_srtn*IMNT_Km_trypta*M_nmtrpta_c + IMNT_Km_srtn*IMNT_Km_nmtrpta*M_trypta_c));  // modifiers: M_nmtrpta_c, M_trypta_c; isEncodedBy ncbigene:11185; isDescribedBy pubmed:9852119; kegg.reaction:R02910; ec-code:2.1.1.49
    INMT_Serotonin_kcat_A = 0.044;
  R01956_Kat2: M_hLkynr_c + $M_akg_c => $M_Xanthurenate + $M_glu_DASH_L_c; Cytosol*(AADAT_E_T_kat2*AADAT_kcat_hLkynr*scaling*M_hLkynr_c*AADAT_Km_Lkynr/(AADAT_Km_hLkynr*AADAT_Km_Lkynr + AADAT_Km_hLkynr*M_Lkynr_c + AADAT_Km_Lkynr*M_hLkynr_c)); R01956_Kat2 is "KAT2_3HKyn";  // modifiers: M_Lkynr_c; isEncodedBy ncbigene:51166; isDescribedBy pubmed:18620547; ec-code:2.6.1.7; kegg.reaction:R04171
  R01956_Kat3: M_hLkynr_c + $M_akg_c => $M_Xanthurenate + $M_glu_DASH_L_c; Cytosol*(AADAT_E_T_kat3*AADAT_kcat_hLkynr*scaling*M_hLkynr_c*AADAT_Km_Lkynr/(AADAT_Km_hLkynr*AADAT_Km_Lkynr + AADAT_Km_hLkynr*M_Lkynr_c + AADAT_Km_Lkynr*M_hLkynr_c)); R01956_Kat3 is "KAT3_3HKyn";  // modifiers: M_Lkynr_c; isDescribedBy pubmed:18620547; isEncodedBy ncbigene:56267; kegg.reaction:R04171; ec-code:2.6.1.7
  R04171_Kat2: M_Lkynr_c + $M_akg_c => $M_kynate_c + $M_glu_DASH_L_c; Cytosol*(AADAT_E_T_kat2*AADAT_kcat_Lkynr*scaling*M_Lkynr_c*AADAT_Km_hLkynr/(AADAT_Km_Lkynr*AADAT_Km_hLkynr + AADAT_Km_Lkynr*M_hLkynr_c + AADAT_Km_hLkynr*M_Lkynr_c)); R04171_Kat2 is "KAT2_L-Kyn";  // modifiers: M_hLkynr_c; isDescribedBy pubmed:18620547; isEncodedBy ncbigene:51166; kegg.reaction:R01956; ec-code:2.6.1.7
  R04171_Kat3: M_Lkynr_c + $M_akg_c => $M_kynate_c + $M_glu_DASH_L_c; Cytosol*(AADAT_E_T_kat3*AADAT_kcat_Lkynr*scaling*M_Lkynr_c*AADAT_Km_hLkynr/(AADAT_Km_Lkynr*AADAT_Km_hLkynr + AADAT_Km_Lkynr*M_hLkynr_c + AADAT_Km_hLkynr*M_Lkynr_c)); R04171_Kat3 is "KAT3_L-Kyn";  // modifiers: M_hLkynr_c; isDescribedBy pubmed:18620547; isEncodedBy ncbigene:56267; kegg.reaction:R01956; ec-code:2.6.1.7
  R02908_Maob: M_srtn_c + $M_h2o_c + $M_o2_c => $M_5hoxindact_c + $M_h2o2_c + $M_nh4_c; Cytosol*(MAOB_E_T*R02908_Maob_kcat_B*scaling*M_srtn_c*MAO_Km_trypta/(MAO_Km_srtn*MAO_Km_trypta + MAO_Km_srtn*M_trypta_c + MAO_Km_trypta*M_srtn_c)); R02908_Maob is "MAOB_Serotonin";  // modifiers: M_trypta_c, M_5hxkyn_c; isDescribedBy pubmed:15848762; isEncodedBy ncbigene:4129; kegg.reaction:R02908; ec-code:1.4.3.4
    R02908_Maob_kcat_B = 18.6;
  R02173_Maob: M_trypta_c + $M_h2o_c + $M_o2_c => $M_id3acald_c + $M_nh4_c + $M_h2o2_c; Cytosol*(MAOB_E_T*R02173_Maob_kcat_B*scaling*M_trypta_c*MAO_Km_srtn/(MAO_Km_trypta*MAO_Km_srtn + MAO_Km_trypta*M_srtn_c + MAO_Km_srtn*M_trypta_c)); R02173_Maob is "MAOB_Trypta";  // modifiers: M_srtn_c; isDescribedBy pubmed:11754741; isEncodedBy ncbigene:4129; ec-code:1.4.3.4; kegg.reaction:R02173
    R02173_Maob_kcat_B = 3.5;
  AANAT_Trypta: $M_accoa_c + M_trypta_c => $M_Nactrypta_c + $M_coa_c + $M_h_c; Cytosol*(AANAT_E_T*AANAT_Trypta_kcat_B*scaling*M_trypta_c*AANAT_Km_Srtn/(AANAT_Km_trypta*AANAT_Km_Srtn + AANAT_Km_trypta*M_srtn_c + AANAT_Km_Srtn*M_trypta_c));  // modifiers: M_srtn_c; isDescribedBy pubmed:15477086; isDescribedBy pubmed:18771288; ec-code:2.3.1.87; isEncodedBy ncbigene:15
    AANAT_Trypta_kcat_B = 25.9;
  R01814_Tph2: $M_thbpt + M_trp_DASH_L_c + $M_o2_c => M_5htrp_c + $M_dhbpt_c + $M_h2o_c; Cytosol*(R01814_Tph2_kcat*R01814_Tph2_E_T*M_trp_DASH_L_c*M_o2_c*M_thbpt*scaling/(R01814_Tph2_Ka*R01814_Tph2_Kb + R01814_Tph2_Kb*M_trp_DASH_L_c + R01814_Tph2_Ka*M_o2_c + M_trp_DASH_L_c*M_o2_c)); R01814_Tph2 is "TPH2";  // isDescribedBy pubmed:15663479; kegg.reaction:R01814; isDescribedBy pubmed:19816759; isEncodedBy ncbigene:121278
    R01814_Tph2_E_T = 235.128; R01814_Tph2_Ka = 0.0403; R01814_Tph2_Kb = 0.273; R01814_Tph2_kcat = 0.18;
  TRPtrans_Slc7a8: $TRP_ex -> M_trp_DASH_L_c; Cytosol*(scaling*(Transporter_E_T_Slc7a8*Transporter_kcat_Trp*TRP_ex/Transporter_Km_Trp_Slc7a8 - Transporter_E_T_Slc7a8*Transporter_kcat_Trp*M_trp_DASH_L_c/Transporter_Km_Trp_Slc7a8)/(1 + TRP_ex/Transporter_Km_Trp_Slc7a8 + M_Lkynr_ex/Transporter_Km_Lkynr + M_trp_DASH_L_c/Transporter_Km_Trp_Slc7a8 + M_Lkynr_c/Transporter_Km_Lkynr)); TRPtrans_Slc7a8 is "Tryptophan_Transport Slc7a8";  // modifiers: M_Lkynr_ex, M_Lkynr_c; isDescribedBy pubmed:2872885; isEncodedBy ncbigene:23428; uniprot:Q9UHI5
  Lkynr_trans_Slc7a5: M_Lkynr_c -> $M_Lkynr_ex; Cytosol*(scaling*(Transporter_E_T_Slc7a5*Transporter_kcat_Lkynr*M_Lkynr_c/Transporter_Km_Lkynr - Transporter_E_T_Slc7a5*Transporter_kcat_Lkynr*M_Lkynr_ex/Transporter_Km_Lkynr)/(1 + M_Lkynr_c/Transporter_Km_Lkynr + M_trp_DASH_L_c/Transporter_Km_Trp_Slc7a5 + M_Lkynr_ex/Transporter_Km_Lkynr + TRP_ex/Transporter_Km_Trp_Slc7a5)); Lkynr_trans_Slc7a5 is "Lkynr_Transporter_Slc7a5";  // modifiers: M_trp_DASH_L_c, TRP_ex; ncbigene:8140; isDescribedBy pubmed:2723766; uniprot:Q01650; isDescribedBy pubmed:2872885
  Lkynr_trans_Slc7a8: M_Lkynr_c -> $M_Lkynr_ex; Cytosol*(scaling*(Transporter_E_T_Slc7a8*Transporter_kcat_Lkynr*M_Lkynr_c/Transporter_Km_Lkynr - Transporter_E_T_Slc7a8*Transporter_kcat_Lkynr*M_Lkynr_ex/Transporter_Km_Lkynr)/(1 + M_Lkynr_c/Transporter_Km_Lkynr + M_trp_DASH_L_c/Transporter_Km_Trp_Slc7a8 + M_Lkynr_ex/Transporter_Km_Lkynr + TRP_ex/Transporter_Km_Trp_Slc7a8)); Lkynr_trans_Slc7a8 is "Lkynr_Transporter_Slc7a8";  // modifiers: M_trp_DASH_L_c, TRP_ex; uniprot:Q9UHI5; isEncodedBy ncbigene:23428; isDescribedBy pubmed:2723766; isDescribedBy pubmed:2872885

  // Unit definitions:
  unit substance = 1e-3 mole;
end
