// SBML level 2 version 4
// This model was downloaded from BioModels Database
// http://www.ebi.ac.uk/biomodels/
// dcterms:bibliographicCitation: http://identifiers.org/pubmed/26830321

function Constant_flux__irreversible_0(v)
  v;
end
Constant_flux__irreversible_0 is "Constant flux (irreversible)";

function mod_1__CF_1(DDR, va3_k_0)
  va3_k_0*DDR;
end
mod_1__CF_1 is "mod(1) CF_1";

function pos__FB_inh_MA_1(CycECdk2, CycECdk2a, p21, vb1_Ki_0, vb1_Kma_0, vb1_Kmb_0, vb1_h_0, vb1_k0_0, vb1_k1_0, vb1_ka_0, vb1_kb_0)
  CycECdk2*(vb1_k0_0 + vb1_k1_0*2*vb1_ka_0*CycECdk2a*vb1_Kmb_0/(vb1_kb_0 - vb1_ka_0*CycECdk2a + vb1_kb_0*vb1_Kma_0 + vb1_ka_0*CycECdk2a*vb1_Kmb_0 + ((vb1_kb_0 - vb1_ka_0*CycECdk2a + vb1_kb_0*vb1_Kma_0 + vb1_ka_0*CycECdk2a*vb1_Kmb_0)^2 - 4*(vb1_kb_0 - vb1_ka_0*CycECdk2a)*vb1_ka_0*CycECdk2a*vb1_Kmb_0)^(1/2)))/(1 + (vb1_Ki_0*p21)^vb1_h_0);
end
pos__FB_inh_MA_1 is "pos. FB inh MA_1";

function mod_1__CF_2(p53, va5_k_0)
  va5_k_0*p53;
end
mod_1__CF_2 is "mod(1) CF_2";

model MODEL1505080000()
  // Kollarovic2016 - Cell fate decision at G1-S transition
  // This model is described in the article:
  // To senesce or not to senesce: how primary human fibroblasts decide their cell fate after DNA damage.
  // Kollarovic G, Studencka M, Ivanova L, Lauenstein C, Heinze K, Lapytsko A, Talemi SR, Figueiredo AS, Schaber J.
  // Aging (Albany NY) 2016 Jan;
  // Abstract:
  // Excessive DNA damage can induce an irreversible cell cycle arrest, called senescence, which is generally perceived as an important tumour-suppressor mechanism. However, it is unclear how cells decide whether to senesce or not after DNA damage. By combining experimental data with a parameterized mathematical model we elucidate this cell fate decision at the G1-S transition. Our model provides a quantitative and conceptually new understanding of how human fibroblasts decide whether DNA damage is beyond repair and senesce. Model and data imply that the G1-S transition is regulated by a bistable hysteresis switch with respect to Cdk2 activity, which in turn is controlled by the Cdk2/p21 ratio rather than cyclin abundance. We experimentally confirm the resulting predictions that to induce senescence i) in healthy cells both high initial and elevated background DNA damage are necessary and sufficient, and ii) in already damaged cells much lower additional DNA damage is sufficient. Our study provides a mechanistic explanation of a) how noise in protein abundances allows cells to overcome the G1-S arrest even with substantial DNA damage, potentially leading to neoplasia, and b) how accumulating DNA damage with age increasingly sensitizes cells for senescence.
  // This model is hosted on BioModels Database and identified by: BIOMD0000000632.
  // To cite BioModels Database, please use: BioModels Database: An enhanced, curated and annotated resource for published quantitative kinetic models.
  // To the extent possible under law, all copyright and related or neighbouring rights to this encoded model have been dedicated to the public domain worldwide. Please refer to CC0 Public Domain Dedication for more information.
  // biomodels.db:MODEL1505080000
  // biomodels.db:BIOMD0000000632
  // isDescribedBy pubmed:26830321
  // hasPart GO:0007050 GO:0006281
  // occursIn BTO:0000452
  // isPartOf GO:2000772

  // Compartments:
  compartment compartment = 1; compartment is "MRC-5 cell";  // BTO:0001590

  // Species:
  // represents Cyclin E
  species CycE in compartment = CycE_0;  // isVersionOf uniprot:P24864
  // represents Cdk2
  species Cdk2 in compartment = Cdk2_0;  // isVersionOf uniprot:P24941
  // represents the CycE/Cdk2 complex
  species CycECdk2 in compartment = CycECdk2_0;  // hasPart uniprot:P24941 uniprot:P24864
  // represents phosphorylated Cdk2 and dephosphorylated CyclinE1 in a complex
  species CycECdk2a in compartment = CycECdk2a_0;  // hasPart uniprot:P24941 uniprot:P24864
  // p21 is also known as cyclin-dependent-kinase inhibitor 1
  species p21 in compartment = 1;  // isVersionOf uniprot:P38936
  // The model uses DNADamageC as a way to quantify DNA damage that can be repaired slowly. Slow repair is mainly attributed to cell cycle checkpoints. It is difficult to annotate this, as it is simply a way to quantify slowly repairable damage and is not a protein nor small molecule species. Thus, it is described with "isPropertyOf" double strand break sites and "hasProperty" DNA damage checkpoint.
  species DNADamageC in compartment = 0;  // hasProperty GO:0000077; isPropertyOf GO:0035861
  // The model uses DNADamageS as a way to quantify DNA damage that can be repaired quickly. Fast repair is not well elucidated but could be due to chromatin structure or DNA sequence context. It is difficult to annotate this, as it is simply a way to quantify quickly repairable damage and is not a protein nor small molecule species. Thus, it is described with "isPropertyOf" double strand break sites and "hasProperty" double strand break repair. While double strand break repair applies to both slow and fast repair, the distinction is made by applying cell cycle checkpoint repair to slowly repairable damage, DNADamageC above, and not to DNADamageS.
  species DNADamageS in compartment = 0;  // hasProperty GO:0006302; isPropertyOf GO:0035861
  // Total DNA damage is the sum of base DNA damage (BASE), slowly repairable damage (DNADamageC), quickly repairable damage (DNADamageS), and unrepairable telomere double strand breaks (TAF)
  species $DDR in compartment;  // hasProperty GO:0042769; isPropertyOf GO:0035861
  // represents p53
  species p53 in compartment = 1;  // isVersionOf uniprot:P04637

  // Parameters:
  CycECdk2a_0 = 2.28154;
  CycECdk2_0 = 1.366975;
  Cdk2_0 = 0.0166736;
  CycE_0 = 9.217981;
  Gy = 0;
  prop_C = 0.0905648;
  FociPerGy = 28.9678;
  k_TAF = 0.973822;
  TAF = 0.506228;
  BaseDNAdamage = 2.16068;
  k4b = vb3_v_0/Cdk2;
  k6b = vb5_v_0/CycE;
  k8b = vb7_k1_0*Cdk2*CycE/CycECdk2;
  k2b = CycECdk2*(vb1_k0_0 + vb1_k1_0*2*vb1_ka_0*CycECdk2a*vb1_Kmb_0/(vb1_kb_0 - vb1_ka_0*CycECdk2a + vb1_kb_0*vb1_Kma_0 + vb1_ka_0*CycECdk2a*vb1_Kmb_0 + ((vb1_kb_0 - vb1_ka_0*CycECdk2a + vb1_kb_0*vb1_Kma_0 + vb1_ka_0*CycECdk2a*vb1_Kmb_0)^2 - 4*(vb1_kb_0 - vb1_ka_0*CycECdk2a)*vb1_ka_0*CycECdk2a*vb1_Kmb_0)^(1/2)))/(1 + (vb1_Ki_0*p21)^vb1_h_0)/CycECdk2a;
  k6a = va5_k_0*p53/p21;
  k4a = va3_k_0*DDR/p53;
  vb3_v_0 = 99.84;
  vb5_v_0 = 9.99936;
  vb7_k1_0 = 10;
  vb1_k0_0 = 0.10249;
  vb1_k1_0 = 4.00486;
  vb1_ka_0 = 3.40431;
  vb1_Kmb_0 = 0.00842472;
  vb1_kb_0 = 0.324616;
  vb1_Kma_0 = 0.001143917;
  vb1_Ki_0 = 0.394586;
  vb1_h_0 = 4.93142;
  va5_k_0 = 193.258;
  va3_k_0 = 0.00547468;
  Metabolite_3_0 = Cdk2; Metabolite_3_0 is "Initial for Cdk2";
  Metabolite_5_0 = CycECdk2; Metabolite_5_0 is "Initial for CycECdk2";
  Metabolite_7_0 = CycECdk2a; Metabolite_7_0 is "Initial for CycECdk2a";
  Metabolite_1_0 = CycE; Metabolite_1_0 is "Initial for CycE";
  ModelValue_9_0 = TAF; ModelValue_9_0 is "Initial for TAF";

  // Assignment rules:
  Cdk2_T := Cdk2 + CycECdk2 + CycECdk2a;
  DNAdamagefoci_0 := Gy*FociPerGy;
  Cdk2_Thr160 := CycECdk2 + CycECdk2a;
  Fit_Cdk2_Thr160 := (CycECdk2 + CycECdk2a)/(Metabolite_5_0 + Metabolite_7_0);
  Fit_Cdk2_T := (Cdk2 + CycECdk2 + CycECdk2a)/(Metabolite_3_0 + Metabolite_5_0 + Metabolite_7_0);
  Fit_CycE_T := (CycECdk2 + CycECdk2a + CycE)/(Metabolite_5_0 + Metabolite_7_0 + Metabolite_1_0);
  CycE_T := CycECdk2 + CycECdk2a + CycE;
  Fit_Cdk2a := CycECdk2a/Metabolite_7_0;
  DDR := BaseDNAdamage + DNADamageC + DNADamageS + TAF;

  // Reactions:
  // CycE is constitutively produced
  vb5: => CycE; compartment*Constant_flux__irreversible_0(vb5_v_0);  // isVersionOf GO:0006412 GO:0006351
  // CycE is constitutively degraded
  vb6: CycE => ; compartment*k6b*CycE;  // isVersionOf GO:0043161
  // The production of Cdk2 is consititutive in some versions of the model but negatively regulated by p21 in other versions. The "hasProperty: negative regulation of cyclin-dependent kinase activity" annotation is thus only relevant for versions of the model where this negative feedback aspect is included.
  vb3: => Cdk2; compartment*Constant_flux__irreversible_0(vb3_v_0);  // isVersionOf GO:0006412 GO:0006351; hasProperty GO:1904030
  // The degradation of Cdk is constitutive in some versions of the model but positively regulated by p21 in other versions. The "hasProperty: positive regulation of proteosome-mediated ubiquitin-dependent degradation" annotation is thus only relevant for versions of the model where p21 regulates the degradation process.
  vb4: Cdk2 => ; compartment*k4b*Cdk2;  // isVersionOf GO:0043161; hasProperty GO:0032436
  // CycECdk2 complex association
  vb7: CycE + Cdk2 => CycECdk2; compartment*vb7_k1_0*CycE*Cdk2;  // reactome:R-HSA-69191
  // Surprisingly, there were no more specific annotations for the dissociation of a cyclin-CDK complex.
  vb8: CycECdk2 => CycE + Cdk2; compartment*k8b*CycECdk2;  // hasProperty GO:1904030
  // CycECdk2 is activated by a CAK. The active form engages in a positive feedback loop, and the activation process can be inhibited by p21.
  vb1: CycECdk2 => CycECdk2a; compartment*pos__FB_inh_MA_1(CycECdk2, CycECdk2a, p21, vb1_Ki_0, vb1_Kma_0, vb1_Kmb_0, vb1_h_0, vb1_k0_0, vb1_k1_0, vb1_ka_0, vb1_kb_0);  // modifiers: p21; reactome:R-HSA-188350; hasProperty GO:1904031 reactome:R-HSA-69562
  // The CycECdk2 complex is deactivated by phosphorylation by Wee1.
  vb2: CycECdk2a => CycECdk2; compartment*k2b*CycECdk2a;  // reactome:R-HSA-69195
  // The DDR (DNA damage response) signal influences the accumulation of p53 by preventing its degradation.
  va3: => p53; compartment*mod_1__CF_1(DDR, va3_k_0);  // modifiers: DDR; GO:0006974
  // Slowly repairable DNA damage is repaired.
  va2: DNADamageC => ; compartment*va2_k1*DNADamageC;  // GO:0006281; hasProperty GO:0072432
    va2_k1 = 0.0164994;
  // Quickly repairable DNA damage is repaired.
  va1: DNADamageS => ; compartment*va1_k1*DNADamageS;  // GO:0006281
    va1_k1 = 0.234805;
  // The DDR (DNA damage response) signal influences accumulation of p53 which stimulates transcription of p21.
  va5: => p21; compartment*mod_1__CF_2(p53, va5_k_0);  // modifiers: p53; GO:0006978
  // p21 is constitutively deactivated
  va6: p21 => ; compartment*k6a*p21;  // isVersionOf GO:0043161
  // DDR signal is constitutively deactivated
  va4: p53 => ; compartment*k4a*p53;  // isVersionOf GO:2001021

  // Events:
  DNADamage: at (time > 0): TAF = ModelValue_9_0 + k_TAF*Gy^(1/2), DNADamageC = prop_C*DNAdamagefoci_0, DNADamageS = (1 - prop_C)*DNAdamagefoci_0;

  // Unit definitions:
  unit volume = 1e-6 litre;
  unit time = 3600 second;
  unit substance = 1e-6 mole;
end
